# OpenSim document version 40000
InverseKinematicsTool:
  results_directory: ./
  constraint_weight: Inf
  accuracy: 1e-5
  marker_file: 04122019 - Marker Volunteer01/Rosti Data/New Session 103_transformed.trc
  time_range: 0 6.19
  report_errors: true
  report_marker_locations: false
  IKTaskSet:
    IKMarkerTask IJ: apply=true weight=100
    IKMarkerTask C7: apply=true weight=100
    IKMarkerTask T8: apply=true weight=100
    IKMarkerTask PX: apply=true weight=100
    IKMarkerTask SC: apply=true weight=100
    IKMarkerTask AC: apply=false weight=1
    IKMarkerTask AI: apply=false weight=1
    IKMarkerTask TS: apply=false weight=1
    IKMarkerTask AA: apply=false weight=1
    IKMarkerTask GH: apply=true weight=250
    IKMarkerTask LE: apply=true weight=250
    IKMarkerTask ME: apply=true weight=250
    IKMarkerTask US: apply=true weight=250
    IKMarkerTask RS: apply=true weight=250
