# OpenSim document version 40000
ScaleTool DAS3-scaled:
  mass: 91 [kg]
  height: -1
  age: -1
  ModelScaler:
    apply: true
    scaling_order: measurements
    marker_file: 04122019 - Marker Volunteer01/Rosti Data/New Session 103_transformed.trc
    time_range: 0 1
    preserve_mass_distribution: true
    MeasurementSet:
      Measurement Thorax: apply=true
        MarkerPair: markers=(IJ PX)
        BodyScale thorax: axes=(X Y Z)
      Measurement Clavicle: apply=true
        MarkerPair: markers=(AC SC)
        BodyScale clavicle_1: axes=(X Y Z)
        BodyScale clavicle_2: axes=(X Y Z)
        BodyScale clavicle_r: axes=(X Y Z)
      Measurement Scapula: apply=true
        MarkerPair: markers=(AI AA)
        BodyScale scapula_1: axes=(X Y Z)
        BodyScale scapula_2: axes=(X Y Z)
        BodyScale scapula_r: axes=(X Y Z)
      Measurement Humerus: apply=true
        MarkerPair: markers=(GH LE)
        BodyScale humerus_1: axes=(X Y Z)
        BodyScale humerus_2: axes=(X Y Z)
        BodyScale humerus_r: axes=(X Y Z)
      Measurement Radius: apply=true
        MarkerPair: markers=(LE RS)
        BodyScale radius_r: axes=(X Y Z)
      Measurement Ulna: apply=true
        MarkerPair: markers=(ME US)
        BodyScale ulna_r: axes=(X Y Z)
      Measurement Hand: apply=true
        MarkerPair: markers=(US RS)
        BodyScale hand_r: axes=(X Y Z)
  MarkerPlacer:
    apply: false
    marker_file: 04122019 - Marker Volunteer01/Rosti Data/New Session 103_transformed.trc
    time_range: 0 1
    max_marker_movement: -1
    IKTaskSet:
      IKMarkerTask IJ: apply=true weight=250
      IKMarkerTask C7: apply=true weight=500
      IKMarkerTask T8: apply=false weight=100
      IKMarkerTask PX: apply=false weight=100
      IKMarkerTask SC: apply=false weight=100
      IKMarkerTask AC: apply=true weight=250
      IKMarkerTask AI: apply=false weight=100
      IKMarkerTask TS: apply=false weight=100
      IKMarkerTask AA: apply=false weight=100
      IKMarkerTask GH: apply=false weight=100
      IKMarkerTask LE: apply=false weight=100
      IKMarkerTask ME: apply=false weight=100
      IKMarkerTask US: apply=false weight=100
      IKMarkerTask RS: apply=false weight=100
