# OpenSim document version 40000
ScaleTool DAS3-scaled:
  mass: 91 [kg]
  height: -1
  age: -1
  ModelScaler:
    apply: false
    time_range: -1 -1
    preserve_mass_distribution: false
  MarkerPlacer:
    apply: true
    marker_file: 04122019 - Marker Volunteer01/Rosti Data/New Session 103_transformed.trc
    time_range: 0 1
    max_marker_movement: -1
    IKTaskSet:
      IKMarkerTask IJ: apply=true weight=100
      IKMarkerTask C7: apply=true weight=100
      IKMarkerTask T8: apply=true weight=100
      IKMarkerTask PX: apply=true weight=100
      IKMarkerTask SC: apply=true weight=100
      IKMarkerTask AC: apply=false weight=1
      IKMarkerTask AI: apply=false weight=1
      IKMarkerTask TS: apply=false weight=1
      IKMarkerTask AA: apply=false weight=1
      IKMarkerTask GH: apply=false weight=1
      IKMarkerTask LE: apply=true weight=250
      IKMarkerTask ME: apply=true weight=250
      IKMarkerTask US: apply=true weight=250
      IKMarkerTask RS: apply=true weight=250
