# OpenSim document version 40000
InverseKinematicsTool:
  results_directory: ./
  constraint_weight: Inf
  accuracy: 1e-5
  marker_file: ../ExperimentalData/Markers/S2_ABD_LOAD.trc
  time_range: 0 14.24
  report_errors: true
  report_marker_locations: false
  IKTaskSet:
    IKMarkerTask ij: apply=true weight=1
    IKMarkerTask c7: apply=true weight=1
    IKMarkerTask t8: apply=true weight=1
    IKMarkerTask px: apply=true weight=1
    IKMarkerTask acc: apply=true weight=1
    IKMarkerTask ac: apply=true weight=1
    IKMarkerTask ai: apply=true weight=1
    IKMarkerTask ts: apply=true weight=1
    IKMarkerTask aa: apply=true weight=1
    IKMarkerTask gu: apply=true weight=1
    IKMarkerTask EpL: apply=true weight=1
    IKMarkerTask EpM: apply=true weight=1
    IKMarkerTask centelbow_humerus: apply=true weight=1
    IKMarkerTask ijc: apply=true weight=1
    IKMarkerTask ij_proj_c7: apply=false weight=1
    IKMarkerTask ij_proj_px: apply=false weight=1
    IKMarkerTask ij_proj_ac: apply=false weight=1
    IKMarkerTask us: apply=true weight=1
    IKMarkerTask rs: apply=true weight=1
    IKMarkerTask centusrs: apply=true weight=1
    IKMarkerTask ai_proj_aa_x: apply=false weight=1
    IKMarkerTask ai_proj_ts: apply=false weight=1
    IKMarkerTask ai_proj_aa_z: apply=false weight=1
    IKMarkerTask centelbow_ulna: apply=true weight=1
    IKMarkerTask pc: apply=true weight=1
    IKMarkerTask ai_proj_pc_z: apply=false weight=1
