# OpenSim document version 40000
ScaleTool ThoracoscapularShoulderModel-scaled:
  mass: 43.19 [kg]
  height: -1
  age: -1
  ModelScaler:
    apply: true
    scaling_order: measurements
    marker_file: ../../ExperimentalData/Markers/ABD_NL001_FP03.trc
    time_range: 0 15.88
    preserve_mass_distribution: true
    MeasurementSet:
      Measurement Thorax_1: apply=true
        MarkerPair: markers=(ij_proj_c7 ij)
        BodyScale thorax: axes=X
      Measurement Thorax_2: apply=true
        MarkerPair: markers=(ij_proj_px ij)
        BodyScale thorax: axes=Y
      Measurement Thorax_3: apply=true
        MarkerPair: markers=(ij_proj_ac ij)
        BodyScale thorax: axes=Z
      Measurement Clavicle_1: apply=false
      Measurement Clavicle_2: apply=true
        MarkerPair: markers=(acc ijc)
        BodyScale clavicle: axes=Y
      Measurement Clavicle_3: apply=false
      Measurement Scapula_1: apply=true
        MarkerPair: markers=(aa ac)
        BodyScale scapula: axes=X
      Measurement Scapula_2: apply=true
        MarkerPair: markers=(ai ai_proj_ts)
        BodyScale scapula: axes=Y
      Measurement Scapula_3: apply=true
        MarkerPair: markers=(ai ai_proj_aa_z)
        BodyScale scapula: axes=Z
      Measurement Humerus_1: apply=true
        MarkerPair: markers=(EpL EpM)
        BodyScale humerus: axes=X
      Measurement Humerus_2: apply=true
        MarkerPair: markers=(gu centelbow_humerus)
        BodyScale humerus: axes=Y
      Measurement Humerus_3: apply=true
        MarkerPair: markers=(EpM EpL)
        BodyScale humerus: axes=Z
      Measurement Ulna_1: apply=true
        MarkerPair: markers=(rs us)
        BodyScale ulna: axes=X
      Measurement Ulna_2: apply=true
        MarkerPair: markers=(centelbow_ulna centusrs)
        BodyScale ulna: axes=Y
      Measurement Ulna_3: apply=true
        MarkerPair: markers=(rs us)
        BodyScale ulna: axes=Z
      Measurement Radius_1: apply=true
        MarkerPair: markers=(rs us)
        BodyScale radius: axes=X
      Measurement Radius_2: apply=true
        MarkerPair: markers=(centelbow_ulna centusrs)
        BodyScale radius: axes=Y
      Measurement Radius_3: apply=true
        MarkerPair: markers=(rs us)
        BodyScale radius: axes=Z
      Measurement Hand_1: apply=false
      Measurement Hand_2: apply=false
      Measurement Hand_3: apply=false
      Measurement Thorax123: apply=false
  MarkerPlacer:
    apply: true
    marker_file: ../../ExperimentalData/Markers/ABD_NL001_FP03.trc
    time_range: 1 1.01
    max_marker_movement: -1
    IKTaskSet:
      IKMarkerTask ij: apply=true weight=1
      IKMarkerTask c7: apply=true weight=1
      IKMarkerTask t8: apply=true weight=1
      IKMarkerTask px: apply=true weight=1
      IKMarkerTask ClavicleMassCenter: apply=false weight=1
      IKMarkerTask acc: apply=true weight=1
      IKMarkerTask sc: apply=false weight=1
      IKMarkerTask ScapulaMassCenter: apply=false weight=1
      IKMarkerTask ScapulaThoracicContactPt: apply=false weight=1
      IKMarkerTask ac: apply=true weight=1
      IKMarkerTask ai: apply=true weight=1
      IKMarkerTask ts: apply=true weight=1
      IKMarkerTask aa: apply=true weight=1
      IKMarkerTask HumerusMassCenter: apply=false weight=1
      IKMarkerTask gu: apply=true weight=1
      IKMarkerTask EpL: apply=true weight=1
      IKMarkerTask EpM: apply=true weight=1
      IKMarkerTask centelbow_humerus: apply=true weight=0
      IKMarkerTask centijc7: apply=false weight=1
      IKMarkerTask centpxt8: apply=false weight=1
      IKMarkerTask ijc: apply=false weight=1
      IKMarkerTask ij_proj_c7: apply=true weight=1
      IKMarkerTask ij_proj_px: apply=true weight=1
      IKMarkerTask ij_proj_ac: apply=true weight=1
      IKMarkerTask us: apply=true weight=1
      IKMarkerTask rs: apply=true weight=1
      IKMarkerTask centusrs: apply=true weight=1
      IKMarkerTask ai_proj_aa_x: apply=false weight=1
      IKMarkerTask ai_proj_ts: apply=true weight=1
      IKMarkerTask ai_proj_aa_z: apply=true weight=1
      IKMarkerTask centelbow_ulna: apply=true weight=0
