# OpenSim document version 40000
InverseKinematicsTool:
  results_directory: ./
  constraint_weight: Inf
  accuracy: 1e-5
  marker_file: C:/Users/rsk02/Documents/GitHub/TechForParalysis/Code/Model/ThoracoscapularShoulderPaperMaterials/Simulations/IK/../../ExperimentalData/Markers/ABD_NL001_FP03.trc
  time_range: 0 5
  report_errors: true
  report_marker_locations: false
  IKTaskSet:
    IKMarkerTask ij: apply=true weight=1
    IKMarkerTask c7: apply=true weight=1
    IKMarkerTask t8: apply=true weight=1
    IKMarkerTask px: apply=true weight=1
    IKMarkerTask acc: apply=false weight=1
    IKMarkerTask ac: apply=true weight=1
    IKMarkerTask ai: apply=true weight=1
    IKMarkerTask ts: apply=true weight=1
    IKMarkerTask aa: apply=true weight=1
    IKMarkerTask gu: apply=true weight=1
    IKMarkerTask EpL: apply=true weight=1
    IKMarkerTask EpM: apply=true weight=1
    IKMarkerTask centelbow_humerus: apply=false weight=1
    IKMarkerTask ij_proj_c7: apply=false weight=1
    IKMarkerTask ij_proj_px: apply=false weight=1
    IKMarkerTask ij_proj_ac: apply=false weight=1
    IKMarkerTask us: apply=true weight=1
    IKMarkerTask rs: apply=true weight=1
    IKMarkerTask centusrs: apply=false weight=1
    IKMarkerTask ai_proj_aa_x: apply=false weight=1
    IKMarkerTask ai_proj_ts: apply=false weight=1
    IKMarkerTask ai_proj_aa_z: apply=false weight=1
    IKMarkerTask centelbow_ulna: apply=false weight=1
