# OpenSim document version 40000
ScaleTool ThoracoscapularShoulderModel-scaled:
  mass: 91 [kg]
  height: -1
  age: -1
  ModelScaler:
    apply: true
    scaling_order: manualScale
    time_range: -1 -1
    preserve_mass_distribution: true
    ScaleSet:
      Scale thorax_xyz: scales=(1.1 1.2 1.3) segment=thorax apply=true
      Scale: segment=clavicle apply=true
        scales clavicle_xyz: 1.1 1.2 1.3
      Scale scapula_xyz: scales=(1.1 1.2 1.3) segment=scapula apply=true
      Scale: segment=humerus apply=true
        scales humerus_xyz: 1.1 1.2 1.3
      Scale ulna_xyz: scales=(1.1 1.2 1.3) segment=ulna apply=true
      Scale radius_xyz: scales=(1.1 1.2 1.3) segment=radius apply=true
      Scale hand_xyz: scales=(1 1 1) segment=hand apply=true
  MarkerPlacer:
    apply: false
    time_range: -1 -1
    max_marker_movement: -1
    IKTaskSet:
      IKMarkerTask ij: apply=false weight=1
      IKMarkerTask c7: apply=false weight=1
      IKMarkerTask t8: apply=false weight=1
      IKMarkerTask px: apply=false weight=1
      IKMarkerTask ClavicleMassCenter: apply=false weight=1
      IKMarkerTask acc: apply=false weight=1
      IKMarkerTask sc: apply=false weight=1
      IKMarkerTask ScapulaMassCenter: apply=false weight=1
      IKMarkerTask ScapulaThoracicContactPt: apply=false weight=1
      IKMarkerTask ac: apply=false weight=1
      IKMarkerTask ai: apply=false weight=1
      IKMarkerTask ts: apply=false weight=1
      IKMarkerTask aa: apply=false weight=1
      IKMarkerTask HumerusMassCenter: apply=false weight=1
      IKMarkerTask gu: apply=false weight=1
      IKMarkerTask EpL: apply=false weight=1
      IKMarkerTask EpM: apply=false weight=1
      IKMarkerTask centelbow_humerus: apply=false weight=1
      IKMarkerTask centijc7: apply=false weight=1
      IKMarkerTask centpxt8: apply=false weight=1
      IKMarkerTask ijc: apply=false weight=1
      IKMarkerTask ij_proj_c7: apply=false weight=1
      IKMarkerTask ij_proj_px: apply=false weight=1
      IKMarkerTask ij_proj_ac: apply=false weight=1
      IKMarkerTask us: apply=false weight=1
      IKMarkerTask rs: apply=false weight=1
      IKMarkerTask centusrs: apply=false weight=1
      IKMarkerTask ai_proj_aa_x: apply=false weight=1
      IKMarkerTask ai_proj_ts: apply=false weight=1
      IKMarkerTask ai_proj_aa_z: apply=false weight=1
      IKMarkerTask centelbow_ulna: apply=false weight=1
