# OpenSim document version 40000
InverseKinematicsTool:
  time_range: 0.01 11.51
  marker_file: >Unassigned
  IKTaskSet:
    IKMarkerTask IJ: apply=true weight=1
    IKMarkerTask C7: apply=true weight=1
    IKMarkerTask T8: apply=true weight=1
    IKMarkerTask PX: apply=true weight=1
    IKMarkerTask SC: apply=true weight=1
    IKMarkerTask AC: apply=true weight=1
    IKMarkerTask AI: apply=true weight=1
    IKMarkerTask TS: apply=true weight=1
    IKMarkerTask AA: apply=true weight=1
    IKMarkerTask GH: apply=true weight=1
    IKMarkerTask EL: apply=true weight=1
    IKMarkerTask EM: apply=true weight=1
    IKMarkerTask US: apply=true weight=1
    IKMarkerTask RS: apply=true weight=1
    IKMarkerTask Wrist: apply=false weight=1
    IKMarkerTask Capitulum: apply=false weight=1
