# OpenSim document version 30000
Model DAS3:
  gravity: 0 -9.80665 0
  BodySet:
    Body ground: mass=0 mass_center=(0 0 0) inertia_xx=0 inertia_yy=0 inertia_zz=0
    Body thorax: mass=20 mass_center=(0 -0.1486 0.0591) inertia_xx=1.29841 inertia_yy=0.55245 inertia_zz=1.29841
        meshes=(ground_ribs.vtp ground_spine.vtp ground_skull.vtp ground_jaw.vtp)
      CustomJoint base: parent_body=ground location_in_parent=(0 0 0) location=(0 0 0)
        Coordinate TH_x: motion_type=rotational default_value=0 range=(-0.5235988 0.5235988) clamped=false
        Coordinate TH_y: motion_type=rotational default_value=0 range=(-1.570796 1.570796) clamped=false
        Coordinate TH_z: motion_type=rotational default_value=0 range=(-0.5235988 0.5235988) clamped=false
        Coordinate TH_transx: motion_type=translational default_value=0 range=(-2 2) clamped=false
        Coordinate TH_transy: motion_type=translational default_value=0 range=(-2 2) clamped=false
        Coordinate TH_transz: motion_type=translational default_value=0 range=(-2 2) clamped=false
        SpatialTransform:
          TransformAxis rotation1: coordinates=TH_x axis=(1 0 0) LinearFunction(coefficients=1 0)
          TransformAxis rotation2: coordinates=TH_y axis=(0 1 0) LinearFunction(coefficients=1 0)
          TransformAxis rotation3: coordinates=TH_z axis=(0 0 1) LinearFunction(coefficients=1 0)
          TransformAxis translation1: coordinates=TH_transx axis=(1 0 0) LinearFunction(coefficients=1 0)
          TransformAxis translation2: coordinates=TH_transy axis=(0 1 0) LinearFunction(coefficients=1 0)
          TransformAxis translation3: coordinates=TH_transz axis=(0 0 1) LinearFunction(coefficients=1 0)
      WrapEllipsoid serr_ant: translation=(0 -0.1486 0.0591) dimensions=(0.147 0.2079 0.0944)
    Body clavicle_1: mass=0 mass_center=(0 0 0) inertia_xx=0 inertia_yy=0 inertia_zz=0
      CustomJoint sc1: parent_body=thorax location_in_parent=(0.0014 -0.0152 0.0028) location=(0 0 0)
        Coordinate SC_y: motion_type=rotational default_value=-0.5844408 range=(-1.1345 -0.3316) clamped=false
        SpatialTransform: axes_held_at_zero=(rotation2 rotation3 translation1 translation2 translation3)
          TransformAxis rotation1: coordinates=SC_y axis=(0 1 0) LinearFunction(coefficients=1 0)
    Body clavicle_2: mass=0 mass_center=(0 0 0) inertia_xx=0 inertia_yy=0 inertia_zz=0
      CustomJoint sc2: parent_body=clavicle_1 location_in_parent=(0 0 0) location=(0 0 0)
        Coordinate SC_z: motion_type=rotational default_value=0.0873 range=(0.0873 0.5236) clamped=false
        SpatialTransform: axes_held_at_zero=(rotation1 rotation3 translation1 translation2 translation3)
          TransformAxis rotation2: coordinates=SC_z axis=(0 0 1) LinearFunction(coefficients=1 0)
    Body clavicle_r: mass=0.156 mass_center=(0.0983 0.0167 0.0042) inertia_xx=6.4e-6 inertia_yy=2.63e-5
        inertia_zz=2.43e-5 inertia_xy=-6.7e-6 inertia_xz=-9.5e-6 inertia_yz=2.9e-6 meshes=rclavicle.vtp
      CustomJoint sc3: parent_body=clavicle_2 location_in_parent=(0 0 0) location=(0 0 0)
        Coordinate SC_x: motion_type=rotational default_value=0.5744638 range=(0 1.4486) clamped=false
        SpatialTransform: axes_held_at_zero=(rotation1 rotation2 translation1 translation2 translation3)
          TransformAxis rotation3: coordinates=SC_x axis=(1 0 0) LinearFunction(coefficients=1 0)
    Body scapula_1: mass=0 mass_center=(0 0 0) inertia_xx=0 inertia_yy=0 inertia_zz=0
      CustomJoint ac1: parent_body=clavicle_r location_in_parent=(0.2077 -0.0001 0.0282) location=(0 0 0)
        Coordinate AC_y: motion_type=rotational default_value=0.7953626 range=(0.576 1.2043) clamped=false
        SpatialTransform: axes_held_at_zero=(rotation2 rotation3 translation1 translation2 translation3)
          TransformAxis rotation1: coordinates=AC_y axis=(0 1 0) LinearFunction(coefficients=1 0)
    Body scapula_2: mass=0 mass_center=(0 0 0) inertia_xx=0 inertia_yy=0 inertia_zz=0
      CustomJoint ac2: parent_body=scapula_1 location_in_parent=(0 0 0) location=(0 0 0)
        Coordinate AC_z: motion_type=rotational default_value=0.00799797 range=(-0.3819 0.3491) clamped=false
        SpatialTransform: axes_held_at_zero=(rotation1 rotation3 translation1 translation2 translation3)
          TransformAxis rotation2: coordinates=AC_z axis=(0 0 1) LinearFunction(coefficients=1 0)
    Body scapula_r: mass=0.7054 mass_center=(-0.053 -0.0229 -0.0247) inertia_xx=0.001 inertia_yy=0.001 inertia_zz=0.001
        meshes=rscapula.vtp
      CustomJoint ac3: parent_body=scapula_2 location_in_parent=(0 0 0) location=(0 0 0)
        Coordinate AC_x: motion_type=rotational default_value=-0.2105165 range=(-0.2967 0.3142) clamped=false
        SpatialTransform: axes_held_at_zero=(rotation1 rotation2 translation1 translation2 translation3)
          TransformAxis rotation3: coordinates=AC_x axis=(1 0 0) LinearFunction(coefficients=1 0)
    Body humerus_1: mass=0 mass_center=(0 0 0) inertia_xx=0 inertia_yy=0 inertia_zz=0
      CustomJoint gh1: parent_body=scapula_r location_in_parent=(0.002 -0.023 -0.0439) location=(0 0 0)
        Coordinate GH_y: motion_type=rotational default_value=0.7655775 range=(-2.9671 3.0543) clamped=false
        SpatialTransform: axes_held_at_zero=(rotation1 rotation3 translation1 translation2 translation3)
          TransformAxis rotation2: coordinates=GH_y axis=(0 1 0) LinearFunction(coefficients=1 0)
    Body humerus_2: mass=0 mass_center=(0 0 0) inertia_xx=0 inertia_yy=0 inertia_zz=0
      CustomJoint gh2: parent_body=humerus_1 location_in_parent=(0 0 0) location=(0 0 0)
        Coordinate GH_z: motion_type=rotational default_value=-0.00379958 range=(-0.5236 1.4661) clamped=false
        SpatialTransform: axes_held_at_zero=(rotation1 rotation2 translation1 translation2 translation3)
          TransformAxis rotation3: coordinates=GH_z axis=(0 0 1) LinearFunction(coefficients=1 0)
    Body humerus_r: mass=2.0519 mass_center=(0.0064 -0.0776 -0.0036) inertia_xx=0.0132 inertia_yy=0.001988
        inertia_zz=0.0132 meshes=rhumerus.vtp
      CustomJoint gh3: parent_body=humerus_2 location_in_parent=(0 0 0) location=(0 0 0)
        Coordinate GH_yy: motion_type=rotational default_value=-0.6049077 range=(-1.5184 1.5359) clamped=false
        SpatialTransform: axes_held_at_zero=(rotation1 rotation3 translation1 translation2 translation3)
          TransformAxis rotation2: coordinates=GH_yy axis=(0 1 0) LinearFunction(coefficients=1 0)
      WrapSphere deltoid: xyz_body_rotation=(-0.193033 -0.238063 -0.385718) translation=(0.0022 -0.0009 -0.0018)
          radius=0.0272
      WrapSphere inf_sup_sub: xyz_body_rotation=(-0.193033 -0.238063 -0.385718) translation=(-0.0017 0.0018 -0.0013)
          radius=0.0231
      WrapCylinder infra_cyl: xyz_body_rotation=(1.56643 0.00610865 -0.953124) translation=(0.0054 -0.023 -0.0044)
          quadrant=-x radius=0.014 length=0.12
      WrapCylinder ter_min_cyl: xyz_body_rotation=(1.56643 0.00610865 -1.47672) translation=(0.0054 -0.023 -0.0044)
          quadrant=-x radius=0.015 length=0.1
      WrapCylinder ter_lat_pec: xyz_body_rotation=(1.56643 0.00610865 -0.953124) translation=(0.0057 -0.073 -0.0042)
          radius=0.01 length=0.1
    Body ulna_r: mass=0.5464 mass_center=(-0.0003 -0.0634 -0.0039) inertia_xx=0.0030585 inertia_yy=0.00045325
        inertia_zz=0.0030585 meshes=rulna.vtp
      CustomJoint hu: parent_body=humerus_r location_in_parent=(0.0058 -0.2907 0.0049) location=(0 0 0)
        Coordinate EL_x: motion_type=rotational default_value=0.08726646 range=(0.08726646 2.443461) clamped=false
        SpatialTransform: axes_held_at_zero=(rotation2 rotation3 translation1 translation2 translation3)
          TransformAxis rotation1: coordinates=EL_x axis=(0.9997661 0.008446 -0.019909)
              LinearFunction(coefficients=1 0)
      WrapCylinder elbow: xyz_body_rotation=(-2.51153 1.54654 2.79253) translation=(0 0 0) quadrant=y radius=0.019
          length=0.05
      WrapCylinder elbow_circ: xyz_body_rotation=(0.630064 -1.54654 0) translation=(0 0 0) radius=0.015 length=0.05
      WrapCylinder pron_quad: xyz_body_rotation=(-1.28805 -0.232652 0) translation=(0.0365 -0.2064 -0.0577) quadrant=y
          radius=0.007 length=0.1
    Body radius_r: mass=0.5464 mass_center=(0.0106 -0.1179 -0.0129) inertia_xx=0.0030585 inertia_yy=0.00045325
        inertia_zz=0.0030585 meshes=rradius.vtp
      CustomJoint ur: parent_body=ulna_r location_in_parent=(0.0171 -0.0133 -0.0163) location=(0 0 0)
        Coordinate PS_y: motion_type=rotational default_value=0.08726646 range=(0.08726646 2.792527) clamped=false
        SpatialTransform: axes_held_at_zero=(rotation2 rotation3 translation1 translation2 translation3)
          TransformAxis rotation1: coordinates=PS_y axis=(-0.113295 0.9740588 0.195892)
              LinearFunction(coefficients=1 0)
      WrapCylinder radius: xyz_body_rotation=(-1.61286 -0.202284 -1.77709) translation=(0.0035 -0.0322 -0.0003)
          quadrant=-x radius=0.0092 length=0.2
      WrapCylinder supinator: xyz_body_rotation=(-1.48877 0.00174533 0) translation=(0.0034 -0.1196 -0.0069)
          quadrant=-y radius=0.009 length=0.2
      WrapCylinder ulna_radius: xyz_body_rotation=(1.54095 0.256214 2.67035) translation=(0.0146 -0.0891 0.0003)
          quadrant=-x radius=0.0071 length=0.1
    Body hand_r: mass=0.525 mass_center=(0.0006 -0.0905 -0.0365) inertia_xx=0.0006387 inertia_yy=0.0001904
        inertia_zz=0.0006387 meshes=r_hand.vtp
      WeldJoint rc: parent_body=radius_r location_in_parent=(0.0169 -0.2251 -0.0712) location=(0 0 0)
  ForceSet:
    Schutte1993Muscle_Deprecated trap_scap_4: max_isometric_force=138 optimal_fiber_length=0.0952
        tendon_slack_length=0.053 pennation_angle_at_optimal=0 [radians] activation1=50.75286 activation2=18.69159
      PathPoint P1: thorax (-0.0037 0.0372 0.1214)
      PathPoint P2: scapula_r (-0.0689 0.0119 -0.00094)
      passive_force_length_curve: SimmSpline: x=(-5 0.998 0.999 1 1.1 1.2 1.3 1.4 1.5 1.6 1.601 1.602 5)
          y=(0 0 0 0 0.035 0.12 0.26 0.55 1.17 2 2 2 2)
    Schutte1993Muscle_Deprecated trap_scap10: max_isometric_force=81 optimal_fiber_length=0.1264
        tendon_slack_length=0.035 pennation_angle_at_optimal=0 activation1=50.75286 activation2=18.69159
      PathPoint P1: thorax (0.0102 -0.1479 0.154)
      PathPoint P2: scapula_r (-0.08906 0.00467 -0.00174)
      passive_force_length_curve: SimmSpline: x=(-5 0.998 0.999 1 1.1 1.2 1.3 1.4 1.5 1.6 1.601 1.602 5)
          y=(0 0 0 0 0.035 0.12 0.26 0.55 1.17 2 2 2 2)
    Schutte1993Muscle_Deprecated trap_clav_1: max_isometric_force=97 optimal_fiber_length=0.1547
        tendon_slack_length=0.047 pennation_angle_at_optimal=0 activation1=50.75286 activation2=18.69159
      PathPoint P1: thorax (-0.0097 0.1294 0.1124)
      PathPoint P2: clavicle_r (0.13361 0.02689 0.01208)
      passive_force_length_curve: SimmSpline: x=(-5 0.998 0.999 1 1.1 1.2 1.3 1.4 1.5 1.6 1.601 1.602 5)
          y=(0 0 0 0 0.035 0.12 0.26 0.55 1.17 2 2 2 2)
    Schutte1993Muscle_Deprecated lev_scap_1: max_isometric_force=96 optimal_fiber_length=0.1578
        tendon_slack_length=0.019 pennation_angle_at_optimal=0 activation1=116.1091 activation2=28.81844
      PathPoint P1: thorax (0.0388 0.1479 0.0572)
      PathPoint P2: scapula_r (-0.11566 0.01242 -0.01347)
      passive_force_length_curve: SimmSpline: x=(-5 0.998 0.999 1 1.1 1.2 1.3 1.4 1.5 1.6 1.601 1.602 5)
          y=(0 0 0 0 0.035 0.12 0.26 0.55 1.17 2 2 2 2)
    Schutte1993Muscle_Deprecated pect_min_2: max_isometric_force=107 optimal_fiber_length=0.1086
        tendon_slack_length=0.041 pennation_angle_at_optimal=0 activation1=48.48485 activation2=18.18182
      PathPoint P1: thorax (0.0585 -0.0933 -0.0267)
      PathPoint P2: scapula_r (-0.02865 0.00263 -0.08001)
      passive_force_length_curve: SimmSpline: x=(-5 0.998 0.999 1 1.1 1.2 1.3 1.4 1.5 1.6 1.601 1.602 5)
          y=(0 0 0 0 0.035 0.12 0.26 0.55 1.17 2 2 2 2)
    Schutte1993Muscle_Deprecated rhomboid_3: max_isometric_force=142 optimal_fiber_length=0.1259
        tendon_slack_length=0.032 pennation_angle_at_optimal=0 activation1=93.07359 activation2=25.97403
      PathPoint P1: thorax (0.0054 0.0317 0.1252)
      PathPoint P2: scapula_r (-0.12743 -0.08059 -0.00522)
      passive_force_length_curve: SimmSpline: x=(-5 0.998 0.999 1 1.1 1.2 1.3 1.4 1.5 1.6 1.601 1.602 5)
          y=(0 0 0 0 0.035 0.12 0.26 0.55 1.17 2 2 2 2)
    Schutte1993Muscle_Deprecated serr_ant_2: max_isometric_force=110 optimal_fiber_length=0.1667
        tendon_slack_length=0.009 pennation_angle_at_optimal=0 activation1=116.1091 activation2=28.81844
      PathPoint P1: scapula_r (-0.1232 -0.10995 0.00518)
      PathPoint P2: thorax (0.1327 -0.1884 0.0149)
      PathWrap: wrap_object=serr_ant method=hybrid
      passive_force_length_curve: SimmSpline: x=(-5 0.998 0.999 1 1.1 1.2 1.3 1.4 1.5 1.6 1.601 1.602 5)
          y=(0 0 0 0 0.035 0.12 0.26 0.55 1.17 2 2 2 2)
    Schutte1993Muscle_Deprecated serr_ant_8: max_isometric_force=76 optimal_fiber_length=0.0845
        tendon_slack_length=0.011 pennation_angle_at_optimal=0 activation1=25.90274 activation2=11.97605
      PathPoint P1: scapula_r (-0.11794 -0.01928 -0.00632)
      PathPoint P2: thorax (0.101 0.0023 0.0552)
      PathWrap: wrap_object=serr_ant method=hybrid
      passive_force_length_curve: SimmSpline: x=(-5 0.998 0.999 1 1.1 1.2 1.3 1.4 1.5 1.6 1.601 1.602 5)
          y=(0 0 0 0 0.035 0.12 0.26 0.55 1.17 2 2 2 2)
    Schutte1993Muscle_Deprecated delt_scap_3: max_isometric_force=446 optimal_fiber_length=0.0833
        tendon_slack_length=0.062 pennation_angle_at_optimal=0.08726646 activation1=25.90274 activation2=11.97605
      PathPoint P1: scapula_r (-0.01438 0.00574 -0.00141)
      PathPoint P2: humerus_r (0.01555 -0.09645 0.00528)
      PathWrap: wrap_object=deltoid
      passive_force_length_curve: SimmSpline: x=(-5 0.998 0.999 1 1.1 1.2 1.3 1.4 1.5 1.6 1.601 1.602 5)
          y=(0 0 0 0 0.035 0.12 0.26 0.55 1.17 2 2 2 2)
    Schutte1993Muscle_Deprecated delt_scap10: max_isometric_force=445 optimal_fiber_length=0.0748
        tendon_slack_length=0.064 pennation_angle_at_optimal=0.08726646 activation1=120.0992 activation2=29.15452
      PathPoint P1: scapula_r (0.01771 0.00508 -0.03311)
      PathPoint P2: humerus_r (0.0183 -0.10592 -0.00605)
      PathWrap: wrap_object=deltoid
      passive_force_length_curve: SimmSpline: x=(-5 0.998 0.999 1 1.1 1.2 1.3 1.4 1.5 1.6 1.601 1.602 5)
          y=(0 0 0 0 0.035 0.12 0.26 0.55 1.17 2 2 2 2)
    Schutte1993Muscle_Deprecated delt_clav_2: max_isometric_force=160 optimal_fiber_length=0.094
        tendon_slack_length=0.088 pennation_angle_at_optimal=0.08726646 activation1=79.16934 activation2=23.92344
      PathPoint P1: clavicle_r (0.12912 0.02578 0.00498)
      PathPoint P2: humerus_r (0.01536 -0.11883 -0.01159)
      PathWrap: wrap_object=deltoid
      passive_force_length_curve: SimmSpline: x=(-5 0.998 0.999 1 1.1 1.2 1.3 1.4 1.5 1.6 1.601 1.602 5)
          y=(0 0 0 0 0.035 0.12 0.26 0.55 1.17 2 2 2 2)
    Schutte1993Muscle_Deprecated coracobr_2: max_isometric_force=148 optimal_fiber_length=0.0683
        tendon_slack_length=0.104 pennation_angle_at_optimal=0 activation1=133.3534 activation2=30.58104
      PathPoint P1: scapula_r (-0.01352 -0.01494 -0.07857)
      PathPoint P2: humerus_r (-0.00764 -0.16485 -0.00176)
      passive_force_length_curve: SimmSpline: x=(-5 0.998 0.999 1 1.1 1.2 1.3 1.4 1.5 1.6 1.601 1.602 5)
          y=(0 0 0 0 0.035 0.12 0.26 0.55 1.17 2 2 2 2)
    Schutte1993Muscle_Deprecated infra_4: max_isometric_force=207 optimal_fiber_length=0.0693 tendon_slack_length=0.071
        pennation_angle_at_optimal=0 activation1=133.3534 activation2=30.58104
      PathPoint P1: scapula_r (-0.10911 -0.04946 -0.00122)
      PathPoint P2: humerus_r (0.01605 0.01912 0.00704)
      PathWrap: wrap_object=infra_cyl
      passive_force_length_curve: SimmSpline: x=(-5 1.098 1.099 1.1 1.21 1.32 1.43 1.54 1.65 1.76 1.761 1.762 5)
          y=(0 0 0 0 0.035 0.12 0.26 0.55 1.17 2 2 2 2)
    Schutte1993Muscle_Deprecated ter_min_2: max_isometric_force=195 optimal_fiber_length=0.055
        tendon_slack_length=0.051 pennation_angle_at_optimal=0 activation1=82.95686 activation2=24.57002
      PathPoint P1: scapula_r (-0.06585 -0.06908 -0.00647)
      PathPoint P2: humerus_r (0.02808 -0.00124 0.008)
      PathWrap: wrap_object=ter_min_cyl
      passive_force_length_curve: SimmSpline: x=(-5 1.397 1.399 1.4 1.54 1.68 1.82 1.96 2.1 2.24 2.241 2.243 5)
          y=(0 0 0 0 0.035 0.12 0.26 0.55 1.17 2 2 2 2)
    Schutte1993Muscle_Deprecated ter_maj_3: max_isometric_force=200 optimal_fiber_length=0.1526
        tendon_slack_length=0.015 pennation_angle_at_optimal=0 activation1=98.40426 activation2=26.59574
      PathPoint P1: scapula_r (-0.09123 -0.09007 9e-5)
      PathPoint P2: humerus_r (-0.0038 -0.07838 -0.00899)
      PathWrap: wrap_object=ter_lat_pec
      passive_force_length_curve: SimmSpline: x=(-5 0.998 0.999 1 1.1 1.2 1.3 1.4 1.5 1.6 1.601 1.602 5)
          y=(0 0 0 0 0.035 0.12 0.26 0.55 1.17 2 2 2 2)
    Schutte1993Muscle_Deprecated supra_3: max_isometric_force=258 optimal_fiber_length=0.0564 tendon_slack_length=0.052
        pennation_angle_at_optimal=0 activation1=98.40426 activation2=26.59574
      PathPoint P1: scapula_r (-0.09439 0.02104 -0.02501)
      PathPoint P2: humerus_r (0.01229 0.01923 -0.01372)
      PathWrap: wrap_object=inf_sup_sub
      passive_force_length_curve: SimmSpline: x=(-5 0.998 0.999 1 1.1 1.2 1.3 1.4 1.5 1.6 1.601 1.602 5)
          y=(0 0 0 0 0.035 0.12 0.26 0.55 1.17 2 2 2 2)
    Schutte1993Muscle_Deprecated subscap_6: max_isometric_force=149 optimal_fiber_length=0.0762
        tendon_slack_length=0.077 pennation_angle_at_optimal=0 activation1=78.28785 activation2=23.75297
      PathPoint P1: scapula_r (-0.10583 -0.07907 -0.00359)
      PathPoint P2: humerus_r (0.00177 0.00229 -0.02803)
      PathWrap: wrap_object=inf_sup_sub
      passive_force_length_curve: SimmSpline: x=(-5 0.998 0.999 1 1.1 1.2 1.3 1.4 1.5 1.6 1.601 1.602 5)
          y=(0 0 0 0 0.035 0.12 0.26 0.55 1.17 2 2 2 2)
    Schutte1993Muscle_Deprecated bic_l: max_isometric_force=347 optimal_fiber_length=0.1292 tendon_slack_length=0.2335
        pennation_angle_at_optimal=0 activation1=45.41056 activation2=17.48252
      PathPoint P1: scapula_r (-0.01401 -0.00249 -0.04288)
      PathPoint P2: humerus_r (0.0217 0.0001 -0.0011)
      PathPoint P3: radius_r (-0.00282 -0.03609 -0.01072)
      PathWrap: wrap_object=inf_sup_sub
      PathWrap: wrap_object=radius
      passive_force_length_curve: SimmSpline: x=(-5 1.297 1.299 1.3 1.43 1.56 1.69 1.82 1.95 2.08 2.081 2.083 5)
          y=(0 0 0 0 0.035 0.12 0.26 0.55 1.17 2 2 2 2)
    Schutte1993Muscle_Deprecated bic_b_1: max_isometric_force=173 optimal_fiber_length=0.117 tendon_slack_length=0.1913
        pennation_angle_at_optimal=0 activation1=45.41056 activation2=17.48252
      PathPoint P1: scapula_r (-0.00915 -0.00833 -0.08244)
      PathPoint P2: radius_r (-0.00282 -0.03609 -0.01072)
      PathWrap: wrap_object=radius
      passive_force_length_curve: SimmSpline: x=(-5 1.497 1.498 1.5 1.65 1.8 1.95 2.1 2.25 2.4 2.402 2.403 5)
          y=(0 0 0 0 0.035 0.12 0.26 0.55 1.17 2 2 2 2)
    Schutte1993Muscle_Deprecated tric_long_2: max_isometric_force=296 optimal_fiber_length=0.0881
        tendon_slack_length=0.2193 pennation_angle_at_optimal=0.1745329 activation1=62.32493 activation2=21.0084
      PathPoint P1: ulna_r (-0.00519 -0.01833 0.00596)
      PathPoint P2: scapula_r (-0.02425 -0.04193 -0.03744)
      PathWrap: wrap_object=elbow
      passive_force_length_curve: SimmSpline: x=(-5 1.497 1.498 1.5 1.65 1.8 1.95 2.1 2.25 2.4 2.402 2.403 5)
          y=(0 0 0 0 0.035 0.12 0.26 0.55 1.17 2 2 2 2)
    Schutte1993Muscle_Deprecated lat_dorsi_2: max_isometric_force=88 optimal_fiber_length=0.2857
        tendon_slack_length=0.083 pennation_angle_at_optimal=0 activation1=62.32493 activation2=21.0084
      PathPoint P1: thorax (0.013 -0.1967 0.1482)
      PathPoint P2: humerus_r (0.00213 -0.04447 -0.01724)
      PathWrap: wrap_object=ter_lat_pec
      passive_force_length_curve: SimmSpline: x=(-5 0.998 0.999 1 1.1 1.2 1.3 1.4 1.5 1.6 1.601 1.602 5)
          y=(0 0 0 0 0.035 0.12 0.26 0.55 1.17 2 2 2 2)
    Schutte1993Muscle_Deprecated lat_dorsi_4: max_isometric_force=96 optimal_fiber_length=0.3206
        tendon_slack_length=0.12 pennation_angle_at_optimal=0 activation1=62.32493 activation2=21.0084
      PathPoint P1: thorax (0.0211 -0.3109 0.128)
      PathPoint P2: humerus_r (0.00138 -0.03789 -0.01764)
      PathWrap: wrap_object=ter_lat_pec
      passive_force_length_curve: SimmSpline: x=(-5 0.998 0.999 1 1.1 1.2 1.3 1.4 1.5 1.6 1.601 1.602 5)
          y=(0 0 0 0 0.035 0.12 0.26 0.55 1.17 2 2 2 2)
    Schutte1993Muscle_Deprecated pect_maj_t_3: max_isometric_force=165 optimal_fiber_length=0.1853
        tendon_slack_length=0.053 pennation_angle_at_optimal=0 activation1=78.28785 activation2=23.75297
      PathPoint P1: thorax (0.0084 -0.1223 -0.0348)
      PathPoint P2: humerus_r (0.01078 -0.0738 -0.01675)
      PathWrap: wrap_object=ter_lat_pec
      passive_force_length_curve: SimmSpline: x=(-5 0.998 0.999 1 1.1 1.2 1.3 1.4 1.5 1.6 1.601 1.602 5)
          y=(0 0 0 0 0.035 0.12 0.26 0.55 1.17 2 2 2 2)
    Schutte1993Muscle_Deprecated pect_maj_t_5: max_isometric_force=133 optimal_fiber_length=0.15
        tendon_slack_length=0.026 pennation_angle_at_optimal=0 activation1=112.5165 activation2=28.32861
      PathPoint P1: thorax (0.0071 -0.0418 -0.019)
      PathPoint P2: humerus_r (0.01112 -0.05418 -0.01808)
      PathWrap: wrap_object=ter_lat_pec
      passive_force_length_curve: SimmSpline: x=(-5 0.998 0.999 1 1.1 1.2 1.3 1.4 1.5 1.6 1.601 1.602 5)
          y=(0 0 0 0 0.035 0.12 0.26 0.55 1.17 2 2 2 2)
    Schutte1993Muscle_Deprecated pect_maj_c_2: max_isometric_force=113 optimal_fiber_length=0.1091
        tendon_slack_length=0.014 pennation_angle_at_optimal=0 activation1=45.41056 activation2=17.48252
      PathPoint P1: clavicle_r (0.08276 0.01309 -0.01496)
      PathPoint P2: humerus_r (0.01112 -0.05418 -0.01808)
      PathWrap: wrap_object=ter_lat_pec
      passive_force_length_curve: SimmSpline: x=(-5 0.998 0.999 1 1.1 1.2 1.3 1.4 1.5 1.6 1.601 1.602 5)
          y=(0 0 0 0 0.035 0.12 0.26 0.55 1.17 2 2 2 2)
    Schutte1993Muscle_Deprecated tric_med_4: max_isometric_force=211 optimal_fiber_length=0.0746
        tendon_slack_length=0.0404 pennation_angle_at_optimal=0.1396263 activation1=62.32493 activation2=21.0084
      PathPoint P1: humerus_r (0.00264 -0.19989 0.01615)
      PathPoint P2: ulna_r (-0.01561 -0.00771 0.02364)
      PathWrap: wrap_object=elbow
      passive_force_length_curve: SimmSpline: x=(-5 1.297 1.299 1.3 1.43 1.56 1.69 1.82 1.95 2.08 2.081 2.083 5)
          y=(0 0 0 0 0.035 0.12 0.26 0.55 1.17 2 2 2 2)
    Schutte1993Muscle_Deprecated brachialis_4: max_isometric_force=87 optimal_fiber_length=0.0758
        tendon_slack_length=0.0317 pennation_angle_at_optimal=0 activation1=62.32493 activation2=21.0084
      PathPoint P1: humerus_r (-0.00018 -0.19078 -0.00104)
      PathPoint P2: ulna_r (-0.01581 -0.04166 -0.0046)
      PathWrap: wrap_object=elbow_circ
      passive_force_length_curve: SimmSpline: x=(-5 1.397 1.399 1.4 1.54 1.68 1.82 1.96 2.1 2.24 2.241 2.243 5)
          y=(0 0 0 0 0.035 0.12 0.26 0.55 1.17 2 2 2 2)
    Schutte1993Muscle_Deprecated brachiorad_2: max_isometric_force=82 optimal_fiber_length=0.1613
        tendon_slack_length=0.1197 pennation_angle_at_optimal=0 activation1=62.32493 activation2=21.0084
      PathPoint P1: humerus_r (0.00446 -0.2175 0.01532)
      PathPoint P2: radius_r (0.00812 -0.22513 -0.07037)
      passive_force_length_curve: SimmSpline: x=(-5 1.198 1.199 1.2 1.32 1.44 1.56 1.68 1.8 1.92 1.921 1.922 5)
          y=(0 0 0 0 0.035 0.12 0.26 0.55 1.17 2 2 2 2)
    Schutte1993Muscle_Deprecated pron_teres_1: max_isometric_force=510 optimal_fiber_length=0.061
        tendon_slack_length=0.0851 pennation_angle_at_optimal=0 activation1=62.32493 activation2=21.0084
      PathPoint P1: humerus_r (-0.03769 -0.27686 0.00635)
      PathPoint P2: radius_r (0.02077 -0.10531 0.00781)
      PathPoint P3: radius_r (0.02077 -0.10531 0.00782)
      PathWrap: wrap_object=ulna_radius
      passive_force_length_curve: SimmSpline: x=(-5 1.297 1.299 1.3 1.43 1.56 1.69 1.82 1.95 2.08 2.081 2.083 5)
          y=(0 0 0 0 0.035 0.12 0.26 0.55 1.17 2 2 2 2)
    Schutte1993Muscle_Deprecated pron_teres_2: max_isometric_force=141 optimal_fiber_length=0.0391
        tendon_slack_length=0.0484 pennation_angle_at_optimal=0 activation1=62.32493 activation2=21.0084
      PathPoint P1: ulna_r (-0.0122 -0.02454 -0.01563)
      PathPoint P2: radius_r (0.02229 -0.08157 0.00341)
      PathWrap: wrap_object=ulna_radius
      passive_force_length_curve: SimmSpline: x=(-5 0.998 0.999 1 1.1 1.2 1.3 1.4 1.5 1.6 1.601 1.602 5)
          y=(0 0 0 0 0.035 0.12 0.26 0.55 1.17 2 2 2 2)
    Schutte1993Muscle_Deprecated supinator_3: max_isometric_force=126 optimal_fiber_length=0.0252
        tendon_slack_length=0.015 pennation_angle_at_optimal=0 activation1=62.32493 activation2=21.0084
      PathPoint P1: ulna_r (0.02052 -0.05021 -0.00886)
      PathPoint P2: radius_r (0.01785 -0.05686 0.00441)
      PathWrap: wrap_object=supinator
      passive_force_length_curve: SimmSpline: x=(-5 1.297 1.299 1.3 1.43 1.56 1.69 1.82 1.95 2.08 2.081 2.083 5)
          y=(0 0 0 0 0.035 0.12 0.26 0.55 1.17 2 2 2 2)
    Schutte1993Muscle_Deprecated pron_quad_2: max_isometric_force=178 optimal_fiber_length=0.0386
        tendon_slack_length=0.005 pennation_angle_at_optimal=0 activation1=62.32493 activation2=21.0084
      PathPoint P1: radius_r (0.0165 -0.21195 -0.01749)
      PathPoint P2: ulna_r (0.03146 -0.21573 -0.06108)
      PathWrap: wrap_object=pron_quad
      passive_force_length_curve: SimmSpline: x=(-5 0.998 0.999 1 1.1 1.2 1.3 1.4 1.5 1.6 1.601 1.602 5)
          y=(0 0 0 0 0.035 0.12 0.26 0.55 1.17 2 2 2 2)
    Schutte1993Muscle_Deprecated tric_lat_3: max_isometric_force=219 optimal_fiber_length=0.0656
        tendon_slack_length=0.1911 pennation_angle_at_optimal=0.1745329 activation1=62.32493 activation2=21.0084
      PathPoint P1: humerus_r (0.00631 -0.05495 0.011)
      PathPoint P2: ulna_r (-0.0058 0 0.02015)
      PathWrap: wrap_object=elbow
      passive_force_length_curve: SimmSpline: x=(-5 1.198 1.199 1.2 1.32 1.44 1.56 1.68 1.8 1.92 1.921 1.922 5)
          y=(0 0 0 0 0.035 0.12 0.26 0.55 1.17 2 2 2 2)
    Schutte1993Muscle_Deprecated anconeus_2: max_isometric_force=70 optimal_fiber_length=0.0202
        tendon_slack_length=0.008 pennation_angle_at_optimal=0.2617994 activation1=62.32493 activation2=21.0084
      PathPoint P1: humerus_r (0.01153 -0.29614 0.01149)
      PathPoint P2: ulna_r (0.00769 -0.02394 0.00924)
      passive_force_length_curve: SimmSpline: x=(-5 0.998 0.999 1 1.1 1.2 1.3 1.4 1.5 1.6 1.601 1.602 5)
          y=(0 0 0 0 0.035 0.12 0.26 0.55 1.17 2 2 2 2)
  MarkerSet:
    Marker IJ: thorax (0 0 0)
    Marker C7: thorax (3e-5 0.03263 0.0831)
    Marker T8: thorax (-0.000286 -0.153921 0.102736)
    Marker PX: thorax (0.00101 -0.166225 -0.061392)
    Marker SC: clavicle_r (0 0 0)
    Marker AC: scapula_r (-0.01732 -0.00245 0.00556)
    Marker AI: scapula_r (-0.08348 -0.119581 0.104739)
    Marker TS: scapula_r (-0.097986 -0.010836 0.08112)
    Marker AA: scapula_r (0.00172 -0.001993 0.038889)
    Marker GH: humerus_r (0 0 0)
    Marker EL: humerus_r (0.016211 -0.285686 -0.0028)
    Marker EM: humerus_r (-0.035518 -0.282757 0.00092)
    Marker US: ulna_r (0.025 -0.2534 -0.0113)
    Marker RS: radius_r (0.0583 -0.2351 -0.0217)
  ProbeSet:
    Umberger2010MuscleMetabolicsProbe metabolics: probe_operation=value initial_conditions_for_integration=0
        activation_maintenance_rate_on=false shortening_rate_on=false basal_rate_on=false mechanical_work_rate_on=false
        aerobic_factor=1.5 report_total_metabolics_only=false
      # Aerobic scale factor (S=1.0 for primarily anaerobic conditions and S=1.5 for primarily aerobic conditions. See Umberger et al., (2003).
      Umberger2010MuscleMetabolicsProbe_MetabolicMuscleParameterSet:
        Umberger2010MuscleMetabolicsProbe_MetabolicMuscleParameter [values shared by the 138 below unless stated]: ratio_slow_twitch_fibers=0.5
            use_provided_muscle_mass=true
        Umberger2010MuscleMetabolicsProbe_MetabolicMuscleParameter trap_scap_1: provided_muscle_mass=0.01954 [kg]
        Umberger2010MuscleMetabolicsProbe_MetabolicMuscleParameter trap_scap_2: provided_muscle_mass=0.02161
        Umberger2010MuscleMetabolicsProbe_MetabolicMuscleParameter trap_scap_3: provided_muscle_mass=0.02419
        Umberger2010MuscleMetabolicsProbe_MetabolicMuscleParameter trap_scap_4: provided_muscle_mass=0.01494
        Umberger2010MuscleMetabolicsProbe_MetabolicMuscleParameter trap_scap_5: provided_muscle_mass=0.0128
        Umberger2010MuscleMetabolicsProbe_MetabolicMuscleParameter trap_scap_6: provided_muscle_mass=0.01025
        Umberger2010MuscleMetabolicsProbe_MetabolicMuscleParameter trap_scap_7: provided_muscle_mass=0.00958
        Umberger2010MuscleMetabolicsProbe_MetabolicMuscleParameter trap_scap_8: provided_muscle_mass=0.01212
        Umberger2010MuscleMetabolicsProbe_MetabolicMuscleParameter trap_scap_9: provided_muscle_mass=0.01416
        Umberger2010MuscleMetabolicsProbe_MetabolicMuscleParameter trap_scap10: provided_muscle_mass=0.01158
        Umberger2010MuscleMetabolicsProbe_MetabolicMuscleParameter trap_scap11: provided_muscle_mass=0.01407
        Umberger2010MuscleMetabolicsProbe_MetabolicMuscleParameter trap_clav_1: provided_muscle_mass=0.01712
        Umberger2010MuscleMetabolicsProbe_MetabolicMuscleParameter trap_clav_2: provided_muscle_mass=0.00969
        Umberger2010MuscleMetabolicsProbe_MetabolicMuscleParameter lev_scap_1: provided_muscle_mass=0.01731
        Umberger2010MuscleMetabolicsProbe_MetabolicMuscleParameter lev_scap_2: provided_muscle_mass=0.01544
        Umberger2010MuscleMetabolicsProbe_MetabolicMuscleParameter pect_min_1: provided_muscle_mass=0.00407
        Umberger2010MuscleMetabolicsProbe_MetabolicMuscleParameter pect_min_2: provided_muscle_mass=0.01323
        Umberger2010MuscleMetabolicsProbe_MetabolicMuscleParameter pect_min_3: provided_muscle_mass=0.01303
        Umberger2010MuscleMetabolicsProbe_MetabolicMuscleParameter pect_min_4: provided_muscle_mass=0.0072
        Umberger2010MuscleMetabolicsProbe_MetabolicMuscleParameter rhomboid_1: provided_muscle_mass=0.00575
        Umberger2010MuscleMetabolicsProbe_MetabolicMuscleParameter rhomboid_2: provided_muscle_mass=0.0113
        Umberger2010MuscleMetabolicsProbe_MetabolicMuscleParameter rhomboid_3: provided_muscle_mass=0.02034
        Umberger2010MuscleMetabolicsProbe_MetabolicMuscleParameter rhomboid_4: provided_muscle_mass=0.01176
        Umberger2010MuscleMetabolicsProbe_MetabolicMuscleParameter rhomboid_5: provided_muscle_mass=0.00885
        Umberger2010MuscleMetabolicsProbe_MetabolicMuscleParameter serr_ant_1: provided_muscle_mass=0.01139
        Umberger2010MuscleMetabolicsProbe_MetabolicMuscleParameter serr_ant_2: provided_muscle_mass=0.02083
        Umberger2010MuscleMetabolicsProbe_MetabolicMuscleParameter serr_ant_3: provided_muscle_mass=0.01925
        Umberger2010MuscleMetabolicsProbe_MetabolicMuscleParameter serr_ant_4: provided_muscle_mass=0.01629
        Umberger2010MuscleMetabolicsProbe_MetabolicMuscleParameter serr_ant_5: provided_muscle_mass=0.00909
        Umberger2010MuscleMetabolicsProbe_MetabolicMuscleParameter serr_ant_6: provided_muscle_mass=0.01345
        Umberger2010MuscleMetabolicsProbe_MetabolicMuscleParameter serr_ant_7: provided_muscle_mass=0.00609
        Umberger2010MuscleMetabolicsProbe_MetabolicMuscleParameter serr_ant_8: provided_muscle_mass=0.00729
        Umberger2010MuscleMetabolicsProbe_MetabolicMuscleParameter serr_ant_9: provided_muscle_mass=0.00724
        Umberger2010MuscleMetabolicsProbe_MetabolicMuscleParameter serr_ant10: provided_muscle_mass=0.00476
        Umberger2010MuscleMetabolicsProbe_MetabolicMuscleParameter serr_ant11: provided_muscle_mass=0.00229
        Umberger2010MuscleMetabolicsProbe_MetabolicMuscleParameter serr_ant12: provided_muscle_mass=0.01212
        Umberger2010MuscleMetabolicsProbe_MetabolicMuscleParameter delt_scap_1: provided_muscle_mass=0.03703
        Umberger2010MuscleMetabolicsProbe_MetabolicMuscleParameter delt_scap_2: provided_muscle_mass=0.02269
        Umberger2010MuscleMetabolicsProbe_MetabolicMuscleParameter delt_scap_3: provided_muscle_mass=0.04214
        Umberger2010MuscleMetabolicsProbe_MetabolicMuscleParameter delt_scap_4: provided_muscle_mass=0.00888
        Umberger2010MuscleMetabolicsProbe_MetabolicMuscleParameter delt_scap_5: provided_muscle_mass=0.00891
        Umberger2010MuscleMetabolicsProbe_MetabolicMuscleParameter delt_scap_6: provided_muscle_mass=0.02485
        Umberger2010MuscleMetabolicsProbe_MetabolicMuscleParameter delt_scap_7: provided_muscle_mass=0.01275
        Umberger2010MuscleMetabolicsProbe_MetabolicMuscleParameter delt_scap_8: provided_muscle_mass=0.0173
        Umberger2010MuscleMetabolicsProbe_MetabolicMuscleParameter delt_scap_9: provided_muscle_mass=0.02378
        Umberger2010MuscleMetabolicsProbe_MetabolicMuscleParameter delt_scap10: provided_muscle_mass=0.0379
        Umberger2010MuscleMetabolicsProbe_MetabolicMuscleParameter delt_scap11: provided_muscle_mass=0.02012
        Umberger2010MuscleMetabolicsProbe_MetabolicMuscleParameter delt_clav_1: provided_muscle_mass=0.01217
        Umberger2010MuscleMetabolicsProbe_MetabolicMuscleParameter delt_clav_2: provided_muscle_mass=0.01701
        Umberger2010MuscleMetabolicsProbe_MetabolicMuscleParameter delt_clav_3: provided_muscle_mass=0.00983
        Umberger2010MuscleMetabolicsProbe_MetabolicMuscleParameter delt_clav_4: provided_muscle_mass=0.01259
        Umberger2010MuscleMetabolicsProbe_MetabolicMuscleParameter coracobr_1: provided_muscle_mass=0.01506
        Umberger2010MuscleMetabolicsProbe_MetabolicMuscleParameter coracobr_2: provided_muscle_mass=0.01151
        Umberger2010MuscleMetabolicsProbe_MetabolicMuscleParameter coracobr_3: provided_muscle_mass=0.00939
        Umberger2010MuscleMetabolicsProbe_MetabolicMuscleParameter infra_1: provided_muscle_mass=0.01961
        Umberger2010MuscleMetabolicsProbe_MetabolicMuscleParameter infra_2: provided_muscle_mass=0.02245
        Umberger2010MuscleMetabolicsProbe_MetabolicMuscleParameter infra_3: provided_muscle_mass=0.01488
        Umberger2010MuscleMetabolicsProbe_MetabolicMuscleParameter infra_4: provided_muscle_mass=0.01631
        Umberger2010MuscleMetabolicsProbe_MetabolicMuscleParameter infra_5: provided_muscle_mass=0.02414
        Umberger2010MuscleMetabolicsProbe_MetabolicMuscleParameter infra_6: provided_muscle_mass=0.01564
        Umberger2010MuscleMetabolicsProbe_MetabolicMuscleParameter ter_min_1: provided_muscle_mass=0.00714
        Umberger2010MuscleMetabolicsProbe_MetabolicMuscleParameter ter_min_2: provided_muscle_mass=0.01221
        Umberger2010MuscleMetabolicsProbe_MetabolicMuscleParameter ter_min_3: provided_muscle_mass=0.01041
        Umberger2010MuscleMetabolicsProbe_MetabolicMuscleParameter ter_maj_1: provided_muscle_mass=0.02643
        Umberger2010MuscleMetabolicsProbe_MetabolicMuscleParameter ter_maj_2: provided_muscle_mass=0.01549
        Umberger2010MuscleMetabolicsProbe_MetabolicMuscleParameter ter_maj_3: provided_muscle_mass=0.03481
        Umberger2010MuscleMetabolicsProbe_MetabolicMuscleParameter ter_maj_4: provided_muscle_mass=0.01971
        Umberger2010MuscleMetabolicsProbe_MetabolicMuscleParameter supra_1: provided_muscle_mass=0.0074
        Umberger2010MuscleMetabolicsProbe_MetabolicMuscleParameter supra_2: provided_muscle_mass=0.00756
        Umberger2010MuscleMetabolicsProbe_MetabolicMuscleParameter supra_3: provided_muscle_mass=0.01651
        Umberger2010MuscleMetabolicsProbe_MetabolicMuscleParameter supra_4: provided_muscle_mass=0.00819
        Umberger2010MuscleMetabolicsProbe_MetabolicMuscleParameter subscap_1: provided_muscle_mass=0.00281
        Umberger2010MuscleMetabolicsProbe_MetabolicMuscleParameter subscap_2: provided_muscle_mass=0.00575
        Umberger2010MuscleMetabolicsProbe_MetabolicMuscleParameter subscap_3: provided_muscle_mass=0.02021
        Umberger2010MuscleMetabolicsProbe_MetabolicMuscleParameter subscap_4: provided_muscle_mass=0.02376
        Umberger2010MuscleMetabolicsProbe_MetabolicMuscleParameter subscap_5: provided_muscle_mass=0.01033
        Umberger2010MuscleMetabolicsProbe_MetabolicMuscleParameter subscap_6: provided_muscle_mass=0.01292
        Umberger2010MuscleMetabolicsProbe_MetabolicMuscleParameter subscap_7: provided_muscle_mass=0.01513
        Umberger2010MuscleMetabolicsProbe_MetabolicMuscleParameter subscap_8: provided_muscle_mass=0.00532
        Umberger2010MuscleMetabolicsProbe_MetabolicMuscleParameter subscap_9: provided_muscle_mass=0.0182
        Umberger2010MuscleMetabolicsProbe_MetabolicMuscleParameter subscap10: provided_muscle_mass=0.00361
        Umberger2010MuscleMetabolicsProbe_MetabolicMuscleParameter subscap11: provided_muscle_mass=0.00115
        Umberger2010MuscleMetabolicsProbe_MetabolicMuscleParameter bic_l: provided_muscle_mass=0.0662
        Umberger2010MuscleMetabolicsProbe_MetabolicMuscleParameter bic_b_1: provided_muscle_mass=0.02079
        Umberger2010MuscleMetabolicsProbe_MetabolicMuscleParameter bic_b_2: provided_muscle_mass=0.03107
        Umberger2010MuscleMetabolicsProbe_MetabolicMuscleParameter tric_long_1: provided_muscle_mass=0.02697
        Umberger2010MuscleMetabolicsProbe_MetabolicMuscleParameter tric_long_2: provided_muscle_mass=0.02955
        Umberger2010MuscleMetabolicsProbe_MetabolicMuscleParameter tric_long_3: provided_muscle_mass=0.02964
        Umberger2010MuscleMetabolicsProbe_MetabolicMuscleParameter tric_long_4: provided_muscle_mass=0.03203
        Umberger2010MuscleMetabolicsProbe_MetabolicMuscleParameter lat_dorsi_1: provided_muscle_mass=0.01498
        Umberger2010MuscleMetabolicsProbe_MetabolicMuscleParameter lat_dorsi_2: provided_muscle_mass=0.02883
        Umberger2010MuscleMetabolicsProbe_MetabolicMuscleParameter lat_dorsi_3: provided_muscle_mass=0.04305
        Umberger2010MuscleMetabolicsProbe_MetabolicMuscleParameter lat_dorsi_4: provided_muscle_mass=0.03515
        Umberger2010MuscleMetabolicsProbe_MetabolicMuscleParameter lat_dorsi_5: provided_muscle_mass=0.03157
        Umberger2010MuscleMetabolicsProbe_MetabolicMuscleParameter lat_dorsi_6: provided_muscle_mass=0.04069
        Umberger2010MuscleMetabolicsProbe_MetabolicMuscleParameter pect_maj_t_1: provided_muscle_mass=0.02692
        Umberger2010MuscleMetabolicsProbe_MetabolicMuscleParameter pect_maj_t_2: provided_muscle_mass=0.02448
        Umberger2010MuscleMetabolicsProbe_MetabolicMuscleParameter pect_maj_t_3: provided_muscle_mass=0.03475
        Umberger2010MuscleMetabolicsProbe_MetabolicMuscleParameter pect_maj_t_4: provided_muscle_mass=0.03301
        Umberger2010MuscleMetabolicsProbe_MetabolicMuscleParameter pect_maj_t_5: provided_muscle_mass=0.02273
        Umberger2010MuscleMetabolicsProbe_MetabolicMuscleParameter pect_maj_t_6: provided_muscle_mass=0.03243
        Umberger2010MuscleMetabolicsProbe_MetabolicMuscleParameter pect_maj_c_1: provided_muscle_mass=0.02769
        Umberger2010MuscleMetabolicsProbe_MetabolicMuscleParameter pect_maj_c_2: provided_muscle_mass=0.01399
        Umberger2010MuscleMetabolicsProbe_MetabolicMuscleParameter tric_med_1: provided_muscle_mass=0.0184
        Umberger2010MuscleMetabolicsProbe_MetabolicMuscleParameter tric_med_2: provided_muscle_mass=0.01765
        Umberger2010MuscleMetabolicsProbe_MetabolicMuscleParameter tric_med_3: provided_muscle_mass=0.01195
        Umberger2010MuscleMetabolicsProbe_MetabolicMuscleParameter tric_med_4: provided_muscle_mass=0.01395
        Umberger2010MuscleMetabolicsProbe_MetabolicMuscleParameter tric_med_5: provided_muscle_mass=0.0077
        Umberger2010MuscleMetabolicsProbe_MetabolicMuscleParameter brachialis_1: provided_muscle_mass=0.0291
        Umberger2010MuscleMetabolicsProbe_MetabolicMuscleParameter brachialis_2: provided_muscle_mass=0.0159
        Umberger2010MuscleMetabolicsProbe_MetabolicMuscleParameter brachialis_3: provided_muscle_mass=0.01465
        Umberger2010MuscleMetabolicsProbe_MetabolicMuscleParameter brachialis_4: provided_muscle_mass=0.007
        Umberger2010MuscleMetabolicsProbe_MetabolicMuscleParameter brachialis_5: provided_muscle_mass=0.0066
        Umberger2010MuscleMetabolicsProbe_MetabolicMuscleParameter brachialis_6: provided_muscle_mass=0.0041
        Umberger2010MuscleMetabolicsProbe_MetabolicMuscleParameter brachialis_7: provided_muscle_mass=0.0065
        Umberger2010MuscleMetabolicsProbe_MetabolicMuscleParameter brachiorad_1: provided_muscle_mass=0.0047
        Umberger2010MuscleMetabolicsProbe_MetabolicMuscleParameter brachiorad_2: provided_muscle_mass=0.014
        Umberger2010MuscleMetabolicsProbe_MetabolicMuscleParameter brachiorad_3: provided_muscle_mass=0.00597
        Umberger2010MuscleMetabolicsProbe_MetabolicMuscleParameter pron_teres_1: provided_muscle_mass=0.0275
        Umberger2010MuscleMetabolicsProbe_MetabolicMuscleParameter pron_teres_2: provided_muscle_mass=0.00433
        Umberger2010MuscleMetabolicsProbe_MetabolicMuscleParameter supinator_1: provided_muscle_mass=0.00084
        Umberger2010MuscleMetabolicsProbe_MetabolicMuscleParameter supinator_2: provided_muscle_mass=0.00364
        Umberger2010MuscleMetabolicsProbe_MetabolicMuscleParameter supinator_3: provided_muscle_mass=0.00336
        Umberger2010MuscleMetabolicsProbe_MetabolicMuscleParameter supinator_4: provided_muscle_mass=0.00296
        Umberger2010MuscleMetabolicsProbe_MetabolicMuscleParameter supinator_5: provided_muscle_mass=0.00676
        Umberger2010MuscleMetabolicsProbe_MetabolicMuscleParameter pron_quad_1: provided_muscle_mass=0.00163
        Umberger2010MuscleMetabolicsProbe_MetabolicMuscleParameter pron_quad_2: provided_muscle_mass=0.00347
        Umberger2010MuscleMetabolicsProbe_MetabolicMuscleParameter pron_quad_3: provided_muscle_mass=0.00493
        Umberger2010MuscleMetabolicsProbe_MetabolicMuscleParameter tric_lat_1: provided_muscle_mass=0.0125
        Umberger2010MuscleMetabolicsProbe_MetabolicMuscleParameter tric_lat_2: provided_muscle_mass=0.0332
        Umberger2010MuscleMetabolicsProbe_MetabolicMuscleParameter tric_lat_3: provided_muscle_mass=0.0152
        Umberger2010MuscleMetabolicsProbe_MetabolicMuscleParameter tric_lat_4: provided_muscle_mass=0.0162
        Umberger2010MuscleMetabolicsProbe_MetabolicMuscleParameter tric_lat_5: provided_muscle_mass=0.00585
        Umberger2010MuscleMetabolicsProbe_MetabolicMuscleParameter anconeus_1: provided_muscle_mass=0.00083
        Umberger2010MuscleMetabolicsProbe_MetabolicMuscleParameter anconeus_2: provided_muscle_mass=0.0015
        Umberger2010MuscleMetabolicsProbe_MetabolicMuscleParameter anconeus_3: provided_muscle_mass=0.0006
        Umberger2010MuscleMetabolicsProbe_MetabolicMuscleParameter anconeus_4: provided_muscle_mass=0.0022
        Umberger2010MuscleMetabolicsProbe_MetabolicMuscleParameter anconeus_5: provided_muscle_mass=0.00333
