# OpenSim document version 30000
Model DAS4:
  length_units: meters
  force_units: N
  gravity: 0 -9.80665 0
  credits:
    Model constructed by Dimitra Blana, based on the Delft shoulder and elbow model [1] and Wendy Murray's hand model [2]. Segment dimensions and inertial properties, joint locations and muscle properties obtained from Breteler et al. [3] This model is to be used for visualizing the results of the Dynamic Arm Simulator [4], not for simulations.
  publications:
    [1] Blana D, Hincapie JG, Chadwick EK, Kirsch RF. A musculoskeletal model of the upper extremity for use in the development of neuroprosthetic systems. J Biomech 41(8):1714–21, 2008.
    [2] Blana D, Chadwick EK, van den Bogert AJ, Murray WM. Real-time simulation of hand motion for prosthesis control. Comput Methods Biomech Biomed Engin, 1-10, 2016.
    [3] Breteler KMD, Spoor CW, Van der Helm FC. Measuring muscle and joint geometry parameters of a shoulder for modeling purposes. J Biomech 32:1191–7, 1999.
    [4] Chadwick EK, Blana D, Kirsch RF, van den Bogert A.Real-Time Simulation of Three-Dimensional Shoulder Girdle and Arm Dynamics. IEEE Trans Biomed Eng, 61(7), 1947–1956, 2014.
  BodySet:
    Body ground: mass=0 mass_center=(0 0 0) inertia_xx=0 inertia_yy=0 inertia_zz=0
    Body thorax: mass=20 mass_center=(0 -0.1486 0.0591) inertia_xx=1.29841 inertia_yy=0.55245 inertia_zz=1.29841
        meshes=(ground_ribs.vtp ground_spine.vtp ground_skull.vtp ground_jaw.vtp)
      CustomJoint base: parent_body=ground location_in_parent=(0 0 0) location=(0 0 0)
        Coordinate TH_x: motion_type=rotational default_value=0 range=(-0.5235988 0.5235988) clamped=false
        Coordinate TH_y: motion_type=rotational default_value=0 range=(-1.570796 1.570796) clamped=false
        Coordinate TH_z: motion_type=rotational default_value=0 range=(-0.5235988 0.5235988) clamped=false
        Coordinate TH_tx: motion_type=translational default_value=0 range=(-1 1) clamped=false
        Coordinate TH_ty: motion_type=translational default_value=0 range=(-1 1) clamped=false
        Coordinate TH_tz: motion_type=translational default_value=0 range=(-1 1) clamped=false
        SpatialTransform:
          TransformAxis rotation1: coordinates=TH_x axis=(1 0 0) LinearFunction(coefficients=1 0)
          TransformAxis rotation2: coordinates=TH_y axis=(0 1 0) LinearFunction(coefficients=1 0)
          TransformAxis rotation3: coordinates=TH_z axis=(0 0 1) LinearFunction(coefficients=1 0)
          TransformAxis translation1: coordinates=TH_tx axis=(1 0 0) LinearFunction(coefficients=1 0)
          TransformAxis translation2: coordinates=TH_ty axis=(0 1 0) LinearFunction(coefficients=1 0)
          TransformAxis translation3: coordinates=TH_tz axis=(0 0 1) LinearFunction(coefficients=1 0)
      WrapEllipsoid serr_ant: translation=(0 -0.1486 0.0591) dimensions=(0.147 0.2079 0.0944)
    Body clavicle_1: mass=0 mass_center=(0 0 0) inertia_xx=0 inertia_yy=0 inertia_zz=0
      CustomJoint sc1: parent_body=thorax location_in_parent=(0.0014 -0.0152 0.0028) location=(0 0 0)
        Coordinate SC_y: motion_type=rotational default_value=-0.5844408 range=(-1.1345 -0.3316) clamped=false
        SpatialTransform: axes_held_at_zero=(rotation2 rotation3 translation1 translation2 translation3)
          TransformAxis rotation1: coordinates=SC_y axis=(0 1 0) LinearFunction(coefficients=1 0)
    Body clavicle_2: mass=0 mass_center=(0 0 0) inertia_xx=0 inertia_yy=0 inertia_zz=0
      CustomJoint sc2: parent_body=clavicle_1 location_in_parent=(0 0 0) location=(0 0 0)
        Coordinate SC_z: motion_type=rotational default_value=0.0873 range=(0.0873 0.5236) clamped=false
        SpatialTransform: axes_held_at_zero=(rotation1 rotation3 translation1 translation2 translation3)
          TransformAxis rotation2: coordinates=SC_z axis=(0 0 1) LinearFunction(coefficients=1 0)
    Body clavicle_r: mass=0.156 mass_center=(0.0983 0.0167 0.0042) inertia_xx=6.4e-6 inertia_yy=2.63e-5
        inertia_zz=2.43e-5 inertia_xy=-6.7e-6 inertia_xz=-9.5e-6 inertia_yz=2.9e-6 meshes=rclavicle.vtp
      CustomJoint sc3: parent_body=clavicle_2 location_in_parent=(0 0 0) location=(0 0 0)
        Coordinate SC_x: motion_type=rotational default_value=0.5744638 range=(0 1.4486) clamped=false
        SpatialTransform: axes_held_at_zero=(rotation1 rotation2 translation1 translation2 translation3)
          TransformAxis rotation3: coordinates=SC_x axis=(1 0 0) LinearFunction(coefficients=1 0)
    Body scapula_1: mass=0 mass_center=(0 0 0) inertia_xx=0 inertia_yy=0 inertia_zz=0
      CustomJoint ac1: parent_body=clavicle_r location_in_parent=(0.2077 -0.0001 0.0282) location=(0 0 0)
        Coordinate AC_y: motion_type=rotational default_value=0.7953626 range=(0.576 1.2043) clamped=false
        SpatialTransform: axes_held_at_zero=(rotation2 rotation3 translation1 translation2 translation3)
          TransformAxis rotation1: coordinates=AC_y axis=(0 1 0) LinearFunction(coefficients=1 0)
    Body scapula_2: mass=0 mass_center=(0 0 0) inertia_xx=0 inertia_yy=0 inertia_zz=0
      CustomJoint ac2: parent_body=scapula_1 location_in_parent=(0 0 0) location=(0 0 0)
        Coordinate AC_z: motion_type=rotational default_value=0.00799797 range=(-0.3819 0.3491) clamped=false
        SpatialTransform: axes_held_at_zero=(rotation1 rotation3 translation1 translation2 translation3)
          TransformAxis rotation2: coordinates=AC_z axis=(0 0 1) LinearFunction(coefficients=1 0)
    Body scapula_r: mass=0.7054 mass_center=(-0.053 -0.0229 -0.0247) inertia_xx=0.001 inertia_yy=0.001 inertia_zz=0.001
        meshes=rscapula.vtp
      CustomJoint ac3: parent_body=scapula_2 location_in_parent=(0 0 0) location=(0 0 0)
        Coordinate AC_x: motion_type=rotational default_value=-0.2105165 range=(-0.2967 0.3142) clamped=false
        SpatialTransform: axes_held_at_zero=(rotation1 rotation2 translation1 translation2 translation3)
          TransformAxis rotation3: coordinates=AC_x axis=(1 0 0) LinearFunction(coefficients=1 0)
    Body humerus_1: mass=0 mass_center=(0 0 0) inertia_xx=0 inertia_yy=0 inertia_zz=0
      CustomJoint gh1: parent_body=scapula_r location_in_parent=(0.002 -0.023 -0.0439) location=(0 0 0)
        Coordinate GH_y: motion_type=rotational default_value=0.7655775 range=(-2.9671 3.0543) clamped=false
        SpatialTransform: axes_held_at_zero=(rotation1 rotation3 translation1 translation2 translation3)
          TransformAxis rotation2: coordinates=GH_y axis=(0 1 0) LinearFunction(coefficients=1 0)
    Body humerus_2: mass=0 mass_center=(0 0 0) inertia_xx=0 inertia_yy=0 inertia_zz=0
      CustomJoint gh2: parent_body=humerus_1 location_in_parent=(0 0 0) location=(0 0 0)
        Coordinate GH_z: motion_type=rotational default_value=-0.00379958 range=(-0.5236 1.4661) clamped=false
        SpatialTransform: axes_held_at_zero=(rotation1 rotation2 translation1 translation2 translation3)
          TransformAxis rotation3: coordinates=GH_z axis=(0 0 1) LinearFunction(coefficients=1 0)
    Body humerus_r: mass=2.0519 mass_center=(0.0064 -0.0776 -0.0036) inertia_xx=0.0132 inertia_yy=0.001988
        inertia_zz=0.0132 meshes=rhumerus.vtp
      CustomJoint gh3: parent_body=humerus_2 location_in_parent=(0 0 0) location=(0 0 0)
        Coordinate GH_yy: motion_type=rotational default_value=-0.6049077 range=(-1.5184 1.5359) clamped=false
        SpatialTransform: axes_held_at_zero=(rotation1 rotation3 translation1 translation2 translation3)
          TransformAxis rotation2: coordinates=GH_yy axis=(0 1 0) LinearFunction(coefficients=1 0)
      WrapSphere deltoid: xyz_body_rotation=(-0.193033 -0.238063 -0.385718) translation=(0.0022 -0.0009 -0.0018)
          radius=0.0272
      WrapSphere inf_sup_sub: xyz_body_rotation=(-0.193033 -0.238063 -0.385718) translation=(-0.0017 0.0018 -0.0013)
          radius=0.0231
      WrapCylinder infra_cyl: xyz_body_rotation=(1.56643 0.00610865 -0.953124) translation=(0.0054 -0.023 -0.0044)
          quadrant=-x radius=0.014 length=0.12
      WrapCylinder ter_min_cyl: xyz_body_rotation=(1.56643 0.00610865 -1.47672) translation=(0.0054 -0.023 -0.0044)
          quadrant=-x radius=0.015 length=0.1
      WrapCylinder ter_lat_pec: xyz_body_rotation=(1.56643 0.00610865 -0.953124) translation=(0.0057 -0.073 -0.0042)
          radius=0.01 length=0.1
      WrapEllipsoid Elbow_PT_ECRL: xyz_body_rotation=(0.61453 -0.110828 0.161094) translation=(-0.0069 -0.2872 -0.003)
          quadrant=-z dimensions=(0.035 0.025 0.018)
    Body ulna_r: mass=0.5464 mass_center=(-0.0003 -0.0634 -0.0039) inertia_xx=0.0030585 inertia_yy=0.00045325
        inertia_zz=0.0030585 meshes=rulna.vtp
      CustomJoint hu: parent_body=humerus_r location_in_parent=(-0.0123 -0.2904 -0.0061) location=(0 0 0)
        Coordinate EL_x: motion_type=rotational default_value=0 range=(0 2.443461) clamped=false
        SpatialTransform: axes_held_at_zero=(rotation2 rotation3 translation1 translation2 translation3)
          TransformAxis rotation1: coordinates=EL_x axis=(0.9981083 0.03660001 -0.04940001)
              LinearFunction(coefficients=1 0)
      WrapCylinder elbow: xyz_body_rotation=(-2.51153 1.54654 2.79253) translation=(0 0 0) quadrant=y radius=0.019
          length=0.05
      WrapCylinder elbow_circ: xyz_body_rotation=(0.630064 -1.54654 0) translation=(0 0 0) radius=0.015 length=0.05
      WrapCylinder pron_q_cyl: xyz_body_rotation=(-1.6967 -0.07342 1.5708) translation=(0.023411 -0.21309 -0.014823)
          radius=0.007 length=0.1
      WrapCylinder PQ2: xyz_body_rotation=(1.64086 0.178989 -0.0608388) translation=(0.0428 -0.2092 0.0012)
          radius=0.007 length=0.01
    Body radius_r: mass=0.5464 mass_center=(0.0106 -0.1179 -0.0129) inertia_xx=0.0030585 inertia_yy=0.00045325
        inertia_zz=0.0030585 meshes=rradius.vtp
      CustomJoint ur: parent_body=ulna_r location_in_parent=(0.02 -0.011503 -0.0004) location=(0 0 0)
        Coordinate PS_y: motion_type=rotational default_value=0 range=(-1.570796 1.570796) clamped=false
        SpatialTransform: axes_held_at_zero=(rotation1 rotation3 translation1 translation2 translation3)
          TransformAxis rotation2: axis=(-0.119668 0.9926656 0.01716099) coordinates=PS_y
              LinearFunction(coefficients=1 0)
      WrapCylinder bic_radius_cyl: xyz_body_rotation=(-1.618 -0.083302 1.5708)
          translation=(0.00758 -0.035184 -0.00067939) radius=0.0092 length=0.2
      WrapCylinder sup_cyl: xyz_body_rotation=(-1.5414 0.080333 1.5708) translation=(0.016929 -0.12214 -0.0063517)
          radius=0.009 length=0.2
      WrapCylinder pron_t_cyl: xyz_body_rotation=(1.6096 0.75855 1.5708) translation=(0.025243 -0.090373 -0.00073221)
          radius=0.0071 length=0.06
      WrapTorus ECU: xyz_body_rotation=(-1.3929 0.576866 1.69575) translation=(0.0349 -0.2417 0.0163)
          inner_radius=0.006 outer_radius=0.009
      WrapCylinder PQ1: xyz_body_rotation=(-2.69025 -0.0127409 1.60762) translation=(0.0288 -0.1986 -0.0281)
          radius=0.01 length=0.01
    Body proximal_row: mass=0.0001 mass_center=(0 0 0) inertia_xx=1e-5 inertia_yy=1e-5 inertia_zz=-1e-5
        meshes=(lunate.vtp sdfastSCAPHOIDw.vtp sdfastPISIFORMw.vtp sdfastTRIQUETRALw.vtp)
      CustomJoint radiocarpal: parent_body=radius_r location_in_parent=(0.025 -0.242 -0.018) location=(0 0 0)
        Coordinate deviation: motion_type=rotational default_value=0 range=(-0.1745329 0.4363323) clamped=false
        Coordinate flexion: motion_type=coupled default_value=0 range=(-1.22173 1.22173) clamped=false
        SpatialTransform: axes_held_at_zero=(rotation2 translation1 translation2 translation3)
          TransformAxis rotation1: coordinates=deviation axis=(-0.557444 -0.135611 0.819064)
              LinearFunction(coefficients=1 0)
          TransformAxis rotation3: coordinates=flexion axis=(0.147104 -0.2522069 -0.9564267)
            SimmSpline: x=(-1.5708 1.5708) y=(-0.785398 0.785398)
      WrapEllipsoid Extensor_ellipse: xyz_body_rotation=(0.2328269 0.2855359 0.2508038)
          translation=(0.0047 -0.0135 -0.0007) quadrant=x dimensions=(0.013 0.02 0.05)
      WrapTorus ECRL: xyz_body_rotation=(1.80531 0.0315751 -0.84722) translation=(0.0208 -0.0096 -0.0222)
          inner_radius=0.008 outer_radius=0.016
      WrapTorus ECRB: xyz_body_rotation=(1.44899 0.256305 -1.65601) translation=(0.0186 -0.0095 -0.0126)
          inner_radius=0.008 outer_radius=0.01
      WrapTorus FCR: xyz_body_rotation=(-1.41754 0.0146614 1.46852) translation=(-0.019 -0.0045 -0.0032)
          inner_radius=0.001 outer_radius=0.0025
      WrapTorus FCU: xyz_body_rotation=(-1.49103 -0.00295763 1.96338) translation=(-0.0171 -0.0124 0.0123)
          inner_radius=0.0068 outer_radius=0.008
      WrapEllipsoid PL: xyz_body_rotation=(0.06335545 0.0996583 0.03159046) translation=(-0.0041 -0.018 -0.0057)
          quadrant=-x dimensions=(0.012 0.014 0.025)
      WrapEllipsoid FDS: xyz_body_rotation=(-0.01710423-0.08168141 -0.00837758) translation=(-0.0003 -0.0057 -0.0012)
          quadrant=-x dimensions=(0.012 0.013 0.025)
      WrapEllipsoid FDP: xyz_body_rotation=(0.121824 -0.1946042 1.467473) translation=(0.0032 -0.0069 0.0022)
          quadrant=y dimensions=(0.012 0.013 0.025)
      WrapTorus EDCL: xyz_body_rotation=(1.8423 -0.773721 -1.64779) translation=(0.0148 -0.0133 0.0128)
          inner_radius=0.008 outer_radius=0.012
      WrapTorus EDCR: xyz_body_rotation=(1.68049 -0.410907 -1.00376) translation=(0.0166 -0.0137 0.0098)
          inner_radius=0.009 outer_radius=0.011
      WrapTorus EDCM: xyz_body_rotation=(1.78722 -0.413613 -1.11439) translation=(0.0191 -0.0117 0.0007)
          inner_radius=0.009 outer_radius=0.012
      WrapTorus EDCI: xyz_body_rotation=(1.66123 -0.126372 -1.55169) translation=(0.0211 -0.0149 -0.009)
          inner_radius=0.009 outer_radius=0.012
      WrapEllipsoid EDM: xyz_body_rotation=(0.1179843 0.1593486 -2.962696) translation=(0.0048 -0.0022 0.0167)
          quadrant=-x dimensions=(0.008 0.014 0.018)
      WrapEllipsoid FPL: xyz_body_rotation=(-0.06597345 -0.08220501 0.1663299) translation=(-0.0033 -0.025 -0.017)
          quadrant=-x dimensions=(0.01 0.01 0.016)
    Body palm: mass=0.46484 mass_center=(0.003777 -0.038867 0.006668) inertia_xx=0.00015 inertia_yy=6e-5
        inertia_zz=-0.00011
        meshes=(sdfast_1seg_hand_fr_c_5mc.vtp sdfast_1seg_hand_fr_c_4mc.vtp sdfast_1seg_hand_fr_c_3mc.vtp sdfast_1seg_hand_fr_c_2mc.vtp sdfast_1seg_hand_fr_c_trapezium.vtp sdfast_1seg_hand_fr_c_trapezoid.vtp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)
      CustomJoint proximal_distal: parent_body=proximal_row location_in_parent=(0.002327 -0.015054 -0.003992)
          location=(0 0 0)
        Coordinate proximal_distal_r1: motion_type=rotational default_value=0 range=(-99999.9 99999.9) clamped=false
        Coordinate proximal_distal_r3: motion_type=rotational default_value=-0.6108652 range=(-99999.9 99999.9)
            clamped=false
        SpatialTransform: axes_held_at_zero=(rotation2 translation1 translation2 translation3)
          TransformAxis rotation1: coordinates=proximal_distal_r1 axis=(-0.2640399 -0.3490529 -0.8991357)
              LinearFunction(coefficients=1 0)
          TransformAxis rotation3: coordinates=proximal_distal_r3 axis=(-0.07510096 0.01069999 -0.9971185)
              LinearFunction(coefficients=1 0)
      WrapCylinder _2rdmcp_FDS: xyz_body_rotation=(3.10199 0.0585652 1.57091) translation=(0.0087 -0.0659 -0.0182)
          quadrant=y radius=0.013 length=0.01
      WrapCylinder _2rdmcp_FDP: xyz_body_rotation=(3.10199 0.0585652 1.5011) translation=(0.0087 -0.0659 -0.0182)
          quadrant=y radius=0.0105 length=0.01
      WrapCylinder _2rdmcp_ext: xyz_body_rotation=(3.10199 0.0585652 1.74544) translation=(0.0087 -0.0659 -0.0182)
          quadrant=-y radius=0.01 length=0.01
      WrapCylinder _3rdmcp_FDS: xyz_body_rotation=(2.97105 0.173139 -0.785571) translation=(0.0092 -0.0655 -0.0007)
          quadrant=z radius=0.013 length=0.01
      WrapCylinder _3rdmcp_FDP: xyz_body_rotation=(2.97105 0.173139 -0.785571) translation=(0.0099 -0.0662 -0.0046)
          quadrant=z radius=0.0105 length=0.01
      WrapCylinder _3rdmcp_ext: xyz_body_rotation=(2.97105 0.173139 -0.890291) translation=(0.0092 -0.0655 -0.0007)
          quadrant=y radius=0.01 length=0.01
      WrapCylinder _4rdmcp_FDS: xyz_body_rotation=(2.77526 0.299965 1.57074) translation=(0.0033 -0.0642 0.0139)
          quadrant=y radius=0.013 length=0.01
      WrapCylinder _4rdmcp_FDP: xyz_body_rotation=(2.77526 0.299965 1.57074) translation=(0.0033 -0.0642 0.0139)
          quadrant=y radius=0.0105 length=0.01
      WrapCylinder _4rdmcp_ext: xyz_body_rotation=(2.77526 0.299965 0.959879) translation=(0.0033 -0.0642 0.0139)
          quadrant=-z radius=0.01 length=0.01
      WrapCylinder _5rdmcp_FDS: xyz_body_rotation=(2.84377 0.523265 1.57081) translation=(-0.0057 -0.0561 0.0235)
          quadrant=y radius=0.013 length=0.012
      WrapCylinder _5rdmcp_FDP: xyz_body_rotation=(2.84377 0.523265 1.34392) translation=(-0.0057 -0.0561 0.0235)
          quadrant=y radius=0.0105 length=0.01
      WrapCylinder _5rdmcp_ext: xyz_body_rotation=(2.84377 0.523265 2.00714) translation=(-0.0057 -0.0561 0.0235)
          quadrant=-y radius=0.01 length=0.012
    Body firstmc1: mass=0.0001 mass_center=(0 0 0) inertia_xx=1e-8 inertia_yy=1e-8 inertia_zz=-1e-8
      CustomJoint CMC1a: parent_body=palm location_in_parent=(-0.010308 -0.004569 -0.015293) location=(0 0 0)
        Coordinate cmc_flexion: motion_type=rotational default_value=0 range=(-0.7853982 0.2617994) clamped=false
        SpatialTransform: axes_held_at_zero=(rotation1 rotation2 translation1 translation2 translation3)
          TransformAxis rotation3: coordinates=cmc_flexion axis=(-0.7453838 0.6652858 -0.04239899)
              LinearFunction(coefficients=1 0)
    Body firstmc: mass=0.016 mass_center=(-0.00602 -0.01472 -0.00784) inertia_xx=1.26e-6 inertia_yy=7.1e-7
        inertia_zz=-1.19e-6 meshes=1mc.vtp
      CustomJoint CMC1b: parent_body=firstmc1 location_in_parent=(-0.0025 -0.0054 -0.0072) location=(0 0 0)
        Coordinate cmc_abduction: motion_type=rotational default_value=0 range=(-0.4363323 0.4363323) clamped=false
        SpatialTransform: axes_held_at_zero=(rotation2 rotation3 translation1 translation2 translation3)
          TransformAxis rotation1: coordinates=cmc_abduction axis=(0.467959 0.731736 -0.495557)
              LinearFunction(coefficients=1 0)
      WrapCylinder MPthumb: xyz_body_rotation=(1.90759 1.23175 -2.72452) translation=(-0.0143 -0.0305 -0.0177)
          radius=0.0085 length=0.02
    Body proximal_thumb: mass=0.0079 mass_center=(-0.0063 -0.0163 -0.0096) inertia_xx=2.9e-7 inertia_yy=1.6e-7
        inertia_zz=-2.6e-7 meshes=thumbprox.vtp
      CustomJoint MCP: parent_body=firstmc location_in_parent=(-0.0127 -0.0292 -0.0165) location=(0 0 0)
        Coordinate mp_flexion: motion_type=rotational default_value=0 range=(-0.6981317 0.7853982) clamped=false
        SpatialTransform: axes_held_at_zero=(rotation1 rotation2 translation1 translation2 translation3)
          TransformAxis rotation3: coordinates=mp_flexion axis=(-0.975442 0.203488 -0.084295)
              LinearFunction(coefficients=1 0)
      WrapCylinder IPthumb: xyz_body_rotation=(1.61382 1.2658 -1.52387) translation=(-0.0096 -0.0302 -0.0121)
          quadrant=-z radius=0.0045 length=0.01
    Body distal_thumb: mass=0.0031 mass_center=(-0.0044 -0.01042 -0.00557) inertia_xx=5e-8 inertia_yy=3e-8
        inertia_zz=-5e-8 meshes=thumbdist.vtp
      CustomJoint IP: parent_body=proximal_thumb location_in_parent=(-0.0101 -0.0259 -0.014) location=(0 0 0)
        Coordinate ip_flexion: motion_type=rotational default_value=0 range=(-0.4363323 1.308997) clamped=false
        SpatialTransform: axes_held_at_zero=(rotation1 rotation2 translation1 translation2 translation3)
          TransformAxis rotation3: coordinates=ip_flexion axis=(-0.8760431 0.4796231 -0.05010201)
              LinearFunction(coefficients=1 0)
    Body 2proxph: mass=0.0158 mass_center=(0.004 -0.0253 -0.0044) inertia_xx=1.2e-6 inertia_yy=2.8e-7
        inertia_zz=-1.21e-6 meshes=2proxph.vtp
      CustomJoint 2MCP: parent_body=palm location_in_parent=(0.0087 -0.0659 -0.0182) location=(0 0 0)
        Coordinate 2mcp_abduction: motion_type=rotational default_value=0 range=(-0.2617994 0.2617994) clamped=false
        Coordinate 2mcp_flexion: motion_type=rotational default_value=0 range=(-0.8726646 1.570796) clamped=false
        SpatialTransform: axes_held_at_zero=(rotation2 translation1 translation2 translation3)
          TransformAxis rotation1: coordinates=2mcp_abduction axis=(0.957741 0.191508 -0.214609)
              LinearFunction(coefficients=1 0)
          TransformAxis rotation3: coordinates=2mcp_flexion axis=(-0.136403 0.099702 -0.985623)
              LinearFunction(coefficients=1 0)
      WrapCylinder Secondpm_FDS: xyz_body_rotation=(-3.0989 -0.279411 1.57087) translation=(0.0073 -0.0413 -0.0075)
          quadrant=y radius=0.0075 length=0.01
      WrapCylinder Secondpm_FDP: xyz_body_rotation=(-3.0989 -0.279411 1.57087) translation=(0.0073 -0.0413 -0.0075)
          quadrant=y radius=0.008 length=0.01
      WrapCylinder Secondpm_ext: xyz_body_rotation=(-3.0989 -0.279411 1.57087) translation=(0.0073 -0.0413 -0.0075)
          quadrant=-y radius=0.0055 length=0.012
      WrapCylinder Secondpm: xyz_body_rotation=(0.0655654 0.0713544 -0.0346296) translation=(0.0061 -0.0407 -0.0075)
          active=false radius=0.004 length=0.01
    Body 2midph: mass=0.0049 mass_center=(0.00018 -0.0154 -0.0022) inertia_xx=1.4e-7 inertia_yy=4e-8 inertia_zz=-1.4e-7
        meshes=2midph.vtp
      CustomJoint 2prox-midph: parent_body=2proxph location_in_parent=(0.007326 -0.041273 -0.007517) location=(0 0 0)
        Coordinate 2pm_flexion: motion_type=rotational default_value=0 range=(0 2.094395) clamped=false
        SpatialTransform: axes_held_at_zero=(rotation2 rotation3 translation1 translation2 translation3)
          TransformAxis rotation1: coordinates=2pm_flexion axis=(-0.175402 0.126701 -0.97631)
              LinearFunction(coefficients=1 0)
      WrapCylinder Secondmd_flex: xyz_body_rotation=(-3.06319 -0.190072 1.57077) translation=(0.0012 -0.0249 -0.0033)
          quadrant=y radius=0.005 length=0.01
      WrapCylinder Secondmd_ext: xyz_body_rotation=(-3.06319 -0.190072 1.57077) translation=(0.0012 -0.0249 -0.0033)
          quadrant=-y radius=0.002 length=0.01
      WrapCylinder Secondmd: xyz_body_rotation=(0.0763765 0.138194 0.140272) translation=(0.0003 -0.0243 -0.0036)
          active=false quadrant=-z radius=0.003 length=0.01
    Body 2distph: mass=0.0018 mass_center=(2e-5 -0.01 -0.0013) inertia_xx=2e-8 inertia_yy=1e-8 inertia_zz=-2e-8
        meshes=2distph.vtp
      CustomJoint 2mid-distph: parent_body=2midph location_in_parent=(0.00122 -0.024888 -0.003333) location=(0 0 0)
        Coordinate 2md_flexion: motion_type=rotational default_value=0 range=(0 1.570796) clamped=false
        SpatialTransform: axes_held_at_zero=(rotation2 rotation3 translation1 translation2 translation3)
          TransformAxis rotation1: coordinates=2md_flexion axis=(0.074899 0.147097 -0.986282)
              LinearFunction(coefficients=1 0)
    Body 3proxph: mass=0.0193 mass_center=(0.0037 -0.0262 -0.00097) inertia_xx=1.75e-6 inertia_yy=3.1e-7
        inertia_zz=-1.76e-6 meshes=3proxph.vtp
      CustomJoint 3MCP: parent_body=palm location_in_parent=(0.009155 -0.065529 -0.00071) location=(0 0 0)
        Coordinate 3mcp_abduction: motion_type=rotational default_value=0 range=(-0.2617994 0.2617994) clamped=false
        Coordinate 3mcp_flexion: motion_type=rotational default_value=0 range=(-0.8726646 1.570796) clamped=false
        SpatialTransform: axes_held_at_zero=(rotation2 translation1 translation2 translation3)
          TransformAxis rotation1: coordinates=3mcp_abduction axis=(0.992674 0.118897 0.021499)
              LinearFunction(coefficients=1 0)
          TransformAxis rotation3: coordinates=3mcp_flexion axis=(-0.0383 0.0177 -0.999109)
              LinearFunction(coefficients=1 0)
      WrapCylinder Thirdpm_FDS: xyz_body_rotation=(3.0261 -0.0450141 1.56558) translation=(0.0062 -0.0442 -0.0017)
          quadrant=y radius=0.0075 length=0.01
      WrapCylinder Thirdpm_FDP: xyz_body_rotation=(3.0261 -0.0450141 1.56558) translation=(0.0062 -0.0442 -0.0017)
          quadrant=y radius=0.008 length=0.01
      WrapCylinder Thirdpm_ext: xyz_body_rotation=(3.0261 -0.0450141 1.56558) translation=(0.0062 -0.0442 -0.0017)
          quadrant=-y radius=0.0055 length=0.01
    Body 3midph: mass=0.00642 mass_center=(0.0013 -0.0168 -0.00071) inertia_xx=2.6e-7 inertia_yy=5e-8
        inertia_zz=-2.6e-7 meshes=3midph.vtp
      CustomJoint 3prox-midph: parent_body=3proxph location_in_parent=(0.00623 -0.044211 -0.00165) location=(0 0 0)
        Coordinate 3pm_flexion: motion_type=rotational default_value=0 range=(0 2.094395) clamped=false
        SpatialTransform: axes_held_at_zero=(rotation2 rotation3 translation1 translation2 translation3)
          TransformAxis rotation1: coordinates=3pm_flexion axis=(0.102203 -0.062002 -0.992829)
              LinearFunction(coefficients=1 0)
      WrapCylinder Thirdmd_flex: xyz_body_rotation=(-3.04689 0.106998 1.56066) translation=(0.002 -0.029 -0.0014)
          quadrant=y radius=0.005 length=0.01
      WrapCylinder Thirdmd_ext: xyz_body_rotation=(-3.04689 0.106998 1.56066) translation=(0.002 -0.029 -0.0014)
          quadrant=-y radius=0.002 length=0.01
    Body 3distph: mass=0.00252 mass_center=(-0.00028 -0.0102 -0.0005) inertia_xx=4e-8 inertia_yy=1e-8 inertia_zz=-4e-8
        meshes=3distph.vtp
      CustomJoint 3mid-distph: parent_body=3midph location_in_parent=(0.001954 -0.029047 -0.001365) location=(0 0 0)
        Coordinate 3md_flexion: motion_type=rotational default_value=0 range=(0 1.570796) clamped=false
        SpatialTransform: axes_held_at_zero=(rotation2 rotation3 translation1 translation2 translation3)
          TransformAxis rotation1: coordinates=3md_flexion axis=(0.097409 0.036103 -0.994589)
              LinearFunction(coefficients=1 0)
    Body 4proxph: mass=0.01374 mass_center=(0.00096 -0.024 0.0021) inertia_xx=9.9e-7 inertia_yy=1.8e-7
        inertia_zz=-9.8e-7 meshes=4proxph.vtp
      CustomJoint 4MCP: parent_body=palm location_in_parent=(0.00334 -0.064208 0.013876) location=(0 0 0)
        Coordinate 4mcp_abduction: motion_type=rotational default_value=0 range=(-0.2617994 0.2617994) clamped=false
        Coordinate 4mcp_flexion: motion_type=rotational default_value=0 range=(-0.8726646 1.570796) clamped=false
        SpatialTransform: axes_held_at_zero=(rotation2 translation1 translation2 translation3)
          TransformAxis rotation1: coordinates=4mcp_abduction axis=(0.989278 0.144366 0.022094)
              LinearFunction(coefficients=1 0)
          TransformAxis rotation3: coordinates=4mcp_flexion axis=(-0.096118 -0.13594 -0.986043)
              LinearFunction(coefficients=1 0)
      WrapCylinder Fourthpm_FDS: xyz_body_rotation=(3.0221 0.402078 1.57074) translation=(0.0013 -0.0403 0.0035)
          quadrant=y radius=0.0075 length=0.01
      WrapCylinder Fourthpm_FDP: xyz_body_rotation=(3.0221 0.402078 1.57074) translation=(0.0013 -0.0403 0.0035)
          quadrant=y radius=0.008 length=0.01
      WrapCylinder Fourthpm_ext: xyz_body_rotation=(3.0221 0.402078 1.57074) translation=(0.0013 -0.0403 0.0035)
          quadrant=-y radius=0.0055 length=0.01
    Body 4midph: mass=0.00568 mass_center=(-0.00053 -0.0148 0.0015) inertia_xx=1.8e-7 inertia_yy=5e-8
        inertia_zz=-1.8e-7 meshes=4midph.vtp
      CustomJoint 4prox-midph: parent_body=4proxph location_in_parent=(0.001345 -0.040255 0.003528) location=(0 0 0)
        Coordinate 4pm_flexion: motion_type=rotational default_value=0 range=(0 1.745329) clamped=false
        SpatialTransform: axes_held_at_zero=(rotation2 rotation3 translation1 translation2 translation3)
          TransformAxis rotation1: coordinates=4pm_flexion axis=(0.069496 -0.141891 -0.98744)
              LinearFunction(coefficients=1 0)
      WrapCylinder Fourthmd_flex: xyz_body_rotation=(3.07037 0.443946 1.60154) translation=(0.0006 -0.0248 0.0023)
          quadrant=y radius=0.005 length=0.01
      WrapCylinder Fourthmd_ext: xyz_body_rotation=(3.07037 0.443946 1.60154) translation=(0.0006 -0.0248 0.0023)
          quadrant=-y radius=0.002 length=0.01
    Body 4distph: mass=0.0029 mass_center=(0.0011 -0.0103 0.0006) inertia_xx=5e-8 inertia_yy=2e-8 inertia_zz=-5e-8
        meshes=4distph.vtp
      CustomJoint 4mid-distph: parent_body=4midph location_in_parent=(0.000563 -0.024789 0.002317) location=(0 0 0)
        # location_in_parent>0.0033 -0.0245 0.0026</location_in_parent
        Coordinate 4md_flexion: motion_type=rotational default_value=0 range=(0 1.570796) clamped=false
        SpatialTransform: axes_held_at_zero=(rotation2 rotation3 translation1 translation2 translation3)
          TransformAxis rotation1: coordinates=4md_flexion axis=(0.2701 -0.14 -0.9526) LinearFunction(coefficients=1 0)
    Body 5proxph: mass=0.01106 mass_center=(-0.0022 -0.0224 0.0028) inertia_xx=6.4e-7 inertia_yy=1.3e-7
        inertia_zz=-6.4e-7 meshes=5proxph.vtp
      CustomJoint 5MCP: parent_body=palm location_in_parent=(-0.005714 -0.056114 0.023493) location=(0 0 0)
        Coordinate 5mcp_abduction: motion_type=rotational default_value=0 range=(-0.2617994 0.2617994) clamped=false
        Coordinate 5mcp_flexion: motion_type=rotational default_value=0 range=(-0.8726646 1.570796) clamped=false
        SpatialTransform: axes_held_at_zero=(rotation3 translation1 translation2 translation3)
          TransformAxis rotation1: coordinates=5mcp_abduction axis=(0.976028 0.216206 0.025001)
              LinearFunction(coefficients=1 0)
          TransformAxis rotation2: coordinates=5mcp_flexion axis=(-0.112407 -0.300118 -0.947256)
              LinearFunction(coefficients=1 0)
      WrapCylinder Fifthpm_FDS: xyz_body_rotation=(2.61616 0.708141 1.84995) translation=(-0.0029 -0.0356 0.0053)
          quadrant=y radius=0.0075 length=0.01
      WrapCylinder Fifthpm_FDP: xyz_body_rotation=(2.61616 0.708141 1.5707) translation=(-0.0028 -0.0357 0.0053)
          quadrant=y radius=0.008 length=0.01
      WrapCylinder Fifthpm_ext: xyz_body_rotation=(2.61616 0.708141 2.28628) translation=(-0.0028 -0.0356 0.0051)
          quadrant=-y radius=0.0055 length=0.01
    Body 5midph: mass=0.00372 mass_center=(-0.0025 -0.0128 0.0011) inertia_xx=8e-8 inertia_yy=2e-8 inertia_zz=-8e-8
        meshes=5midph.vtp
      CustomJoint 5prox-midph: parent_body=5proxph location_in_parent=(-0.002879 -0.035563 0.005279) location=(0 0 0)
        Coordinate 5pm_flexion: motion_type=rotational default_value=0 range=(0 2.094395) clamped=false
        SpatialTransform: axes_held_at_zero=(rotation2 rotation3 translation1 translation2 translation3)
          TransformAxis rotation1: coordinates=5pm_flexion axis=(0.084908 -0.437741 -0.8950833)
              LinearFunction(coefficients=1 0)
      WrapCylinder Fifthmd_flex: xyz_body_rotation=(2.80246 0.82045 1.57091) translation=(-0.0022 -0.0207 0.0029)
          quadrant=y radius=0.005 length=0.01
      WrapCylinder Fifthmd_ext: xyz_body_rotation=(2.80246 0.82045 1.57091) translation=(-0.0022 -0.0207 0.0029)
          quadrant=-y radius=0.002 length=0.01
    Body 5distph: mass=0.00222 mass_center=(-0.0015 -0.0094 0.0011) inertia_xx=3e-8 inertia_yy=1e-8 inertia_zz=-3e-8
        meshes=5distph.vtp
      CustomJoint 5mid-distph: parent_body=5midph location_in_parent=(-0.002243 -0.020677 0.002871) location=(0 0 0)
        Coordinate 5md_flexion: motion_type=rotational default_value=0 range=(0 1.570796) clamped=false
        SpatialTransform: axes_held_at_zero=(rotation2 rotation3 translation1 translation2 translation3)
          TransformAxis rotation1: coordinates=5md_flexion axis=(0.144588 -0.426766 -0.892729)
              LinearFunction(coefficients=1 0)
  ConstraintSet:
    CoordinateCouplerConstraint proximal_distal_r1_con: independent_coordinate_names=deviation
        dependent_coordinate_name=proximal_distal_r1
      coupled_coordinates_function: SimmSpline: x=(-0.174533 0 0.436332) y=(-0.261799 0 0.436332)
    CoordinateCouplerConstraint proximal_distal_r3_con: independent_coordinate_names=flexion
        dependent_coordinate_name=proximal_distal_r3
      coupled_coordinates_function: SimmSpline: x=(-1.22173 1.22173) y=(-0.610865 0.610865)
  ForceSet:
    Schutte1993Muscle_Deprecated trap_scap_1: max_isometric_force=118 optimal_fiber_length=0.1446
        tendon_slack_length=0.003 pennation_angle_at_optimal=0 [radians] activation1=50.75286 activation2=18.69159
      PathPoint P1: thorax (-0.0081 0.0534 0.1141)
      PathPoint P2: scapula_r (-0.01482 0.01733 -0.01452)
      passive_force_length_curve: SimmSpline: x=(-5 0.998 0.999 1 1.1 1.2 1.3 1.4 1.5 1.6 1.601 1.602 5)
          y=(0 0 0 0 0.035 0.12 0.26 0.55 1.17 2 2 2 2)
    Schutte1993Muscle_Deprecated trap_scap_2: max_isometric_force=168 optimal_fiber_length=0.1127
        tendon_slack_length=0.027 pennation_angle_at_optimal=0 activation1=50.75286 activation2=18.69159
      PathPoint P1: thorax (-0.008 0.0505 0.1153)
      PathPoint P2: scapula_r (-0.03311 0.01575 -0.00284)
      passive_force_length_curve: SimmSpline: x=(-5 0.998 0.999 1 1.1 1.2 1.3 1.4 1.5 1.6 1.601 1.602 5)
          y=(0 0 0 0 0.035 0.12 0.26 0.55 1.17 2 2 2 2)
    Schutte1993Muscle_Deprecated trap_scap_3: max_isometric_force=199 optimal_fiber_length=0.107
        tendon_slack_length=0.054 pennation_angle_at_optimal=0 activation1=50.75286 activation2=18.69159
      PathPoint P1: thorax (-0.0043 0.0425 0.1178)
      PathPoint P2: scapula_r (-0.05597 0.01287 -0.00113)
      passive_force_length_curve: SimmSpline: x=(-5 0.998 0.999 1 1.1 1.2 1.3 1.4 1.5 1.6 1.601 1.602 5)
          y=(0 0 0 0 0.035 0.12 0.26 0.55 1.17 2 2 2 2)
    Schutte1993Muscle_Deprecated trap_scap_4: max_isometric_force=138 optimal_fiber_length=0.0952
        tendon_slack_length=0.053 pennation_angle_at_optimal=0 activation1=50.75286 activation2=18.69159
      PathPoint P1: thorax (-0.0037 0.0372 0.1214)
      PathPoint P2: scapula_r (-0.0689 0.0119 -0.00094)
      passive_force_length_curve: SimmSpline: x=(-5 0.998 0.999 1 1.1 1.2 1.3 1.4 1.5 1.6 1.601 1.602 5)
          y=(0 0 0 0 0.035 0.12 0.26 0.55 1.17 2 2 2 2)
    Schutte1993Muscle_Deprecated trap_scap_5: max_isometric_force=122 optimal_fiber_length=0.0924
        tendon_slack_length=0.035 pennation_angle_at_optimal=0 activation1=50.75286 activation2=18.69159
      PathPoint P1: thorax (-0.0031 0.0261 0.125)
      PathPoint P2: scapula_r (-0.07607 0.01365 -0.00674)
      passive_force_length_curve: SimmSpline: x=(-5 0.998 0.999 1 1.1 1.2 1.3 1.4 1.5 1.6 1.601 1.602 5)
          y=(0 0 0 0 0.035 0.12 0.26 0.55 1.17 2 2 2 2)
    Schutte1993Muscle_Deprecated trap_scap_6: max_isometric_force=101 optimal_fiber_length=0.0893
        tendon_slack_length=0.033 pennation_angle_at_optimal=0 activation1=50.75286 activation2=18.69159
      PathPoint P1: thorax (-0.0043 -0.0002 0.1363)
      PathPoint P2: scapula_r (-0.06821 0.00723 0.00277)
      passive_force_length_curve: SimmSpline: x=(-5 0.998 0.999 1 1.1 1.2 1.3 1.4 1.5 1.6 1.601 1.602 5)
          y=(0 0 0 0 0.035 0.12 0.26 0.55 1.17 2 2 2 2)
    Schutte1993Muscle_Deprecated trap_scap_7: max_isometric_force=97 optimal_fiber_length=0.0868
        tendon_slack_length=0.036 pennation_angle_at_optimal=0 activation1=50.75286 activation2=18.69159
      PathPoint P1: thorax (-0.0016 -0.0339 0.1469)
      PathPoint P2: scapula_r (-0.07607 0.01365 -0.00674)
      passive_force_length_curve: SimmSpline: x=(-5 0.998 0.999 1 1.1 1.2 1.3 1.4 1.5 1.6 1.601 1.602 5)
          y=(0 0 0 0 0.035 0.12 0.26 0.55 1.17 2 2 2 2)
    Schutte1993Muscle_Deprecated trap_scap_8: max_isometric_force=138 optimal_fiber_length=0.077
        tendon_slack_length=0.048 pennation_angle_at_optimal=0 activation1=50.75286 activation2=18.69159
      PathPoint P1: thorax (0.0037 -0.0629 0.1511)
      PathPoint P2: scapula_r (-0.07521 0.00876 0.00091)
      passive_force_length_curve: SimmSpline: x=(-5 0.998 0.999 1 1.1 1.2 1.3 1.4 1.5 1.6 1.601 1.602 5)
          y=(0 0 0 0 0.035 0.12 0.26 0.55 1.17 2 2 2 2)
    Schutte1993Muscle_Deprecated trap_scap_9: max_isometric_force=123 optimal_fiber_length=0.1011
        tendon_slack_length=0.034 pennation_angle_at_optimal=0 activation1=50.75286 activation2=18.69159
      PathPoint P1: thorax (0.0066 -0.1109 0.1522)
      PathPoint P2: scapula_r (-0.09384 0.01027 -0.00611)
      passive_force_length_curve: SimmSpline: x=(-5 0.998 0.999 1 1.1 1.2 1.3 1.4 1.5 1.6 1.601 1.602 5)
          y=(0 0 0 0 0.035 0.12 0.26 0.55 1.17 2 2 2 2)
    Schutte1993Muscle_Deprecated trap_scap10: max_isometric_force=81 optimal_fiber_length=0.1264
        tendon_slack_length=0.035 pennation_angle_at_optimal=0 activation1=50.75286 activation2=18.69159
      PathPoint P1: thorax (0.0102 -0.1479 0.154)
      PathPoint P2: scapula_r (-0.08906 0.00467 -0.00174)
      passive_force_length_curve: SimmSpline: x=(-5 0.998 0.999 1 1.1 1.2 1.3 1.4 1.5 1.6 1.601 1.602 5)
          y=(0 0 0 0 0.035 0.12 0.26 0.55 1.17 2 2 2 2)
    Schutte1993Muscle_Deprecated trap_scap11: max_isometric_force=92 optimal_fiber_length=0.1355
        tendon_slack_length=0.031 pennation_angle_at_optimal=0 activation1=50.75286 activation2=18.69159
      PathPoint P1: thorax (0.0135 -0.1794 0.1477)
      PathPoint P2: scapula_r (-0.08263 0.00349 0.00054)
      passive_force_length_curve: SimmSpline: x=(-5 0.998 0.999 1 1.1 1.2 1.3 1.4 1.5 1.6 1.601 1.602 5)
          y=(0 0 0 0 0.035 0.12 0.26 0.55 1.17 2 2 2 2)
    Schutte1993Muscle_Deprecated trap_clav_1: max_isometric_force=97 optimal_fiber_length=0.1547
        tendon_slack_length=0.047 pennation_angle_at_optimal=0 activation1=50.75286 activation2=18.69159
      PathPoint P1: thorax (-0.0097 0.1294 0.1124)
      PathPoint P2: clavicle_r (0.13361 0.02689 0.01208)
      passive_force_length_curve: SimmSpline: x=(-5 0.998 0.999 1 1.1 1.2 1.3 1.4 1.5 1.6 1.601 1.602 5)
          y=(0 0 0 0 0.035 0.12 0.26 0.55 1.17 2 2 2 2)
    Schutte1993Muscle_Deprecated trap_clav_2: max_isometric_force=47 optimal_fiber_length=0.168
        tendon_slack_length=0.042 pennation_angle_at_optimal=0 activation1=116.1091 activation2=28.81844
      PathPoint P1: thorax (-0.0106 0.0717 0.1066)
      PathPoint P2: clavicle_r (0.16007 0.02487 0.01214)
      passive_force_length_curve: SimmSpline: x=(-5 0.998 0.999 1 1.1 1.2 1.3 1.4 1.5 1.6 1.601 1.602 5)
          y=(0 0 0 0 0.035 0.12 0.26 0.55 1.17 2 2 2 2)
    Schutte1993Muscle_Deprecated lev_scap_1: max_isometric_force=96 optimal_fiber_length=0.1578
        tendon_slack_length=0.019 pennation_angle_at_optimal=0 activation1=116.1091 activation2=28.81844
      PathPoint P1: thorax (0.0388 0.1479 0.0572)
      PathPoint P2: scapula_r (-0.11566 0.01242 -0.01347)
      passive_force_length_curve: SimmSpline: x=(-5 0.998 0.999 1 1.1 1.2 1.3 1.4 1.5 1.6 1.601 1.602 5)
          y=(0 0 0 0 0.035 0.12 0.26 0.55 1.17 2 2 2 2)
    Schutte1993Muscle_Deprecated lev_scap_2: max_isometric_force=104 optimal_fiber_length=0.1302
        tendon_slack_length=0.018 pennation_angle_at_optimal=0 activation1=116.1091 activation2=28.81844
      PathPoint P1: thorax (0.0291 0.1254 0.0607)
      PathPoint P2: scapula_r (-0.10894 0.02469 -0.02061)
      passive_force_length_curve: SimmSpline: x=(-5 0.998 0.999 1 1.1 1.2 1.3 1.4 1.5 1.6 1.601 1.602 5)
          y=(0 0 0 0 0.035 0.12 0.26 0.55 1.17 2 2 2 2)
    Schutte1993Muscle_Deprecated pect_min_1: max_isometric_force=47 optimal_fiber_length=0.0765
        tendon_slack_length=0.051 pennation_angle_at_optimal=0 activation1=48.48485 activation2=18.18182
      PathPoint P1: thorax (0.0513 -0.0606 -0.018)
      PathPoint P2: scapula_r (-0.02865 0.00263 -0.08001)
      passive_force_length_curve: SimmSpline: x=(-5 0.998 0.999 1 1.1 1.2 1.3 1.4 1.5 1.6 1.601 1.602 5)
          y=(0 0 0 0 0.035 0.12 0.26 0.55 1.17 2 2 2 2)
    Schutte1993Muscle_Deprecated pect_min_2: max_isometric_force=107 optimal_fiber_length=0.1086
        tendon_slack_length=0.041 pennation_angle_at_optimal=0 activation1=48.48485 activation2=18.18182
      PathPoint P1: thorax (0.0585 -0.0933 -0.0267)
      PathPoint P2: scapula_r (-0.02865 0.00263 -0.08001)
      passive_force_length_curve: SimmSpline: x=(-5 0.998 0.999 1 1.1 1.2 1.3 1.4 1.5 1.6 1.601 1.602 5)
          y=(0 0 0 0 0.035 0.12 0.26 0.55 1.17 2 2 2 2)
    Schutte1993Muscle_Deprecated pect_min_3: max_isometric_force=107 optimal_fiber_length=0.1075
        tendon_slack_length=0.029 pennation_angle_at_optimal=0 activation1=48.48485 activation2=18.18182
      PathPoint P1: thorax (0.0965 -0.0947 -0.0203)
      PathPoint P2: scapula_r (-0.02443 -0.00347 -0.08275)
      passive_force_length_curve: SimmSpline: x=(-5 0.998 0.999 1 1.1 1.2 1.3 1.4 1.5 1.6 1.601 1.602 5)
          y=(0 0 0 0 0.035 0.12 0.26 0.55 1.17 2 2 2 2)
    Schutte1993Muscle_Deprecated pect_min_4: max_isometric_force=46 optimal_fiber_length=0.1381
        tendon_slack_length=0.026 pennation_angle_at_optimal=0 activation1=48.48485 activation2=18.18182
      PathPoint P1: thorax (0.0886 -0.1138 -0.0243)
      PathPoint P2: scapula_r (-0.01988 -0.01163 -0.08395)
      passive_force_length_curve: SimmSpline: x=(-5 0.998 0.999 1 1.1 1.2 1.3 1.4 1.5 1.6 1.601 1.602 5)
          y=(0 0 0 0 0.035 0.12 0.26 0.55 1.17 2 2 2 2)
    Schutte1993Muscle_Deprecated rhomboid_1: max_isometric_force=51 optimal_fiber_length=0.0986
        tendon_slack_length=0.015 pennation_angle_at_optimal=0 activation1=93.07359 activation2=25.97403
      PathPoint P1: thorax (-0.0091 0.0627 0.108)
      PathPoint P2: scapula_r (-0.11708 -0.00421 -0.01182)
      passive_force_length_curve: SimmSpline: x=(-5 0.998 0.999 1 1.1 1.2 1.3 1.4 1.5 1.6 1.601 1.602 5)
          y=(0 0 0 0 0.035 0.12 0.26 0.55 1.17 2 2 2 2)
    Schutte1993Muscle_Deprecated rhomboid_2: max_isometric_force=92 optimal_fiber_length=0.1077
        tendon_slack_length=0.066 pennation_angle_at_optimal=0 activation1=93.07359 activation2=25.97403
      PathPoint P1: thorax (-0.0076 0.0506 0.1151)
      PathPoint P2: scapula_r (-0.12616 -0.07524 -0.00581)
      passive_force_length_curve: SimmSpline: x=(-5 0.998 0.999 1 1.1 1.2 1.3 1.4 1.5 1.6 1.601 1.602 5)
          y=(0 0 0 0 0.035 0.12 0.26 0.55 1.17 2 2 2 2)
    Schutte1993Muscle_Deprecated rhomboid_3: max_isometric_force=142 optimal_fiber_length=0.1259
        tendon_slack_length=0.032 pennation_angle_at_optimal=0 activation1=93.07359 activation2=25.97403
      PathPoint P1: thorax (0.0054 0.0317 0.1252)
      PathPoint P2: scapula_r (-0.12743 -0.08059 -0.00522)
      passive_force_length_curve: SimmSpline: x=(-5 0.998 0.999 1 1.1 1.2 1.3 1.4 1.5 1.6 1.601 1.602 5)
          y=(0 0 0 0 0.035 0.12 0.26 0.55 1.17 2 2 2 2)
    Schutte1993Muscle_Deprecated rhomboid_4: max_isometric_force=82 optimal_fiber_length=0.1267
        tendon_slack_length=0.031 pennation_angle_at_optimal=0 activation1=116.1091 activation2=28.81844
      PathPoint P1: thorax (-0.0028 0.0068 0.1348)
      PathPoint P2: scapula_r (-0.12703 -0.09269 -0.00503)
      passive_force_length_curve: SimmSpline: x=(-5 0.998 0.999 1 1.1 1.2 1.3 1.4 1.5 1.6 1.601 1.602 5)
          y=(0 0 0 0 0.035 0.12 0.26 0.55 1.17 2 2 2 2)
    Schutte1993Muscle_Deprecated rhomboid_5: max_isometric_force=67 optimal_fiber_length=0.117 tendon_slack_length=0.04
        pennation_angle_at_optimal=0 activation1=116.1091 activation2=28.81844
      PathPoint P1: thorax (0.0005 -0.02 0.1449)
      PathPoint P2: scapula_r (-0.12594 -0.10446 -0.00717)
      passive_force_length_curve: SimmSpline: x=(-5 0.998 0.999 1 1.1 1.2 1.3 1.4 1.5 1.6 1.601 1.602 5)
          y=(0 0 0 0 0.035 0.12 0.26 0.55 1.17 2 2 2 2)
    Schutte1993Muscle_Deprecated serr_ant_1: max_isometric_force=61 optimal_fiber_length=0.1635
        tendon_slack_length=0.025 pennation_angle_at_optimal=0 activation1=116.1091 activation2=28.81844
      PathPoint P1: scapula_r (-0.12524 -0.11029 0.00606)
      PathPoint P2: thorax (0.138 -0.2098 0.0353)
      PathWrap: wrap_object=serr_ant method=hybrid
      passive_force_length_curve: SimmSpline: x=(-5 0.998 0.999 1 1.1 1.2 1.3 1.4 1.5 1.6 1.601 1.602 5)
          y=(0 0 0 0 0.035 0.12 0.26 0.55 1.17 2 2 2 2)
    Schutte1993Muscle_Deprecated serr_ant_2: max_isometric_force=110 optimal_fiber_length=0.1667
        tendon_slack_length=0.009 pennation_angle_at_optimal=0 activation1=116.1091 activation2=28.81844
      PathPoint P1: scapula_r (-0.1232 -0.10995 0.00518)
      PathPoint P2: thorax (0.1327 -0.1884 0.0149)
      PathWrap: wrap_object=serr_ant method=hybrid
      passive_force_length_curve: SimmSpline: x=(-5 0.998 0.999 1 1.1 1.2 1.3 1.4 1.5 1.6 1.601 1.602 5)
          y=(0 0 0 0 0.035 0.12 0.26 0.55 1.17 2 2 2 2)
    Schutte1993Muscle_Deprecated serr_ant_3: max_isometric_force=105 optimal_fiber_length=0.1622
        tendon_slack_length=0.007 pennation_angle_at_optimal=0 activation1=116.1091 activation2=28.81844
      PathPoint P1: scapula_r (-0.11852 -0.1073 0.00372)
      PathPoint P2: thorax (0.1242 -0.159 0.0024)
      PathWrap: wrap_object=serr_ant method=hybrid
      passive_force_length_curve: SimmSpline: x=(-5 0.998 0.999 1 1.1 1.2 1.3 1.4 1.5 1.6 1.601 1.602 5)
          y=(0 0 0 0 0.035 0.12 0.26 0.55 1.17 2 2 2 2)
    Schutte1993Muscle_Deprecated serr_ant_4: max_isometric_force=110 optimal_fiber_length=0.1289
        tendon_slack_length=0.011 pennation_angle_at_optimal=0 activation1=116.1091 activation2=28.81844
      PathPoint P1: scapula_r (-0.11627 -0.10348 0.00303)
      PathPoint P2: thorax (0.1231 -0.1221 -0.0031)
      PathWrap: wrap_object=serr_ant method=hybrid
      passive_force_length_curve: SimmSpline: x=(-5 0.998 0.999 1 1.1 1.2 1.3 1.4 1.5 1.6 1.601 1.602 5)
          y=(0 0 0 0 0.035 0.12 0.26 0.55 1.17 2 2 2 2)
    Schutte1993Muscle_Deprecated serr_ant_5: max_isometric_force=64 optimal_fiber_length=0.1259
        tendon_slack_length=0.011 pennation_angle_at_optimal=0 activation1=25.90274 activation2=11.97605
      PathPoint P1: scapula_r (-0.11727 -0.09968 0.00318)
      PathPoint P2: thorax (0.1194 -0.0859 0.0041)
      PathWrap: wrap_object=serr_ant method=hybrid
      passive_force_length_curve: SimmSpline: x=(-5 0.998 0.999 1 1.1 1.2 1.3 1.4 1.5 1.6 1.601 1.602 5)
          y=(0 0 0 0 0.035 0.12 0.26 0.55 1.17 2 2 2 2)
    Schutte1993Muscle_Deprecated serr_ant_6: max_isometric_force=97 optimal_fiber_length=0.122
        tendon_slack_length=0.011 pennation_angle_at_optimal=0 activation1=25.90274 activation2=11.97605
      PathPoint P1: scapula_r (-0.1145 -0.09435 0.0022)
      PathPoint P2: thorax (0.1124 -0.0428 0.0199)
      PathWrap: wrap_object=serr_ant method=hybrid
      passive_force_length_curve: SimmSpline: x=(-5 0.998 0.999 1 1.1 1.2 1.3 1.4 1.5 1.6 1.601 1.602 5)
          y=(0 0 0 0 0.035 0.12 0.26 0.55 1.17 2 2 2 2)
    Schutte1993Muscle_Deprecated serr_ant_7: max_isometric_force=47 optimal_fiber_length=0.1133
        tendon_slack_length=0.009 pennation_angle_at_optimal=0 activation1=25.90274 activation2=11.97605
      PathPoint P1: scapula_r (-0.10351 -0.05008 -0.0046)
      PathPoint P2: thorax (0.1001 -0.0077 0.0329)
      PathWrap: wrap_object=serr_ant method=hybrid
      passive_force_length_curve: SimmSpline: x=(-5 0.998 0.999 1 1.1 1.2 1.3 1.4 1.5 1.6 1.601 1.602 5)
          y=(0 0 0 0 0.035 0.12 0.26 0.55 1.17 2 2 2 2)
    Schutte1993Muscle_Deprecated serr_ant_8: max_isometric_force=76 optimal_fiber_length=0.0845
        tendon_slack_length=0.011 pennation_angle_at_optimal=0 activation1=25.90274 activation2=11.97605
      PathPoint P1: scapula_r (-0.11794 -0.01928 -0.00632)
      PathPoint P2: thorax (0.101 0.0023 0.0552)
      PathWrap: wrap_object=serr_ant method=hybrid
      passive_force_length_curve: SimmSpline: x=(-5 0.998 0.999 1 1.1 1.2 1.3 1.4 1.5 1.6 1.601 1.602 5)
          y=(0 0 0 0 0.035 0.12 0.26 0.55 1.17 2 2 2 2)
    Schutte1993Muscle_Deprecated serr_ant_9: max_isometric_force=79 optimal_fiber_length=0.08 tendon_slack_length=0.007
        pennation_angle_at_optimal=0 activation1=25.90274 activation2=11.97605
      PathPoint P1: scapula_r (-0.11491 0.01015 -0.01737)
      PathPoint P2: thorax (0.098 0.0062 0.0546)
      PathWrap: wrap_object=serr_ant method=hybrid
      passive_force_length_curve: SimmSpline: x=(-5 0.998 0.999 1 1.1 1.2 1.3 1.4 1.5 1.6 1.601 1.602 5)
          y=(0 0 0 0 0.035 0.12 0.26 0.55 1.17 2 2 2 2)
    Schutte1993Muscle_Deprecated serr_ant10: max_isometric_force=63 optimal_fiber_length=0.066
        tendon_slack_length=0.005 pennation_angle_at_optimal=0 activation1=25.90274 activation2=11.97605
      PathPoint P1: scapula_r (-0.10664 0.02315 -0.02602)
      PathPoint P2: thorax (0.0944 0.0109 0.0595)
      PathWrap: wrap_object=serr_ant method=hybrid
      passive_force_length_curve: SimmSpline: x=(-5 0.998 0.999 1 1.1 1.2 1.3 1.4 1.5 1.6 1.601 1.602 5)
          y=(0 0 0 0 0.035 0.12 0.26 0.55 1.17 2 2 2 2)
    Schutte1993Muscle_Deprecated serr_ant11: max_isometric_force=23 optimal_fiber_length=0.0885
        tendon_slack_length=0.003 pennation_angle_at_optimal=0 activation1=25.90274 activation2=11.97605
      PathPoint P1: scapula_r (-0.10125 0.03015 -0.03225)
      PathPoint P2: thorax (0.098 0.0062 0.0546)
      PathWrap: wrap_object=serr_ant method=hybrid
      passive_force_length_curve: SimmSpline: x=(-5 0.998 0.999 1 1.1 1.2 1.3 1.4 1.5 1.6 1.601 1.602 5)
          y=(0 0 0 0 0.035 0.12 0.26 0.55 1.17 2 2 2 2)
    Schutte1993Muscle_Deprecated serr_ant12: max_isometric_force=112 optimal_fiber_length=0.0945
        tendon_slack_length=0.001 pennation_angle_at_optimal=0 activation1=25.90274 activation2=11.97605
      PathPoint P1: scapula_r (-0.0888 0.0352 -0.04441)
      PathPoint P2: thorax (0.1005 0.0009 0.047)
      PathWrap: wrap_object=serr_ant method=hybrid
      passive_force_length_curve: SimmSpline: x=(-5 0.998 0.999 1 1.1 1.2 1.3 1.4 1.5 1.6 1.601 1.602 5)
          y=(0 0 0 0 0.035 0.12 0.26 0.55 1.17 2 2 2 2)
    Schutte1993Muscle_Deprecated delt_scap_1: max_isometric_force=289 optimal_fiber_length=0.1128
        tendon_slack_length=0.08 pennation_angle_at_optimal=0.08726646 activation1=25.90274 activation2=11.97605
      PathPoint P1: scapula_r (-0.08278 -0.00082 -0.00086)
      PathPoint P2: humerus_r (0.01347 -0.11128 0.00919)
      PathWrap: wrap_object=deltoid
      passive_force_length_curve: SimmSpline: x=(-5 0.998 0.999 1 1.1 1.2 1.3 1.4 1.5 1.6 1.601 1.602 5)
          y=(0 0 0 0 0.035 0.12 0.26 0.55 1.17 2 2 2 2)
    Schutte1993Muscle_Deprecated delt_scap_2: max_isometric_force=211 optimal_fiber_length=0.0949
        tendon_slack_length=0.076 pennation_angle_at_optimal=0.08726646 activation1=25.90274 activation2=11.97605
      PathPoint P1: scapula_r (-0.04999 0.00627 0.00113)
      PathPoint P2: humerus_r (0.01555 -0.09645 0.00528)
      PathWrap: wrap_object=deltoid
      passive_force_length_curve: SimmSpline: x=(-5 0.998 0.999 1 1.1 1.2 1.3 1.4 1.5 1.6 1.601 1.602 5)
          y=(0 0 0 0 0.035 0.12 0.26 0.55 1.17 2 2 2 2)
    Schutte1993Muscle_Deprecated delt_scap_3: max_isometric_force=446 optimal_fiber_length=0.0833
        tendon_slack_length=0.062 pennation_angle_at_optimal=0.08726646 activation1=25.90274 activation2=11.97605
      PathPoint P1: scapula_r (-0.01438 0.00574 -0.00141)
      PathPoint P2: humerus_r (0.01555 -0.09645 0.00528)
      PathWrap: wrap_object=deltoid
      passive_force_length_curve: SimmSpline: x=(-5 0.998 0.999 1 1.1 1.2 1.3 1.4 1.5 1.6 1.601 1.602 5)
          y=(0 0 0 0 0.035 0.12 0.26 0.55 1.17 2 2 2 2)
    Schutte1993Muscle_Deprecated delt_scap_4: max_isometric_force=117 optimal_fiber_length=0.0666
        tendon_slack_length=0.045 pennation_angle_at_optimal=0.08726646 activation1=25.90274 activation2=11.97605
      PathPoint P1: scapula_r (-0.003 -0.00452 -0.00481)
      PathPoint P2: humerus_r (0.01571 -0.08467 0.00404)
      PathWrap: wrap_object=deltoid
      passive_force_length_curve: SimmSpline: x=(-5 0.998 0.999 1 1.1 1.2 1.3 1.4 1.5 1.6 1.601 1.602 5)
          y=(0 0 0 0 0.035 0.12 0.26 0.55 1.17 2 2 2 2)
    Schutte1993Muscle_Deprecated delt_scap_5: max_isometric_force=120 optimal_fiber_length=0.0656
        tendon_slack_length=0.035 pennation_angle_at_optimal=0.08726646 activation1=120.0992 activation2=29.15452
      PathPoint P1: scapula_r (0.01299 0.00078 -0.01734)
      PathPoint P2: humerus_r (0.01678 -0.07782 0.00066)
      PathWrap: wrap_object=deltoid
      passive_force_length_curve: SimmSpline: x=(-5 0.998 0.999 1 1.1 1.2 1.3 1.4 1.5 1.6 1.601 1.602 5)
          y=(0 0 0 0 0.035 0.12 0.26 0.55 1.17 2 2 2 2)
    Schutte1993Muscle_Deprecated delt_scap_6: max_isometric_force=285 optimal_fiber_length=0.0767
        tendon_slack_length=0.067 pennation_angle_at_optimal=0.08726646 activation1=120.0992 activation2=29.15452
      PathPoint P1: scapula_r (0.00362 0.00532 -0.00502)
      PathPoint P2: humerus_r (0.01646 -0.10894 0.00661)
      PathWrap: wrap_object=deltoid
      passive_force_length_curve: SimmSpline: x=(-5 0.998 0.999 1 1.1 1.2 1.3 1.4 1.5 1.6 1.601 1.602 5)
          y=(0 0 0 0 0.035 0.12 0.26 0.55 1.17 2 2 2 2)
    Schutte1993Muscle_Deprecated delt_scap_7: max_isometric_force=149 optimal_fiber_length=0.0754
        tendon_slack_length=0.082 pennation_angle_at_optimal=0.08726646 activation1=120.0992 activation2=29.15452
      PathPoint P1: scapula_r (0.00849 0.00027 -0.00918)
      PathPoint P2: humerus_r (0.01579 -0.1316 0.00516)
      PathWrap: wrap_object=deltoid
      passive_force_length_curve: SimmSpline: x=(-5 0.998 0.999 1 1.1 1.2 1.3 1.4 1.5 1.6 1.601 1.602 5)
          y=(0 0 0 0 0.035 0.12 0.26 0.55 1.17 2 2 2 2)
    Schutte1993Muscle_Deprecated delt_scap_8: max_isometric_force=215 optimal_fiber_length=0.071
        tendon_slack_length=0.065 pennation_angle_at_optimal=0.08726646 activation1=120.0992 activation2=29.15452
      PathPoint P1: scapula_r (0.01412 0.00617 -0.0181)
      PathPoint P2: humerus_r (0.01646 -0.10894 0.00661)
      PathWrap: wrap_object=deltoid
      passive_force_length_curve: SimmSpline: x=(-5 0.998 0.999 1 1.1 1.2 1.3 1.4 1.5 1.6 1.601 1.602 5)
          y=(0 0 0 0 0.035 0.12 0.26 0.55 1.17 2 2 2 2)
    Schutte1993Muscle_Deprecated delt_scap_9: max_isometric_force=286 optimal_fiber_length=0.0732
        tendon_slack_length=0.071 pennation_angle_at_optimal=0.08726646 activation1=120.0992 activation2=29.15452
      PathPoint P1: scapula_r (0.01569 0.0048 -0.02414)
      PathPoint P2: humerus_r (0.01847 -0.11738 -0.00494)
      PathWrap: wrap_object=deltoid
      passive_force_length_curve: SimmSpline: x=(-5 0.998 0.999 1 1.1 1.2 1.3 1.4 1.5 1.6 1.601 1.602 5)
          y=(0 0 0 0 0.035 0.12 0.26 0.55 1.17 2 2 2 2)
    Schutte1993Muscle_Deprecated delt_scap10: max_isometric_force=445 optimal_fiber_length=0.0748
        tendon_slack_length=0.064 pennation_angle_at_optimal=0.08726646 activation1=120.0992 activation2=29.15452
      PathPoint P1: scapula_r (0.01771 0.00508 -0.03311)
      PathPoint P2: humerus_r (0.0183 -0.10592 -0.00605)
      PathWrap: wrap_object=deltoid
      passive_force_length_curve: SimmSpline: x=(-5 0.998 0.999 1 1.1 1.2 1.3 1.4 1.5 1.6 1.601 1.602 5)
          y=(0 0 0 0 0.035 0.12 0.26 0.55 1.17 2 2 2 2)
    Schutte1993Muscle_Deprecated delt_scap11: max_isometric_force=239 optimal_fiber_length=0.0737
        tendon_slack_length=0.048 pennation_angle_at_optimal=0.08726646 activation1=79.16934 activation2=23.92344
      PathPoint P1: scapula_r (0.01522 0.00824 -0.04508)
      PathPoint P2: humerus_r (0.01806 -0.09231 -0.00863)
      PathWrap: wrap_object=deltoid
      passive_force_length_curve: SimmSpline: x=(-5 0.998 0.999 1 1.1 1.2 1.3 1.4 1.5 1.6 1.601 1.602 5)
          y=(0 0 0 0 0.035 0.12 0.26 0.55 1.17 2 2 2 2)
    Schutte1993Muscle_Deprecated delt_clav_1: max_isometric_force=128 optimal_fiber_length=0.0836
        tendon_slack_length=0.062 pennation_angle_at_optimal=0.08726646 activation1=79.16934 activation2=23.92344
      PathPoint P1: clavicle_r (0.1509 0.02065 0.00128)
      PathPoint P2: humerus_r (0.01806 -0.09231 -0.00863)
      PathWrap: wrap_object=deltoid
      passive_force_length_curve: SimmSpline: x=(-5 0.998 0.999 1 1.1 1.2 1.3 1.4 1.5 1.6 1.601 1.602 5)
          y=(0 0 0 0 0.035 0.12 0.26 0.55 1.17 2 2 2 2)
    Schutte1993Muscle_Deprecated delt_clav_2: max_isometric_force=160 optimal_fiber_length=0.094
        tendon_slack_length=0.088 pennation_angle_at_optimal=0.08726646 activation1=79.16934 activation2=23.92344
      PathPoint P1: clavicle_r (0.12912 0.02578 0.00498)
      PathPoint P2: humerus_r (0.01536 -0.11883 -0.01159)
      PathWrap: wrap_object=deltoid
      passive_force_length_curve: SimmSpline: x=(-5 0.998 0.999 1 1.1 1.2 1.3 1.4 1.5 1.6 1.601 1.602 5)
          y=(0 0 0 0 0.035 0.12 0.26 0.55 1.17 2 2 2 2)
    Schutte1993Muscle_Deprecated delt_clav_3: max_isometric_force=105 optimal_fiber_length=0.0824
        tendon_slack_length=0.067 pennation_angle_at_optimal=0.08726646 activation1=79.16934 activation2=23.92344
      PathPoint P1: clavicle_r (0.13429 0.02229 0.00073)
      PathPoint P2: humerus_r (0.01673 -0.09943 -0.0097)
      PathWrap: wrap_object=deltoid
      passive_force_length_curve: SimmSpline: x=(-5 0.998 0.999 1 1.1 1.2 1.3 1.4 1.5 1.6 1.601 1.602 5)
          y=(0 0 0 0 0.035 0.12 0.26 0.55 1.17 2 2 2 2)
    Schutte1993Muscle_Deprecated delt_clav_4: max_isometric_force=112 optimal_fiber_length=0.0991
        tendon_slack_length=0.073 pennation_angle_at_optimal=0.08726646 activation1=79.16934 activation2=23.92344
      PathPoint P1: clavicle_r (0.13196 0.01641 0.00086)
      PathPoint P2: humerus_r (0.01536 -0.11883 -0.01159)
      PathWrap: wrap_object=deltoid
      passive_force_length_curve: SimmSpline: x=(-5 0.998 0.999 1 1.1 1.2 1.3 1.4 1.5 1.6 1.601 1.602 5)
          y=(0 0 0 0 0.035 0.12 0.26 0.55 1.17 2 2 2 2)
    Schutte1993Muscle_Deprecated coracobr_1: max_isometric_force=201 optimal_fiber_length=0.066
        tendon_slack_length=0.092 pennation_angle_at_optimal=0 activation1=79.16934 activation2=23.92344
      PathPoint P1: scapula_r (-0.00808 -0.0086 -0.07655)
      PathPoint P2: humerus_r (-0.00267 -0.14632 -0.00771)
      passive_force_length_curve: SimmSpline: x=(-5 0.998 0.999 1 1.1 1.2 1.3 1.4 1.5 1.6 1.601 1.602 5)
          y=(0 0 0 0 0.035 0.12 0.26 0.55 1.17 2 2 2 2)
    Schutte1993Muscle_Deprecated coracobr_2: max_isometric_force=148 optimal_fiber_length=0.0683
        tendon_slack_length=0.104 pennation_angle_at_optimal=0 activation1=133.3534 activation2=30.58104
      PathPoint P1: scapula_r (-0.01352 -0.01494 -0.07857)
      PathPoint P2: humerus_r (-0.00764 -0.16485 -0.00176)
      passive_force_length_curve: SimmSpline: x=(-5 0.998 0.999 1 1.1 1.2 1.3 1.4 1.5 1.6 1.601 1.602 5)
          y=(0 0 0 0 0.035 0.12 0.26 0.55 1.17 2 2 2 2)
    Schutte1993Muscle_Deprecated coracobr_3: max_isometric_force=114 optimal_fiber_length=0.0727
        tendon_slack_length=0.113 pennation_angle_at_optimal=0 activation1=133.3534 activation2=30.58104
      PathPoint P1: scapula_r (-0.00927 -0.00819 -0.0826)
      PathPoint P2: humerus_r (-0.00534 -0.17394 -0.00556)
      passive_force_length_curve: SimmSpline: x=(-5 0.998 0.999 1 1.1 1.2 1.3 1.4 1.5 1.6 1.601 1.602 5)
          y=(0 0 0 0 0.035 0.12 0.26 0.55 1.17 2 2 2 2)
    Schutte1993Muscle_Deprecated infra_1: max_isometric_force=272 optimal_fiber_length=0.0633 tendon_slack_length=0.038
        pennation_angle_at_optimal=0 activation1=133.3534 activation2=30.58104
      PathPoint P1: scapula_r (-0.06093 -0.04183 -0.019)
      PathPoint P2: humerus_r (0.01994 0.00982 0.01257)
      PathWrap: wrap_object=infra_cyl
      passive_force_length_curve: SimmSpline: x=(-5 0.998 0.999 1 1.1 1.2 1.3 1.4 1.5 1.6 1.601 1.602 5)
          y=(0 0 0 0 0.035 0.12 0.26 0.55 1.17 2 2 2 2)
    Schutte1993Muscle_Deprecated infra_2: max_isometric_force=275 optimal_fiber_length=0.0719 tendon_slack_length=0.107
        pennation_angle_at_optimal=0 activation1=133.3534 activation2=30.58104
      PathPoint P1: scapula_r (-0.12606 -0.09226 0.00115)
      PathPoint P2: humerus_r (0.01835 0.016 0.00691)
      PathWrap: wrap_object=infra_cyl
      passive_force_length_curve: SimmSpline: x=(-5 0.998 0.999 1 1.1 1.2 1.3 1.4 1.5 1.6 1.601 1.602 5)
          y=(0 0 0 0 0.035 0.12 0.26 0.55 1.17 2 2 2 2)
    Schutte1993Muscle_Deprecated infra_3: max_isometric_force=194 optimal_fiber_length=0.0677 tendon_slack_length=0.084
        pennation_angle_at_optimal=0 activation1=133.3534 activation2=30.58104
      PathPoint P1: scapula_r (-0.1077 -0.07258 0.00057)
      PathPoint P2: humerus_r (0.01835 0.016 0.00691)
      PathWrap: wrap_object=infra_cyl
      passive_force_length_curve: SimmSpline: x=(-5 0.998 0.999 1 1.1 1.2 1.3 1.4 1.5 1.6 1.601 1.602 5)
          y=(0 0 0 0 0.035 0.12 0.26 0.55 1.17 2 2 2 2)
    Schutte1993Muscle_Deprecated infra_4: max_isometric_force=207 optimal_fiber_length=0.0693 tendon_slack_length=0.071
        pennation_angle_at_optimal=0 activation1=133.3534 activation2=30.58104
      PathPoint P1: scapula_r (-0.10911 -0.04946 -0.00122)
      PathPoint P2: humerus_r (0.01605 0.01912 0.00704)
      PathWrap: wrap_object=infra_cyl
      passive_force_length_curve: SimmSpline: x=(-5 1.098 1.099 1.1 1.21 1.32 1.43 1.54 1.65 1.76 1.761 1.762 5)
          y=(0 0 0 0 0.035 0.12 0.26 0.55 1.17 2 2 2 2)
    Schutte1993Muscle_Deprecated infra_5: max_isometric_force=302 optimal_fiber_length=0.0698 tendon_slack_length=0.05
        pennation_angle_at_optimal=0 activation1=82.95686 activation2=24.57002
      PathPoint P1: scapula_r (-0.10439 -0.01708 -0.01072)
      PathPoint P2: humerus_r (0.01605 0.01912 0.00704)
      PathWrap: wrap_object=infra_cyl
      passive_force_length_curve: SimmSpline: x=(-5 1.198 1.199 1.2 1.32 1.44 1.56 1.68 1.8 1.92 1.921 1.922 5)
          y=(0 0 0 0 0.035 0.12 0.26 0.55 1.17 2 2 2 2)
    Schutte1993Muscle_Deprecated infra_6: max_isometric_force=182 optimal_fiber_length=0.0753 tendon_slack_length=0.035
        pennation_angle_at_optimal=0 activation1=82.95686 activation2=24.57002
      PathPoint P1: scapula_r (-0.0807 -0.00038 0.00044)
      PathPoint P2: humerus_r (0.01917 0.01274 0.00836)
      PathWrap: wrap_object=infra_cyl
      passive_force_length_curve: SimmSpline: x=(-5 1.098 1.099 1.1 1.21 1.32 1.43 1.54 1.65 1.76 1.761 1.762 5)
          y=(0 0 0 0 0.035 0.12 0.26 0.55 1.17 2 2 2 2)
    Schutte1993Muscle_Deprecated ter_min_1: max_isometric_force=122 optimal_fiber_length=0.0501
        tendon_slack_length=0.049 pennation_angle_at_optimal=0 activation1=82.95686 activation2=24.57002
      PathPoint P1: scapula_r (-0.0557 -0.0665 -0.01405)
      PathPoint P2: humerus_r (0.02578 -0.00703 0.0088)
      PathWrap: wrap_object=ter_min_cyl
      passive_force_length_curve: SimmSpline: x=(-5 1.297 1.299 1.3 1.43 1.56 1.69 1.82 1.95 2.08 2.081 2.083 5)
          y=(0 0 0 0 0.035 0.12 0.26 0.55 1.17 2 2 2 2)
    Schutte1993Muscle_Deprecated ter_min_2: max_isometric_force=195 optimal_fiber_length=0.055
        tendon_slack_length=0.051 pennation_angle_at_optimal=0 activation1=82.95686 activation2=24.57002
      PathPoint P1: scapula_r (-0.06585 -0.06908 -0.00647)
      PathPoint P2: humerus_r (0.02808 -0.00124 0.008)
      PathWrap: wrap_object=ter_min_cyl
      passive_force_length_curve: SimmSpline: x=(-5 1.397 1.399 1.4 1.54 1.68 1.82 1.96 2.1 2.24 2.241 2.243 5)
          y=(0 0 0 0 0.035 0.12 0.26 0.55 1.17 2 2 2 2)
    Schutte1993Muscle_Deprecated ter_min_3: max_isometric_force=180 optimal_fiber_length=0.0506
        tendon_slack_length=0.018 pennation_angle_at_optimal=0 activation1=82.95686 activation2=24.57002
      PathPoint P1: scapula_r (-0.03809 -0.04208 -0.01695)
      PathPoint P2: humerus_r (0.02578 -0.00703 0.0088)
      PathWrap: wrap_object=ter_min_cyl
      passive_force_length_curve: SimmSpline: x=(-5 1.397 1.399 1.4 1.54 1.68 1.82 1.96 2.1 2.24 2.241 2.243 5)
          y=(0 0 0 0 0.035 0.12 0.26 0.55 1.17 2 2 2 2)
    Schutte1993Muscle_Deprecated ter_maj_1: max_isometric_force=165 optimal_fiber_length=0.1411
        tendon_slack_length=0.006 pennation_angle_at_optimal=0 activation1=82.95686 activation2=24.57002
      PathPoint P1: scapula_r (-0.08743 -0.10492 -0.0131)
      PathPoint P2: humerus_r (-0.00601 -0.06556 -0.00941)
      PathWrap: wrap_object=ter_lat_pec
      passive_force_length_curve: SimmSpline: x=(-5 0.998 0.999 1 1.1 1.2 1.3 1.4 1.5 1.6 1.601 1.602 5)
          y=(0 0 0 0 0.035 0.12 0.26 0.55 1.17 2 2 2 2)
    Schutte1993Muscle_Deprecated ter_maj_2: max_isometric_force=85 optimal_fiber_length=0.1595
        tendon_slack_length=0.012 pennation_angle_at_optimal=0 activation1=98.40426 activation2=26.59574
      PathPoint P1: scapula_r (-0.10274 -0.11248 -0.01045)
      PathPoint P2: humerus_r (-0.00286 -0.08427 -0.00946)
      PathWrap: wrap_object=ter_lat_pec
      passive_force_length_curve: SimmSpline: x=(-5 0.998 0.999 1 1.1 1.2 1.3 1.4 1.5 1.6 1.601 1.602 5)
          y=(0 0 0 0 0.035 0.12 0.26 0.55 1.17 2 2 2 2)
    Schutte1993Muscle_Deprecated ter_maj_3: max_isometric_force=200 optimal_fiber_length=0.1526
        tendon_slack_length=0.015 pennation_angle_at_optimal=0 activation1=98.40426 activation2=26.59574
      PathPoint P1: scapula_r (-0.09123 -0.09007 9e-5)
      PathPoint P2: humerus_r (-0.0038 -0.07838 -0.00899)
      PathWrap: wrap_object=ter_lat_pec
      passive_force_length_curve: SimmSpline: x=(-5 0.998 0.999 1 1.1 1.2 1.3 1.4 1.5 1.6 1.601 1.602 5)
          y=(0 0 0 0 0.035 0.12 0.26 0.55 1.17 2 2 2 2)
    Schutte1993Muscle_Deprecated ter_maj_4: max_isometric_force=158 optimal_fiber_length=0.1093
        tendon_slack_length=0.034 pennation_angle_at_optimal=0 activation1=98.40426 activation2=26.59574
      PathPoint P1: scapula_r (-0.07965 -0.09549 -0.01112)
      PathPoint P2: humerus_r (-0.00652 -0.04977 -0.01067)
      PathWrap: wrap_object=ter_lat_pec
      passive_force_length_curve: SimmSpline: x=(-5 0.998 0.999 1 1.1 1.2 1.3 1.4 1.5 1.6 1.601 1.602 5)
          y=(0 0 0 0 0.035 0.12 0.26 0.55 1.17 2 2 2 2)
    Schutte1993Muscle_Deprecated supra_1: max_isometric_force=120 optimal_fiber_length=0.0541 tendon_slack_length=0.017
        pennation_angle_at_optimal=0 activation1=98.40426 activation2=26.59574
      PathPoint P1: scapula_r (-0.06032 0.00324 -0.01859)
      PathPoint P2: humerus_r (0.0232 0.01256 0.00267)
      PathWrap: wrap_object=inf_sup_sub
      passive_force_length_curve: SimmSpline: x=(-5 1.098 1.099 1.1 1.21 1.32 1.43 1.54 1.65 1.76 1.761 1.762 5)
          y=(0 0 0 0 0.035 0.12 0.26 0.55 1.17 2 2 2 2)
    Schutte1993Muscle_Deprecated supra_2: max_isometric_force=113 optimal_fiber_length=0.0591 tendon_slack_length=0.025
        pennation_angle_at_optimal=0 activation1=98.40426 activation2=26.59574
      PathPoint P1: scapula_r (-0.05964 0.01101 -0.00694)
      PathPoint P2: humerus_r (0.0232 0.01256 0.00267)
      PathWrap: wrap_object=inf_sup_sub
      passive_force_length_curve: SimmSpline: x=(-5 0.998 0.999 1 1.1 1.2 1.3 1.4 1.5 1.6 1.601 1.602 5)
          y=(0 0 0 0 0.035 0.12 0.26 0.55 1.17 2 2 2 2)
    Schutte1993Muscle_Deprecated supra_3: max_isometric_force=258 optimal_fiber_length=0.0564 tendon_slack_length=0.052
        pennation_angle_at_optimal=0 activation1=98.40426 activation2=26.59574
      PathPoint P1: scapula_r (-0.09439 0.02104 -0.02501)
      PathPoint P2: humerus_r (0.01229 0.01923 -0.01372)
      PathWrap: wrap_object=inf_sup_sub
      passive_force_length_curve: SimmSpline: x=(-5 0.998 0.999 1 1.1 1.2 1.3 1.4 1.5 1.6 1.601 1.602 5)
          y=(0 0 0 0 0.035 0.12 0.26 0.55 1.17 2 2 2 2)
    Schutte1993Muscle_Deprecated supra_4: max_isometric_force=130 optimal_fiber_length=0.0554 tendon_slack_length=0.031
        pennation_angle_at_optimal=0 activation1=63.46917 activation2=21.2766
      PathPoint P1: scapula_r (-0.07385 0.0212 -0.04032)
      PathPoint P2: humerus_r (0.01229 0.01923 -0.01372)
      PathWrap: wrap_object=inf_sup_sub
      passive_force_length_curve: SimmSpline: x=(-5 0.998 0.999 1 1.1 1.2 1.3 1.4 1.5 1.6 1.601 1.602 5)
          y=(0 0 0 0 0.035 0.12 0.26 0.55 1.17 2 2 2 2)
    Schutte1993Muscle_Deprecated subscap_1: max_isometric_force=44 optimal_fiber_length=0.0556
        tendon_slack_length=0.028 pennation_angle_at_optimal=0 activation1=63.46917 activation2=21.2766
      PathPoint P1: scapula_r (-0.06191 -0.01317 -0.02286)
      PathPoint P2: humerus_r (-0.0179 0.0122 -0.0149)
      PathPoint P3: humerus_r (-0.00294 0.01654 -0.01923)
      PathWrap: wrap_object=inf_sup_sub
      passive_force_length_curve: SimmSpline: x=(-5 0.998 0.999 1 1.1 1.2 1.3 1.4 1.5 1.6 1.601 1.602 5)
          y=(0 0 0 0 0.035 0.12 0.26 0.55 1.17 2 2 2 2)
    Schutte1993Muscle_Deprecated subscap_2: max_isometric_force=78 optimal_fiber_length=0.0649
        tendon_slack_length=0.044 pennation_angle_at_optimal=0 activation1=63.46917 activation2=21.2766
      PathPoint P1: scapula_r (-0.08371 0.01198 -0.02805)
      PathPoint P2: humerus_r (-0.0199 0.0136 -0.011)
      PathPoint P3: humerus_r (-0.00052 0.01294 -0.02164)
      PathWrap: wrap_object=inf_sup_sub
      passive_force_length_curve: SimmSpline: x=(-5 0.998 0.999 1 1.1 1.2 1.3 1.4 1.5 1.6 1.601 1.602 5)
          y=(0 0 0 0 0.035 0.12 0.26 0.55 1.17 2 2 2 2)
    Schutte1993Muscle_Deprecated subscap_3: max_isometric_force=264 optimal_fiber_length=0.0676
        tendon_slack_length=0.059 pennation_angle_at_optimal=0.08726646 activation1=63.46917 activation2=21.2766
      PathPoint P1: scapula_r (-0.10494 -0.01449 -0.01421)
      PathPoint P2: humerus_r (-0.0079 0.0153 -0.0192)
      PathPoint P3: humerus_r (-0.00294 0.01654 -0.01923)
      PathWrap: wrap_object=inf_sup_sub
      passive_force_length_curve: SimmSpline: x=(-5 0.998 0.999 1 1.1 1.2 1.3 1.4 1.5 1.6 1.601 1.602 5)
          y=(0 0 0 0 0.035 0.12 0.26 0.55 1.17 2 2 2 2)
    Schutte1993Muscle_Deprecated subscap_4: max_isometric_force=274 optimal_fiber_length=0.0744
        tendon_slack_length=0.055 pennation_angle_at_optimal=0.08726646 activation1=63.46917 activation2=21.2766
      PathPoint P1: scapula_r (-0.09383 -0.04361 -0.008)
      PathPoint P2: humerus_r (0.00035 0.00641 -0.02488)
      PathWrap: wrap_object=inf_sup_sub
      passive_force_length_curve: SimmSpline: x=(-5 0.998 0.999 1 1.1 1.2 1.3 1.4 1.5 1.6 1.601 1.602 5)
          y=(0 0 0 0 0.035 0.12 0.26 0.55 1.17 2 2 2 2)
    Schutte1993Muscle_Deprecated subscap_5: max_isometric_force=114 optimal_fiber_length=0.0797
        tendon_slack_length=0.066 pennation_angle_at_optimal=0 activation1=63.46917 activation2=21.2766
      PathPoint P1: scapula_r (-0.08744 -0.05705 -0.01224)
      PathPoint P2: humerus_r (0.00434 0.00857 -0.02458)
      PathWrap: wrap_object=inf_sup_sub
      passive_force_length_curve: SimmSpline: x=(-5 0.998 0.999 1 1.1 1.2 1.3 1.4 1.5 1.6 1.601 1.602 5)
          y=(0 0 0 0 0.035 0.12 0.26 0.55 1.17 2 2 2 2)
    Schutte1993Muscle_Deprecated subscap_6: max_isometric_force=149 optimal_fiber_length=0.0762
        tendon_slack_length=0.077 pennation_angle_at_optimal=0 activation1=78.28785 activation2=23.75297
      PathPoint P1: scapula_r (-0.10583 -0.07907 -0.00359)
      PathPoint P2: humerus_r (0.00177 0.00229 -0.02803)
      PathWrap: wrap_object=inf_sup_sub
      passive_force_length_curve: SimmSpline: x=(-5 0.998 0.999 1 1.1 1.2 1.3 1.4 1.5 1.6 1.601 1.602 5)
          y=(0 0 0 0 0.035 0.12 0.26 0.55 1.17 2 2 2 2)
    Schutte1993Muscle_Deprecated subscap_7: max_isometric_force=162 optimal_fiber_length=0.082
        tendon_slack_length=0.079 pennation_angle_at_optimal=0 activation1=78.28785 activation2=23.75297
      PathPoint P1: scapula_r (-0.09986 -0.09466 -0.01007)
      PathPoint P2: humerus_r (-0.00244 0.00087 -0.02664)
      PathWrap: wrap_object=inf_sup_sub
      passive_force_length_curve: SimmSpline: x=(-5 0.998 0.999 1 1.1 1.2 1.3 1.4 1.5 1.6 1.601 1.602 5)
          y=(0 0 0 0 0.035 0.12 0.26 0.55 1.17 2 2 2 2)
    Schutte1993Muscle_Deprecated subscap_8: max_isometric_force=61 optimal_fiber_length=0.0765 tendon_slack_length=0.04
        pennation_angle_at_optimal=0 activation1=112.5165 activation2=28.32861
      PathPoint P1: scapula_r (-0.06847 -0.06545 -0.01992)
      PathPoint P2: humerus_r (-0.00244 0.00087 -0.02664)
      PathWrap: wrap_object=inf_sup_sub
      passive_force_length_curve: SimmSpline: x=(-5 0.998 0.999 1 1.1 1.2 1.3 1.4 1.5 1.6 1.601 1.602 5)
          y=(0 0 0 0 0.035 0.12 0.26 0.55 1.17 2 2 2 2)
    Schutte1993Muscle_Deprecated subscap_9: max_isometric_force=222 optimal_fiber_length=0.0721
        tendon_slack_length=0.059 pennation_angle_at_optimal=0 activation1=112.5165 activation2=28.32861
      PathPoint P1: scapula_r (-0.07975 -0.0921 -0.01229)
      PathPoint P2: humerus_r (-0.00657 -0.00374 -0.02331)
      PathWrap: wrap_object=inf_sup_sub
      passive_force_length_curve: SimmSpline: x=(-5 0.998 0.999 1 1.1 1.2 1.3 1.4 1.5 1.6 1.601 1.602 5)
          y=(0 0 0 0 0.035 0.12 0.26 0.55 1.17 2 2 2 2)
    Schutte1993Muscle_Deprecated subscap10: max_isometric_force=47 optimal_fiber_length=0.0676 tendon_slack_length=0.01
        pennation_angle_at_optimal=0 activation1=45.41056 activation2=17.48252
      PathPoint P1: scapula_r (-0.04636 -0.05426 -0.02109)
      PathPoint P2: humerus_r (-0.00741 -0.01704 -0.01554)
      PathWrap: wrap_object=inf_sup_sub
      passive_force_length_curve: SimmSpline: x=(-5 0.998 0.999 1 1.1 1.2 1.3 1.4 1.5 1.6 1.601 1.602 5)
          y=(0 0 0 0 0.035 0.12 0.26 0.55 1.17 2 2 2 2)
    Schutte1993Muscle_Deprecated subscap11: max_isometric_force=16 optimal_fiber_length=0.0643 tendon_slack_length=0.01
        pennation_angle_at_optimal=0 activation1=45.41056 activation2=17.48252
      PathPoint P1: scapula_r (-0.03613 -0.04567 -0.02881)
      PathPoint P2: humerus_r (-0.00974 -0.02286 -0.01025)
      PathWrap: wrap_object=inf_sup_sub
      passive_force_length_curve: SimmSpline: x=(-5 0.998 0.999 1 1.1 1.2 1.3 1.4 1.5 1.6 1.601 1.602 5)
          y=(0 0 0 0 0.035 0.12 0.26 0.55 1.17 2 2 2 2)
    Schutte1993Muscle_Deprecated bic_l: max_isometric_force=347 optimal_fiber_length=0.1292 tendon_slack_length=0.2335
        pennation_angle_at_optimal=0 activation1=45.41056 activation2=17.48252
      PathPoint P1: scapula_r (-0.01401 -0.00249 -0.04288)
      PathPoint P2: humerus_r (0.0217 0.0001 -0.0011)
      PathPoint P3: radius_r (0.0006141 -0.039995 -0.010231)
      PathWrap: wrap_object=inf_sup_sub
      PathWrap: wrap_object=bic_radius_cyl
      passive_force_length_curve: SimmSpline: x=(-5 1.297 1.299 1.3 1.43 1.56 1.69 1.82 1.95 2.08 2.081 2.083 5)
          y=(0 0 0 0 0.035 0.12 0.26 0.55 1.17 2 2 2 2)
    Schutte1993Muscle_Deprecated bic_b_1: max_isometric_force=173 optimal_fiber_length=0.117 tendon_slack_length=0.1913
        pennation_angle_at_optimal=0 activation1=45.41056 activation2=17.48252
      PathPoint P1: scapula_r (-0.00915 -0.00833 -0.08244)
      PathPoint P2: radius_r (0.0006141 -0.039995 -0.010231)
      PathWrap: wrap_object=bic_radius_cyl
      passive_force_length_curve: SimmSpline: x=(-5 1.497 1.498 1.5 1.65 1.8 1.95 2.1 2.25 2.4 2.402 2.403 5)
          y=(0 0 0 0 0.035 0.12 0.26 0.55 1.17 2 2 2 2)
    Schutte1993Muscle_Deprecated bic_b_2: max_isometric_force=322 optimal_fiber_length=0.1149
        tendon_slack_length=0.1927 pennation_angle_at_optimal=0 activation1=45.41056 activation2=17.48252
      PathPoint P1: scapula_r (-0.00915 -0.00833 -0.08244)
      PathPoint P2: radius_r (0.0006141 -0.039995 -0.010231)
      PathWrap: wrap_object=bic_radius_cyl
      passive_force_length_curve: SimmSpline: x=(-5 1.597 1.598 1.6 1.76 1.92 2.08 2.24 2.4 2.56 2.562 2.563 5)
          y=(0 0 0 0 0.035 0.12 0.26 0.55 1.17 2 2 2 2)
    Schutte1993Muscle_Deprecated tric_long_1: max_isometric_force=223 optimal_fiber_length=0.1008
        tendon_slack_length=0.2041 pennation_angle_at_optimal=0.1745329 activation1=62.32493 activation2=21.0084
      PathPoint P1: ulna_r (-0.024996 -0.0090948 -0.00221)
      PathPoint P2: scapula_r (-0.03222 -0.04378 -0.02056)
      PathWrap: wrap_object=elbow
      passive_force_length_curve: SimmSpline: x=(-5 1.497 1.498 1.5 1.65 1.8 1.95 2.1 2.25 2.4 2.402 2.403 5)
          y=(0 0 0 0 0.035 0.12 0.26 0.55 1.17 2 2 2 2)
    Schutte1993Muscle_Deprecated tric_long_2: max_isometric_force=296 optimal_fiber_length=0.0881
        tendon_slack_length=0.2193 pennation_angle_at_optimal=0.1745329 activation1=62.32493 activation2=21.0084
      PathPoint P1: ulna_r (-0.011615 -0.013893 0.0015411)
      PathPoint P2: scapula_r (-0.02425 -0.04193 -0.03744)
      PathWrap: wrap_object=elbow
      passive_force_length_curve: SimmSpline: x=(-5 1.497 1.498 1.5 1.65 1.8 1.95 2.1 2.25 2.4 2.402 2.403 5)
          y=(0 0 0 0 0.035 0.12 0.26 0.55 1.17 2 2 2 2)
    Schutte1993Muscle_Deprecated tric_long_3: max_isometric_force=283 optimal_fiber_length=0.1183
        tendon_slack_length=0.218 pennation_angle_at_optimal=0.1745329 activation1=62.32493 activation2=21.0084
      PathPoint P1: ulna_r (-0.01555 -0.043607 0.0038408)
      PathPoint P2: scapula_r (-0.02254 -0.03911 -0.02787)
      PathWrap: wrap_object=elbow
      passive_force_length_curve: SimmSpline: x=(-5 1.397 1.399 1.4 1.54 1.68 1.82 1.96 2.1 2.24 2.241 2.243 5)
          y=(0 0 0 0 0.035 0.12 0.26 0.55 1.17 2 2 2 2)
    Schutte1993Muscle_Deprecated tric_long_4: max_isometric_force=327 optimal_fiber_length=0.1226
        tendon_slack_length=0.2197 pennation_angle_at_optimal=0 activation1=62.32493 activation2=21.0084
      PathPoint P1: ulna_r (-0.0099292 -0.040926 0.0016139)
      PathPoint P2: scapula_r (-0.02425 -0.04193 -0.03744)
      PathWrap: wrap_object=elbow
      passive_force_length_curve: SimmSpline: x=(-5 1.198 1.199 1.2 1.32 1.44 1.56 1.68 1.8 1.92 1.921 1.922 5)
          y=(0 0 0 0 0.035 0.12 0.26 0.55 1.17 2 2 2 2)
    Schutte1993Muscle_Deprecated lat_dorsi_1: max_isometric_force=56 optimal_fiber_length=0.2343
        tendon_slack_length=0.09 pennation_angle_at_optimal=0 activation1=62.32493 activation2=21.0084
      PathPoint P1: thorax (0.0098 -0.126 0.1526)
      PathPoint P2: humerus_r (0.00138 -0.03789 -0.01764)
      PathWrap: wrap_object=ter_lat_pec
      passive_force_length_curve: SimmSpline: x=(-5 0.998 0.999 1 1.1 1.2 1.3 1.4 1.5 1.6 1.601 1.602 5)
          y=(0 0 0 0 0.035 0.12 0.26 0.55 1.17 2 2 2 2)
    Schutte1993Muscle_Deprecated lat_dorsi_2: max_isometric_force=88 optimal_fiber_length=0.2857
        tendon_slack_length=0.083 pennation_angle_at_optimal=0 activation1=62.32493 activation2=21.0084
      PathPoint P1: thorax (0.013 -0.1967 0.1482)
      PathPoint P2: humerus_r (0.00213 -0.04447 -0.01724)
      PathWrap: wrap_object=ter_lat_pec
      passive_force_length_curve: SimmSpline: x=(-5 0.998 0.999 1 1.1 1.2 1.3 1.4 1.5 1.6 1.601 1.602 5)
          y=(0 0 0 0 0.035 0.12 0.26 0.55 1.17 2 2 2 2)
    Schutte1993Muscle_Deprecated lat_dorsi_3: max_isometric_force=129 optimal_fiber_length=0.2951
        tendon_slack_length=0.105 pennation_angle_at_optimal=0 activation1=62.32493 activation2=21.0084
      PathPoint P1: thorax (0.0116 -0.2515 0.1392)
      PathPoint P2: humerus_r (0.00213 -0.04447 -0.01724)
      PathWrap: wrap_object=ter_lat_pec
      passive_force_length_curve: SimmSpline: x=(-5 0.998 0.999 1 1.1 1.2 1.3 1.4 1.5 1.6 1.601 1.602 5)
          y=(0 0 0 0 0.035 0.12 0.26 0.55 1.17 2 2 2 2)
    Schutte1993Muscle_Deprecated lat_dorsi_4: max_isometric_force=96 optimal_fiber_length=0.3206
        tendon_slack_length=0.12 pennation_angle_at_optimal=0 activation1=62.32493 activation2=21.0084
      PathPoint P1: thorax (0.0211 -0.3109 0.128)
      PathPoint P2: humerus_r (0.00138 -0.03789 -0.01764)
      PathWrap: wrap_object=ter_lat_pec
      passive_force_length_curve: SimmSpline: x=(-5 0.998 0.999 1 1.1 1.2 1.3 1.4 1.5 1.6 1.601 1.602 5)
          y=(0 0 0 0 0.035 0.12 0.26 0.55 1.17 2 2 2 2)
    Schutte1993Muscle_Deprecated lat_dorsi_5: max_isometric_force=88 optimal_fiber_length=0.3129
        tendon_slack_length=0.072 pennation_angle_at_optimal=0 activation1=62.32493 activation2=21.0084
      PathPoint P1: thorax (0.0792 -0.3084 0.0992)
      PathPoint P2: humerus_r (0.00138 -0.03789 -0.01764)
      PathWrap: wrap_object=ter_lat_pec
      passive_force_length_curve: SimmSpline: x=(-5 0.998 0.999 1 1.1 1.2 1.3 1.4 1.5 1.6 1.601 1.602 5)
          y=(0 0 0 0 0.035 0.12 0.26 0.55 1.17 2 2 2 2)
    Schutte1993Muscle_Deprecated lat_dorsi_6: max_isometric_force=105 optimal_fiber_length=0.3402
        tendon_slack_length=0.069 pennation_angle_at_optimal=0 activation1=62.32493 activation2=21.0084
      PathPoint P1: thorax (0.1042 -0.2978 0.0851)
      PathPoint P2: humerus_r (0.00213 -0.04447 -0.01724)
      PathWrap: wrap_object=ter_lat_pec
      passive_force_length_curve: SimmSpline: x=(-5 0.998 0.999 1 1.1 1.2 1.3 1.4 1.5 1.6 1.601 1.602 5)
          y=(0 0 0 0 0.035 0.12 0.26 0.55 1.17 2 2 2 2)
    Schutte1993Muscle_Deprecated pect_maj_t_1: max_isometric_force=125 optimal_fiber_length=0.1884
        tendon_slack_length=0.036 pennation_angle_at_optimal=0 activation1=63.46917 activation2=21.2766
      PathPoint P1: thorax (0.0612 -0.1574 -0.0321)
      PathPoint P2: humerus_r (0.01035 -0.0631 -0.01727)
      PathWrap: wrap_object=ter_lat_pec
      passive_force_length_curve: SimmSpline: x=(-5 0.998 0.999 1 1.1 1.2 1.3 1.4 1.5 1.6 1.601 1.602 5)
          y=(0 0 0 0 0.035 0.12 0.26 0.55 1.17 2 2 2 2)
    Schutte1993Muscle_Deprecated pect_maj_t_2: max_isometric_force=118 optimal_fiber_length=0.183
        tendon_slack_length=0.043 pennation_angle_at_optimal=0 activation1=78.28785 activation2=23.75297
      PathPoint P1: thorax (0.0279 -0.1403 -0.0392)
      PathPoint P2: humerus_r (0.01089 -0.06875 -0.01702)
      PathWrap: wrap_object=ter_lat_pec
      passive_force_length_curve: SimmSpline: x=(-5 0.998 0.999 1 1.1 1.2 1.3 1.4 1.5 1.6 1.601 1.602 5)
          y=(0 0 0 0 0.035 0.12 0.26 0.55 1.17 2 2 2 2)
    Schutte1993Muscle_Deprecated pect_maj_t_3: max_isometric_force=165 optimal_fiber_length=0.1853
        tendon_slack_length=0.053 pennation_angle_at_optimal=0 activation1=78.28785 activation2=23.75297
      PathPoint P1: thorax (0.0084 -0.1223 -0.0348)
      PathPoint P2: humerus_r (0.01078 -0.0738 -0.01675)
      PathWrap: wrap_object=ter_lat_pec
      passive_force_length_curve: SimmSpline: x=(-5 0.998 0.999 1 1.1 1.2 1.3 1.4 1.5 1.6 1.601 1.602 5)
          y=(0 0 0 0 0.035 0.12 0.26 0.55 1.17 2 2 2 2)
    Schutte1993Muscle_Deprecated pect_maj_t_4: max_isometric_force=157 optimal_fiber_length=0.1833
        tendon_slack_length=0.028 pennation_angle_at_optimal=0 activation1=112.5165 activation2=28.32861
      PathPoint P1: thorax (0.0132 -0.1006 -0.0372)
      PathPoint P2: humerus_r (0.01111 -0.06428 -0.01752)
      PathWrap: wrap_object=ter_lat_pec
      passive_force_length_curve: SimmSpline: x=(-5 0.998 0.999 1 1.1 1.2 1.3 1.4 1.5 1.6 1.601 1.602 5)
          y=(0 0 0 0 0.035 0.12 0.26 0.55 1.17 2 2 2 2)
    Schutte1993Muscle_Deprecated pect_maj_t_5: max_isometric_force=133 optimal_fiber_length=0.15
        tendon_slack_length=0.026 pennation_angle_at_optimal=0 activation1=112.5165 activation2=28.32861
      PathPoint P1: thorax (0.0071 -0.0418 -0.019)
      PathPoint P2: humerus_r (0.01112 -0.05418 -0.01808)
      PathWrap: wrap_object=ter_lat_pec
      passive_force_length_curve: SimmSpline: x=(-5 0.998 0.999 1 1.1 1.2 1.3 1.4 1.5 1.6 1.601 1.602 5)
          y=(0 0 0 0 0.035 0.12 0.26 0.55 1.17 2 2 2 2)
    Schutte1993Muscle_Deprecated pect_maj_t_6: max_isometric_force=198 optimal_fiber_length=0.1449
        tendon_slack_length=0.036 pennation_angle_at_optimal=0 activation1=45.41056 activation2=17.48252
      PathPoint P1: thorax (0.0116 -0.0227 -0.0061)
      PathPoint P2: humerus_r (0.01111 -0.06428 -0.01752)
      PathWrap: wrap_object=ter_lat_pec
      passive_force_length_curve: SimmSpline: x=(-5 0.998 0.999 1 1.1 1.2 1.3 1.4 1.5 1.6 1.601 1.602 5)
          y=(0 0 0 0 0.035 0.12 0.26 0.55 1.17 2 2 2 2)
    Schutte1993Muscle_Deprecated pect_maj_c_1: max_isometric_force=179 optimal_fiber_length=0.1363
        tendon_slack_length=0.017 pennation_angle_at_optimal=0 activation1=45.41056 activation2=17.48252
      PathPoint P1: clavicle_r (0.06298 0.01075 -0.01636)
      PathPoint P2: humerus_r (0.01184 -0.08869 -0.01555)
      PathWrap: wrap_object=ter_lat_pec
      passive_force_length_curve: SimmSpline: x=(-5 0.998 0.999 1 1.1 1.2 1.3 1.4 1.5 1.6 1.601 1.602 5)
          y=(0 0 0 0 0.035 0.12 0.26 0.55 1.17 2 2 2 2)
    Schutte1993Muscle_Deprecated pect_maj_c_2: max_isometric_force=113 optimal_fiber_length=0.1091
        tendon_slack_length=0.014 pennation_angle_at_optimal=0 activation1=45.41056 activation2=17.48252
      PathPoint P1: clavicle_r (0.08276 0.01309 -0.01496)
      PathPoint P2: humerus_r (0.01112 -0.05418 -0.01808)
      PathWrap: wrap_object=ter_lat_pec
      passive_force_length_curve: SimmSpline: x=(-5 0.998 0.999 1 1.1 1.2 1.3 1.4 1.5 1.6 1.601 1.602 5)
          y=(0 0 0 0 0.035 0.12 0.26 0.55 1.17 2 2 2 2)
    Schutte1993Muscle_Deprecated tric_med_1: max_isometric_force=263 optimal_fiber_length=0.0807
        tendon_slack_length=0.0875 pennation_angle_at_optimal=0.296706 activation1=45.41056 activation2=17.48252
      PathPoint P1: humerus_r (-0.00714 -0.14854 -7e-5)
      PathPoint P2: ulna_r (-0.028638 0.00046353 0.0076998)
      PathWrap: wrap_object=elbow
      passive_force_length_curve: SimmSpline: x=(-5 1.297 1.299 1.3 1.43 1.56 1.69 1.82 1.95 2.08 2.081 2.083 5)
          y=(0 0 0 0 0.035 0.12 0.26 0.55 1.17 2 2 2 2)
    Schutte1993Muscle_Deprecated tric_med_2: max_isometric_force=256 optimal_fiber_length=0.0773
        tendon_slack_length=0.1122 pennation_angle_at_optimal=0 activation1=62.32493 activation2=21.0084
      PathPoint P1: humerus_r (-0.00622 -0.12402 0.00296)
      PathPoint P2: ulna_r (-0.028638 0.00046353 0.0076998)
      PathWrap: wrap_object=elbow
      passive_force_length_curve: SimmSpline: x=(-5 1.297 1.299 1.3 1.43 1.56 1.69 1.82 1.95 2.08 2.081 2.083 5)
          y=(0 0 0 0 0.035 0.12 0.26 0.55 1.17 2 2 2 2)
    Schutte1993Muscle_Deprecated tric_med_3: max_isometric_force=240 optimal_fiber_length=0.0602
        tendon_slack_length=0.0107 pennation_angle_at_optimal=0 activation1=62.32493 activation2=21.0084
      PathPoint P1: humerus_r (0.00936 -0.24184 0.01321)
      PathPoint P2: ulna_r (-0.028638 0.00046353 0.0076998)
      PathWrap: wrap_object=elbow
      passive_force_length_curve: SimmSpline: x=(-5 1.397 1.399 1.4 1.54 1.68 1.82 1.96 2.1 2.24 2.241 2.243 5)
          y=(0 0 0 0 0.035 0.12 0.26 0.55 1.17 2 2 2 2)
    Schutte1993Muscle_Deprecated tric_med_4: max_isometric_force=211 optimal_fiber_length=0.0746
        tendon_slack_length=0.0404 pennation_angle_at_optimal=0.1396263 activation1=62.32493 activation2=21.0084
      PathPoint P1: humerus_r (0.00264 -0.19989 0.01615)
      PathPoint P2: ulna_r (-0.028638 0.00046353 0.0076998)
      PathWrap: wrap_object=elbow
      passive_force_length_curve: SimmSpline: x=(-5 1.297 1.299 1.3 1.43 1.56 1.69 1.82 1.95 2.08 2.081 2.083 5)
          y=(0 0 0 0 0.035 0.12 0.26 0.55 1.17 2 2 2 2)
    Schutte1993Muscle_Deprecated tric_med_5: max_isometric_force=107 optimal_fiber_length=0.0807
        tendon_slack_length=0.0738 pennation_angle_at_optimal=0 activation1=62.32493 activation2=21.0084
      PathPoint P1: humerus_r (-0.0058 -0.15646 0.00909)
      PathPoint P2: ulna_r (-0.028638 0.00046353 0.0076998)
      PathWrap: wrap_object=elbow
      passive_force_length_curve: SimmSpline: x=(-5 1.198 1.199 1.2 1.32 1.44 1.56 1.68 1.8 1.92 1.921 1.922 5)
          y=(0 0 0 0 0.035 0.12 0.26 0.55 1.17 2 2 2 2)
    Schutte1993Muscle_Deprecated brachialis_1: max_isometric_force=314 optimal_fiber_length=0.0876
        tendon_slack_length=0.0807 pennation_angle_at_optimal=0 activation1=62.32493 activation2=21.0084
      PathPoint P1: humerus_r (0.00954 -0.14854 0.00625)
      PathPoint P2: ulna_r (-0.01645 -0.039874 -0.013687)
      PathWrap: wrap_object=elbow_circ
      passive_force_length_curve: SimmSpline: x=(-5 1.198 1.199 1.2 1.32 1.44 1.56 1.68 1.8 1.92 1.921 1.922 5)
          y=(0 0 0 0 0.035 0.12 0.26 0.55 1.17 2 2 2 2)
    Schutte1993Muscle_Deprecated brachialis_2: max_isometric_force=158 optimal_fiber_length=0.0953
        tendon_slack_length=0.0592 pennation_angle_at_optimal=0 activation1=62.32493 activation2=21.0084
      PathPoint P1: humerus_r (-0.00285 -0.154 -0.00517)
      PathPoint P2: ulna_r (-0.020572 -0.036649 -0.014107)
      PathWrap: wrap_object=elbow_circ
      passive_force_length_curve: SimmSpline: x=(-5 1.198 1.199 1.2 1.32 1.44 1.56 1.68 1.8 1.92 1.921 1.922 5)
          y=(0 0 0 0 0.035 0.12 0.26 0.55 1.17 2 2 2 2)
    Schutte1993Muscle_Deprecated brachialis_3: max_isometric_force=157 optimal_fiber_length=0.087
        tendon_slack_length=0.0394 pennation_angle_at_optimal=0 activation1=62.32493 activation2=21.0084
      PathPoint P1: humerus_r (-0.0087 -0.18035 -0.00033)
      PathPoint P2: ulna_r (-0.024538 -0.024365 -0.015986)
      PathWrap: wrap_object=elbow_circ
      passive_force_length_curve: SimmSpline: x=(-5 1.098 1.099 1.1 1.21 1.32 1.43 1.54 1.65 1.76 1.761 1.762 5)
          y=(0 0 0 0 0.035 0.12 0.26 0.55 1.17 2 2 2 2)
    Schutte1993Muscle_Deprecated brachialis_4: max_isometric_force=87 optimal_fiber_length=0.0758
        tendon_slack_length=0.0317 pennation_angle_at_optimal=0 activation1=62.32493 activation2=21.0084
      PathPoint P1: humerus_r (-0.00018 -0.19078 -0.00104)
      PathPoint P2: ulna_r (-0.017211 -0.036879 -0.0129174)
      PathWrap: wrap_object=elbow_circ
      passive_force_length_curve: SimmSpline: x=(-5 1.397 1.399 1.4 1.54 1.68 1.82 1.96 2.1 2.24 2.241 2.243 5)
          y=(0 0 0 0 0.035 0.12 0.26 0.55 1.17 2 2 2 2)
    Schutte1993Muscle_Deprecated brachialis_5: max_isometric_force=101 optimal_fiber_length=0.0619
        tendon_slack_length=0.0209 pennation_angle_at_optimal=0 activation1=62.32493 activation2=21.0084
      PathPoint P1: humerus_r (-0.01268 -0.22134 0.00514)
      PathPoint P2: ulna_r (-0.022885 -0.031618 -0.015156)
      PathWrap: wrap_object=elbow_circ
      passive_force_length_curve: SimmSpline: x=(-5 1.297 1.299 1.3 1.43 1.56 1.69 1.82 1.95 2.08 2.081 2.083 5)
          y=(0 0 0 0 0.035 0.12 0.26 0.55 1.17 2 2 2 2)
    Schutte1993Muscle_Deprecated brachialis_6: max_isometric_force=104 optimal_fiber_length=0.0472
        tendon_slack_length=0.035 pennation_angle_at_optimal=0 activation1=62.32493 activation2=21.0084
      PathPoint P1: humerus_r (-0.00198 -0.22967 0.00021)
      PathPoint P2: ulna_r (-0.022992 -0.026721 -0.017479)
      PathWrap: wrap_object=elbow_circ
      passive_force_length_curve: SimmSpline: x=(-5 1.198 1.199 1.2 1.32 1.44 1.56 1.68 1.8 1.92 1.921 1.922 5)
          y=(0 0 0 0 0.035 0.12 0.26 0.55 1.17 2 2 2 2)
    Schutte1993Muscle_Deprecated brachialis_7: max_isometric_force=118 optimal_fiber_length=0.0621
        tendon_slack_length=0.0076 pennation_angle_at_optimal=0 activation1=62.32493 activation2=21.0084
      PathPoint P1: humerus_r (-0.01261 -0.2366 0.00399)
      PathPoint P2: ulna_r (-0.013911 -0.035475 -0.011858)
      PathWrap: wrap_object=elbow_circ
      passive_force_length_curve: SimmSpline: x=(-5 1.297 1.299 1.3 1.43 1.56 1.69 1.82 1.95 2.08 2.081 2.083 5)
          y=(0 0 0 0 0.035 0.12 0.26 0.55 1.17 2 2 2 2)
    Schutte1993Muscle_Deprecated brachiorad_1: max_isometric_force=30 optimal_fiber_length=0.1613
        tendon_slack_length=0.1197 pennation_angle_at_optimal=0 activation1=62.32493 activation2=21.0084
      PathPoint P1: humerus_r (0.0036541 -0.20097 0.0050975)
      PathPoint P2: radius_r (0.051653 -0.22615 -0.02093)
      passive_force_length_curve: SimmSpline: x=(-5 1.198 1.199 1.2 1.32 1.44 1.56 1.68 1.8 1.92 1.921 1.922 5)
          y=(0 0 0 0 0.035 0.12 0.26 0.55 1.17 2 2 2 2)
    Schutte1993Muscle_Deprecated brachiorad_2: max_isometric_force=82 optimal_fiber_length=0.1613
        tendon_slack_length=0.1197 pennation_angle_at_optimal=0 activation1=62.32493 activation2=21.0084
      PathPoint P1: humerus_r (0.0053916 -0.21896 0.011175)
      PathPoint P2: radius_r (0.051653 -0.22615 -0.02093)
      passive_force_length_curve: SimmSpline: x=(-5 1.198 1.199 1.2 1.32 1.44 1.56 1.68 1.8 1.92 1.921 1.922 5)
          y=(0 0 0 0 0.035 0.12 0.26 0.55 1.17 2 2 2 2)
    Schutte1993Muscle_Deprecated brachiorad_3: max_isometric_force=52 optimal_fiber_length=0.1066
        tendon_slack_length=0.1542 pennation_angle_at_optimal=0 activation1=62.32493 activation2=21.0084
      PathPoint P1: humerus_r (0.0068689 -0.23579 0.011888)
      PathPoint P2: radius_r (0.051653 -0.22615 -0.02093)
      passive_force_length_curve: SimmSpline: x=(-5 1.297 1.299 1.3 1.43 1.56 1.69 1.82 1.95 2.08 2.081 2.083 5)
          y=(0 0 0 0 0.035 0.12 0.26 0.55 1.17 2 2 2 2)
    Schutte1993Muscle_Deprecated pron_teres_1: max_isometric_force=510 optimal_fiber_length=0.061
        tendon_slack_length=0.0851 pennation_angle_at_optimal=0 activation1=62.32493 activation2=21.0084
      PathPoint P1: humerus_r (-0.03769 -0.27686 0.00635)
      PathPoint P2: radius_r (0.034089 -0.10559 0.0061276)
      PathWrap: wrap_object=pron_t_cyl
      passive_force_length_curve: SimmSpline: x=(-5 1.297 1.299 1.3 1.43 1.56 1.69 1.82 1.95 2.08 2.081 2.083 5)
          y=(0 0 0 0 0.035 0.12 0.26 0.55 1.17 2 2 2 2)
    Schutte1993Muscle_Deprecated pron_teres_2: max_isometric_force=141 optimal_fiber_length=0.0391
        tendon_slack_length=0.0484 pennation_angle_at_optimal=0 activation1=62.32493 activation2=21.0084
      PathPoint P1: ulna_r (-0.0040829 -0.022175 -0.019162)
      PathPoint P2: radius_r (0.032315 -0.081947 0.001342)
      PathWrap: wrap_object=pron_t_cyl
      passive_force_length_curve: SimmSpline: x=(-5 0.998 0.999 1 1.1 1.2 1.3 1.4 1.5 1.6 1.601 1.602 5)
          y=(0 0 0 0 0.035 0.12 0.26 0.55 1.17 2 2 2 2)
    Schutte1993Muscle_Deprecated supinator_1: max_isometric_force=47 optimal_fiber_length=0.0267
        tendon_slack_length=0.0254 pennation_angle_at_optimal=0 activation1=62.32493 activation2=21.0084
      PathPoint P1: ulna_r (0.0046181 -0.08341 0.0091818)
      PathPoint P2: radius_r (0.028433 -0.08211 0.0042785)
      PathWrap: wrap_object=sup_cyl
      passive_force_length_curve: SimmSpline: x=(-5 0.998 0.999 1 1.1 1.2 1.3 1.4 1.5 1.6 1.601 1.602 5)
          y=(0 0 0 0 0.035 0.12 0.26 0.55 1.17 2 2 2 2)
    Schutte1993Muscle_Deprecated supinator_2: max_isometric_force=232 optimal_fiber_length=0.026
        tendon_slack_length=0.0231 pennation_angle_at_optimal=0 activation1=62.32493 activation2=21.0084
      PathPoint P1: ulna_r (0.014653 -0.067136 0.0042294)
      PathPoint P2: radius_r (0.02147 -0.071077 0.0060357)
      PathWrap: wrap_object=sup_cyl
      passive_force_length_curve: SimmSpline: x=(-5 1.198 1.199 1.2 1.32 1.44 1.56 1.68 1.8 1.92 1.921 1.922 5)
          y=(0 0 0 0 0.035 0.12 0.26 0.55 1.17 2 2 2 2)
    Schutte1993Muscle_Deprecated supinator_3: max_isometric_force=126 optimal_fiber_length=0.0252
        tendon_slack_length=0.015 pennation_angle_at_optimal=0 activation1=62.32493 activation2=21.0084
      PathPoint P1: ulna_r (0.010699 -0.050723 0.0080612)
      PathPoint P2: radius_r (0.025162 -0.057895 0.0026076)
      PathWrap: wrap_object=sup_cyl
      passive_force_length_curve: SimmSpline: x=(-5 1.297 1.299 1.3 1.43 1.56 1.69 1.82 1.95 2.08 2.081 2.083 5)
          y=(0 0 0 0 0.035 0.12 0.26 0.55 1.17 2 2 2 2)
    Schutte1993Muscle_Deprecated supinator_4: max_isometric_force=148 optimal_fiber_length=0.0263
        tendon_slack_length=0.0145 pennation_angle_at_optimal=0 activation1=62.32493 activation2=21.0084
      PathPoint P1: ulna_r (0.010809 -0.040931 0.0080698)
      PathPoint P2: radius_r (0.022119 -0.049868 -0.00054552)
      PathWrap: wrap_object=sup_cyl
      passive_force_length_curve: SimmSpline: x=(-5 1.198 1.199 1.2 1.32 1.44 1.56 1.68 1.8 1.92 1.921 1.922 5)
          y=(0 0 0 0 0.035 0.12 0.26 0.55 1.17 2 2 2 2)
    Schutte1993Muscle_Deprecated supinator_5: max_isometric_force=285 optimal_fiber_length=0.0274
        tendon_slack_length=0.0139 pennation_angle_at_optimal=0.03490659 activation1=62.32493 activation2=21.0084
      PathPoint P1: ulna_r (0.010795 -0.031118 0.0080164)
      PathPoint P2: radius_r (0.019006 -0.041852 -0.0036272)
      PathWrap: wrap_object=sup_cyl
      passive_force_length_curve: SimmSpline: x=(-5 1.297 1.299 1.3 1.43 1.56 1.69 1.82 1.95 2.08 2.081 2.083 5)
          y=(0 0 0 0 0.035 0.12 0.26 0.55 1.17 2 2 2 2)
    Schutte1993Muscle_Deprecated pron_quad_1: max_isometric_force=73 optimal_fiber_length=0.0377
        tendon_slack_length=0.005 pennation_angle_at_optimal=0 activation1=62.32493 activation2=21.0084
      PathPoint P1: radius_r (0.037522 -0.20781 -0.017187)
      PathPoint P2: ulna_r (0.015346 -0.20443 -0.019626)
      PathWrap: wrap_object=pron_q_cyl
      passive_force_length_curve: SimmSpline: x=(-5 1.098 1.099 1.1 1.21 1.32 1.43 1.54 1.65 1.76 1.761 1.762 5)
          y=(0 0 0 0 0.035 0.12 0.26 0.55 1.17 2 2 2 2)
    Schutte1993Muscle_Deprecated pron_quad_2: max_isometric_force=178 optimal_fiber_length=0.0386
        tendon_slack_length=0.005 pennation_angle_at_optimal=0 activation1=62.32493 activation2=21.0084
      PathPoint P1: radius_r (0.039436 -0.21259 -0.017444)
      PathPoint P2: ulna_r (0.020087 -0.22203 -0.020452)
      PathWrap: wrap_object=pron_q_cyl
      passive_force_length_curve: SimmSpline: x=(-5 0.998 0.999 1 1.1 1.2 1.3 1.4 1.5 1.6 1.601 1.602 5)
          y=(0 0 0 0 0.035 0.12 0.26 0.55 1.17 2 2 2 2)
    Schutte1993Muscle_Deprecated pron_quad_3: max_isometric_force=219 optimal_fiber_length=0.0352
        tendon_slack_length=0.005 pennation_angle_at_optimal=0 activation1=62.32493 activation2=21.0084
      PathPoint P1: radius_r (0.039485 -0.22145 -0.022069)
      PathPoint P2: ulna_r (0.022468 -0.23384 -0.021176)
      PathWrap: wrap_object=pron_q_cyl
      passive_force_length_curve: SimmSpline: x=(-5 0.998 0.999 1 1.1 1.2 1.3 1.4 1.5 1.6 1.601 1.602 5)
          y=(0 0 0 0 0.035 0.12 0.26 0.55 1.17 2 2 2 2)
    Schutte1993Muscle_Deprecated tric_lat_1: max_isometric_force=153 optimal_fiber_length=0.0758
        tendon_slack_length=0.1707 pennation_angle_at_optimal=0 activation1=62.32493 activation2=21.0084
      PathPoint P1: humerus_r (0.00631 -0.05495 0.011)
      PathPoint P2: ulna_r (-0.024 0.015432 0.0051462)
      PathWrap: wrap_object=elbow
      passive_force_length_curve: SimmSpline: x=(-5 1.198 1.199 1.2 1.32 1.44 1.56 1.68 1.8 1.92 1.921 1.922 5)
          y=(0 0 0 0 0.035 0.12 0.26 0.55 1.17 2 2 2 2)
    Schutte1993Muscle_Deprecated tric_lat_2: max_isometric_force=410 optimal_fiber_length=0.0766
        tendon_slack_length=0.177 pennation_angle_at_optimal=0.08726646 activation1=62.32493 activation2=21.0084
      PathPoint P1: humerus_r (0.00631 -0.05495 0.011)
      PathPoint P2: ulna_r (-0.024611 0.013004 0.0066893)
      PathWrap: wrap_object=elbow
      passive_force_length_curve: SimmSpline: x=(-5 1.198 1.199 1.2 1.32 1.44 1.56 1.68 1.8 1.92 1.921 1.922 5)
          y=(0 0 0 0 0.035 0.12 0.26 0.55 1.17 2 2 2 2)
    Schutte1993Muscle_Deprecated tric_lat_3: max_isometric_force=219 optimal_fiber_length=0.0656
        tendon_slack_length=0.1911 pennation_angle_at_optimal=0.1745329 activation1=62.32493 activation2=21.0084
      PathPoint P1: humerus_r (0.00631 -0.05495 0.011)
      PathPoint P2: ulna_r (-0.017628 0.00621 0.011407)
      PathWrap: wrap_object=elbow
      passive_force_length_curve: SimmSpline: x=(-5 1.198 1.199 1.2 1.32 1.44 1.56 1.68 1.8 1.92 1.921 1.922 5)
          y=(0 0 0 0 0.035 0.12 0.26 0.55 1.17 2 2 2 2)
    Schutte1993Muscle_Deprecated tric_lat_4: max_isometric_force=275 optimal_fiber_length=0.0638
        tendon_slack_length=0.157 pennation_angle_at_optimal=0.1745329 activation1=62.32493 activation2=21.0084
      PathPoint P1: humerus_r (0.01211 -0.09512 0.01048)
      PathPoint P2: ulna_r (-0.017628 0.00621 0.011407)
      PathWrap: wrap_object=elbow
      passive_force_length_curve: SimmSpline: x=(-5 1.198 1.199 1.2 1.32 1.44 1.56 1.68 1.8 1.92 1.921 1.922 5)
          y=(0 0 0 0 0.035 0.12 0.26 0.55 1.17 2 2 2 2)
    Schutte1993Muscle_Deprecated tric_lat_5: max_isometric_force=87 optimal_fiber_length=0.0638
        tendon_slack_length=0.157 pennation_angle_at_optimal=0.296706 activation1=62.32493 activation2=21.0084
      PathPoint P1: humerus_r (0.01211 -0.09512 0.01048)
      PathPoint P2: ulna_r (-0.01772 0.010312 0.008786)
      PathWrap: wrap_object=elbow
      passive_force_length_curve: SimmSpline: x=(-5 0.998 0.999 1 1.1 1.2 1.3 1.4 1.5 1.6 1.601 1.602 5)
          y=(0 0 0 0 0.035 0.12 0.26 0.55 1.17 2 2 2 2)
    Schutte1993Muscle_Deprecated anconeus_1: max_isometric_force=31 optimal_fiber_length=0.0252
        tendon_slack_length=0.0064 pennation_angle_at_optimal=0 activation1=62.32493 activation2=21.0084
      PathPoint P1: humerus_r (0.01337 -0.29227 0.01291)
      PathPoint P2: ulna_r (-0.0063601 -0.017166 0.012696)
      passive_force_length_curve: SimmSpline: x=(-5 0.998 0.999 1 1.1 1.2 1.3 1.4 1.5 1.6 1.601 1.602 5)
          y=(0 0 0 0 0.035 0.12 0.26 0.55 1.17 2 2 2 2)
    Schutte1993Muscle_Deprecated anconeus_2: max_isometric_force=70 optimal_fiber_length=0.0202
        tendon_slack_length=0.008 pennation_angle_at_optimal=0.2617994 activation1=62.32493 activation2=21.0084
      PathPoint P1: humerus_r (0.01153 -0.29614 0.01149)
      PathPoint P2: ulna_r (-0.0053098 -0.020645 0.012628)
      passive_force_length_curve: SimmSpline: x=(-5 0.998 0.999 1 1.1 1.2 1.3 1.4 1.5 1.6 1.601 1.602 5)
          y=(0 0 0 0 0.035 0.12 0.26 0.55 1.17 2 2 2 2)
    Schutte1993Muscle_Deprecated anconeus_3: max_isometric_force=25 optimal_fiber_length=0.0228
        tendon_slack_length=0.0043 pennation_angle_at_optimal=0 activation1=62.32493 activation2=21.0084
      PathPoint P1: humerus_r (0.01201 -0.28689 0.01448)
      PathPoint P2: ulna_r (-0.0074241 -0.013787 0.012758)
      passive_force_length_curve: SimmSpline: x=(-5 0.998 0.999 1 1.1 1.2 1.3 1.4 1.5 1.6 1.601 1.602 5)
          y=(0 0 0 0 0.035 0.12 0.26 0.55 1.17 2 2 2 2)
    Schutte1993Muscle_Deprecated anconeus_4: max_isometric_force=118 optimal_fiber_length=0.027
        tendon_slack_length=0.03 pennation_angle_at_optimal=0.3141593 activation1=62.32493 activation2=21.0084
      PathPoint P1: humerus_r (0.01592 -0.29678 0.00632)
      PathPoint P2: ulna_r (-0.0016896 -0.053351 0.013492)
      passive_force_length_curve: SimmSpline: x=(-5 0.998 0.999 1 1.1 1.2 1.3 1.4 1.5 1.6 1.601 1.602 5)
          y=(0 0 0 0 0.035 0.12 0.26 0.55 1.17 2 2 2 2)
    Schutte1993Muscle_Deprecated anconeus_5: max_isometric_force=118 optimal_fiber_length=0.0266
        tendon_slack_length=0.02 pennation_angle_at_optimal=0.4014257 activation1=62.32493 activation2=21.0084
      PathPoint P1: humerus_r (0.01446 -0.29765 0.00818)
      PathPoint P2: ulna_r (-0.0046451 -0.037562 0.0133293)
      passive_force_length_curve: SimmSpline: x=(-5 0.998 0.999 1 1.1 1.2 1.3 1.4 1.5 1.6 1.601 1.602 5)
          y=(0 0 0 0 0.035 0.12 0.26 0.55 1.17 2 2 2 2)
    Schutte1993Muscle_Deprecated ECRL: max_isometric_force=337.3 optimal_fiber_length=0.081 tendon_slack_length=0.244
        pennation_angle_at_optimal=0
      PathPoint P1: humerus_r (0.0091 -0.2609 0.0073)
      PathPoint P2: radius_r (0.02779 -0.13463 -0.03195)
      PathPoint P3: radius_r (0.0362 -0.23684 -0.04243)
      PathPoint P4: palm (0.00583 -0.02122 -0.01717)
      PathWrap: wrap_object=Elbow_PT_ECRL method=hybrid
      PathWrap: wrap_object=ECRL
      tendon_force_length_curve: SimmSpline: x=(-10 -0.002 -0.001 0 0.00131 0.00281 0.00431 0.00581 0.00731 0.00881 0.0103 0.0118 0.0123 9.2 9.201 9.202 20)
          y=(0 0 0 0 0.0108 0.0257 0.0435 0.0652 0.0915 0.123 0.161 0.208 0.227 345 345 345 345)
      active_force_length_curve: SimmSpline: x=(-35 0 0.401 0.402 0.4035 0.52725 0.62875 0.71875 0.86125 1.045 1.2175 1.43875 1.61875 1.62 1.621 2.2 35)
          y=(0 0 0 0 0 0.226667 0.636667 0.856667 0.95 0.993333 0.77 0.246667 0 0 0 0 0)
      passive_force_length_curve: SimmSpline: x=(-35 1 1.05 1.1 1.125 1.14 1.145 1.15 1.25 1.35 1.45 1.55 1.65 1.75 1.7501 1.7502 35)
          y=(0 0 0 0 0 0 0 0 0.035 0.12 0.26 0.55 1.17 2 2 2 2)
    Schutte1993Muscle_Deprecated ECRB: max_isometric_force=252.5 optimal_fiber_length=0.0585 tendon_slack_length=0.2223
        pennation_angle_at_optimal=0.1553343
      PathPoint P1: humerus_r (0.01698 -0.29048 -0.01349)
      PathPoint P2: radius_r (0.02385 -0.13086 -0.02905)
      PathPoint P3: radius_r (0.03937 -0.22805 -0.03549)
      PathPoint P4: palm (0.0085 -0.01136 -0.005)
      PathWrap: wrap_object=ECRB
      tendon_force_length_curve: SimmSpline: x=(-10 -0.002 -0.001 0 0.00131 0.00281 0.00431 0.00581 0.00731 0.00881 0.0103 0.0118 0.0123 9.2 9.201 9.202 20)
          y=(0 0 0 0 0.0108 0.0257 0.0435 0.0652 0.0915 0.123 0.161 0.208 0.227 345 345 345 345)
      active_force_length_curve: SimmSpline: x=(-35 0 0.401 0.402 0.4035 0.52725 0.62875 0.71875 0.86125 1.045 1.2175 1.43875 1.61875 1.62 1.621 2.2 35)
          y=(0 0 0 0 0 0.226667 0.636667 0.856667 0.95 0.993333 0.77 0.246667 0 0 0 0 0)
      passive_force_length_curve: SimmSpline: x=(-35 1 1.05 1.1 1.125 1.14 1.145 1.15 1.25 1.35 1.45 1.55 1.65 1.75 1.7501 1.7502 35)
          y=(0 0 0 0 0 0 0 0 0.035 0.12 0.26 0.55 1.17 2 2 2 2)
    Schutte1993Muscle_Deprecated ECU: max_isometric_force=192.9 optimal_fiber_length=0.0622 tendon_slack_length=0.2285
        pennation_angle_at_optimal=0.06108652
      PathPoint P1: humerus_r (0.0188 -0.28955 -0.00083)
      PathPoint P2: ulna_r (0.02947 -0.03201 0.01391)
      PathPoint P3: ulna_r (0.02868 -0.05428 0.01705)
      PathPoint P4: ulna_r (0.03278 -0.09573 0.01793)
      PathPoint P5: radius_r (0.03481 -0.22696 0.01421)
      PathPoint P6: palm (-0.00128 -0.01401 0.02251)
      PathWrap: wrap_object=ECU
      tendon_force_length_curve: SimmSpline: x=(-10 -0.002 -0.001 0 0.00131 0.00281 0.00431 0.00581 0.00731 0.00881 0.0103 0.0118 0.0123 9.2 9.201 9.202 20)
          y=(0 0 0 0 0.0108 0.0257 0.0435 0.0652 0.0915 0.123 0.161 0.208 0.227 345 345 345 345)
      active_force_length_curve: SimmSpline: x=(-35 0 0.401 0.402 0.4035 0.52725 0.62875 0.71875 0.86125 1.045 1.2175 1.43875 1.61875 1.62 1.621 2.2 35)
          y=(0 0 0 0 0 0.226667 0.636667 0.856667 0.95 0.993333 0.77 0.246667 0 0 0 0 0)
      passive_force_length_curve: SimmSpline: x=(-35 1 1.05 1.1 1.125 1.14 1.145 1.15 1.25 1.35 1.45 1.55 1.65 1.75 1.7501 1.7502 35)
          y=(0 0 0 0 0 0 0 0 0.035 0.12 0.26 0.55 1.17 2 2 2 2)
    Schutte1993Muscle_Deprecated FCR: max_isometric_force=407.9 optimal_fiber_length=0.0628 tendon_slack_length=0.244
        pennation_angle_at_optimal=0.05410521
      PathPoint P1: humerus_r (-0.03705 -0.27806 -0.00758)
      PathPoint P2: radius_r (0.00127 -0.21943 -0.0211)
      PathPoint P3: palm (-0.00418 -0.01844 -0.01124)
      PathWrap: wrap_object=Elbow_PT_ECRL method=hybrid
      PathWrap: wrap_object=FCR
      tendon_force_length_curve: SimmSpline: x=(-10 -0.002 -0.001 0 0.00131 0.00281 0.00431 0.00581 0.00731 0.00881 0.0103 0.0118 0.0123 9.2 9.201 9.202 20)
          y=(0 0 0 0 0.0108 0.0257 0.0435 0.0652 0.0915 0.123 0.161 0.208 0.227 345 345 345 345)
      active_force_length_curve: SimmSpline: x=(-35 0 0.401 0.402 0.4035 0.52725 0.62875 0.71875 0.86125 1.045 1.2175 1.43875 1.61875 1.62 1.621 2.2 35)
          y=(0 0 0 0 0 0.226667 0.636667 0.856667 0.95 0.993333 0.77 0.246667 0 0 0 0 0)
      passive_force_length_curve: SimmSpline: x=(-35 1 1.05 1.1 1.125 1.14 1.145 1.15 1.25 1.35 1.45 1.55 1.65 1.75 1.7501 1.7502 35)
          y=(0 0 0 0 0 0 0 0 0.035 0.12 0.26 0.55 1.17 2 2 2 2)
    Schutte1993Muscle_Deprecated FCU: max_isometric_force=479.8 optimal_fiber_length=0.0509 tendon_slack_length=0.265
        pennation_angle_at_optimal=0.2111848
      PathPoint P1: humerus_r (-0.0388 -0.2774 -0.00219)
      MovingPathPoint P2: radius_r (0.0005 -0.1841 -0.00949) x_coordinate=PS_y y_coordinate=PS_y z_coordinate=PS_y
        x_location: SimmSpline: x=(-1.5708 0 1.5708) y=(0.0069 0.0005 0.0002)
        y_location: SimmSpline: x=(-1.5708 0 1.5708) y=(-0.1838 -0.1841 -0.1821)
        z_location: SimmSpline: x=(-1.5708 0 1.5708) y=(-0.00279 -0.00949 -0.01869)
      PathPoint P3: radius_r (0.00969 -0.22327 -0.01082)
      PathPoint P4: palm (-0.00752 -0.01765 0.02036)
      PathWrap: wrap_object=FCU
      PathWrap: wrap_object=Elbow_PT_ECRL method=hybrid
      tendon_force_length_curve: SimmSpline: x=(-10 -0.002 -0.001 0 0.00131 0.00281 0.00431 0.00581 0.00731 0.00881 0.0103 0.0118 0.0123 9.2 9.201 9.202 20)
          y=(0 0 0 0 0.0108 0.0257 0.0435 0.0652 0.0915 0.123 0.161 0.208 0.227 345 345 345 345)
      active_force_length_curve: SimmSpline: x=(-35 0 0.401 0.402 0.4035 0.52725 0.62875 0.71875 0.86125 1.045 1.2175 1.43875 1.61875 1.62 1.621 2.2 35)
          y=(0 0 0 0 0 0.226667 0.636667 0.856667 0.95 0.993333 0.77 0.246667 0 0 0 0 0)
      passive_force_length_curve: SimmSpline: x=(-35 1 1.05 1.1 1.125 1.14 1.145 1.15 1.25 1.35 1.45 1.55 1.65 1.75 1.7501 1.7502 35)
          y=(0 0 0 0 0 0 0 0 0.035 0.12 0.26 0.55 1.17 2 2 2 2)
    Schutte1993Muscle_Deprecated PL: max_isometric_force=101 optimal_fiber_length=0.0638 tendon_slack_length=0.2694
        pennation_angle_at_optimal=0.06981317
      PathPoint P1: humerus_r (-0.03865 -0.27519 -0.00457)
      PathPoint P2: radius_r (-0.00276 -0.23915 -0.02531)
      PathPoint P3: palm (-0.01754 -0.01898 -0.00917)
      PathPoint P4: palm (0.00493 -0.03096 -0.00227)
      PathWrap: wrap_object=PL method=hybrid
      PathWrap: wrap_object=Elbow_PT_ECRL method=hybrid
      tendon_force_length_curve: SimmSpline: x=(-10 -0.002 -0.001 0 0.00131 0.00281 0.00431 0.00581 0.00731 0.00881 0.0103 0.0118 0.0123 9.2 9.201 9.202 20)
          y=(0 0 0 0 0.0108 0.0257 0.0435 0.0652 0.0915 0.123 0.161 0.208 0.227 345 345 345 345)
      active_force_length_curve: SimmSpline: x=(-35 0 0.401 0.402 0.4035 0.52725 0.62875 0.71875 0.86125 1.045 1.2175 1.43875 1.61875 1.62 1.621 2.2 35)
          y=(0 0 0 0 0 0.226667 0.636667 0.856667 0.95 0.993333 0.77 0.246667 0 0 0 0 0)
      passive_force_length_curve: SimmSpline: x=(-35 1 1.05 1.1 1.125 1.14 1.145 1.15 1.25 1.35 1.45 1.55 1.65 1.75 1.7501 1.7502 35)
          y=(0 0 0 0 0 0 0 0 0.035 0.12 0.26 0.55 1.17 2 2 2 2)
    Schutte1993Muscle_Deprecated PT: max_isometric_force=557.2 optimal_fiber_length=0.0492 tendon_slack_length=0.098
        pennation_angle_at_optimal=0.1745329
      PathPoint P1: humerus_r (-0.0365 -0.2759 -0.0036)
      PathPoint P2: ulna_r (-0.01432 -0.03373 -0.00846)
      MovingPathPoint P3: ulna_r (-0.00219 -0.06516 -0.01219) x_coordinate=PS_y y_coordinate=PS_y z_coordinate=PS_y
        x_location: PiecewiseLinearFunction: x=(-1.5708 1.5708) y=(0.00506 -0.00944)
        y_location: SimmSpline: x=(-1.5708 1.5708) y=(-0.06086 -0.06946)
        z_location: SimmSpline: x=(-1.5708 1.5708) y=(-0.01884 -0.00554)
      ConditionalPathPoint P4: radius_r (0.0094 -0.0934 -0.0236) range=(-1.5708 0.509636) coordinate=PS_y
      PathPoint P5: radius_r (0.0198 -0.1088 -0.0254)
      PathWrap: wrap_object=Elbow_PT_ECRL method=hybrid
      tendon_force_length_curve: SimmSpline: x=(-10 -0.002 -0.001 0 0.00131 0.00281 0.00431 0.00581 0.00731 0.00881 0.0103 0.0118 0.0123 9.2 9.201 9.202 20)
          y=(0 0 0 0 0.0108 0.0257 0.0435 0.0652 0.0915 0.123 0.161 0.208 0.227 345 345 345 345)
      active_force_length_curve: SimmSpline: x=(-35 0 0.401 0.402 0.4035 0.52725 0.62875 0.71875 0.86125 1.045 1.2175 1.43875 1.61875 1.62 1.621 2.2 35)
          y=(0 0 0 0 0 0.226667 0.636667 0.856667 0.95 0.993333 0.77 0.246667 0 0 0 0 0)
      passive_force_length_curve: SimmSpline: x=(-35 1 1.05 1.1 1.125 1.14 1.145 1.15 1.25 1.35 1.45 1.55 1.65 1.75 1.7501 1.7502 35)
          y=(0 0 0 0 0 0 0 0 0.035 0.12 0.26 0.55 1.17 2 2 2 2)
    Schutte1993Muscle_Deprecated PQ: max_isometric_force=284.7 optimal_fiber_length=0.0282 tendon_slack_length=0.005
        pennation_angle_at_optimal=0.1745329
      PathPoint P1: radius_r (0.01962 -0.19998 -0.03245)
      PathPoint P2: ulna_r (0.03632 -0.20972 -0.00193)
      PathWrap: wrap_object=PQ2
      PathWrap: wrap_object=PQ1
      tendon_force_length_curve: SimmSpline: x=(-10 -0.002 -0.001 0 0.00131 0.00281 0.00431 0.00581 0.00731 0.00881 0.0103 0.0118 0.0123 9.2 9.201 9.202 20)
          y=(0 0 0 0 0.0108 0.0257 0.0435 0.0652 0.0915 0.123 0.161 0.208 0.227 345 345 345 345)
      active_force_length_curve: SimmSpline: x=(-35 0 0.401 0.402 0.4035 0.52725 0.62875 0.71875 0.86125 1.045 1.2175 1.43875 1.61875 1.62 1.621 2.2 35)
          y=(0 0 0 0 0 0.226667 0.636667 0.856667 0.95 0.993333 0.77 0.246667 0 0 0 0 0)
      passive_force_length_curve: SimmSpline: x=(-35 1 1.05 1.1 1.125 1.14 1.145 1.15 1.25 1.35 1.45 1.55 1.65 1.75 1.7501 1.7502 35)
          y=(0 0 0 0 0 0 0 0 0.035 0.12 0.26 0.55 1.17 2 2 2 2)
    Schutte1993Muscle_Deprecated FDSL: max_isometric_force=75.3 optimal_fiber_length=0.0515 tendon_slack_length=0.3386
        pennation_angle_at_optimal=0.08726646
      PathPoint P1: humerus_r (-0.03864 -0.27598 -0.00421)
      PathPoint P2: radius_r (0.00205 -0.18718 -0.01377)
      PathPoint P3: palm (-0.01376 -0.01393 0.00235)
      PathPoint P4: palm (-0.00742 -0.04281 0.01995)
      PathPoint P5: 5proxph (-0.00645 -0.01222 0.00168)
      PathPoint P6: 5proxph (-0.00345 -0.02748 0.00402)
      PathPoint P7: 5midph (-0.00518 -0.00575 0.00097)
      PathPoint P8: 5midph (-0.00505 -0.00728 0.00171)
      PathWrap: wrap_object=FDS method=hybrid
      PathWrap: wrap_object=Elbow_PT_ECRL method=hybrid
      PathWrap: wrap_object=_5rdmcp_FDS range=(4 5)
      PathWrap: wrap_object=Fifthpm_FDS range=(6 7)
      tendon_force_length_curve: SimmSpline: x=(-10 -0.002 -0.001 0 0.00131 0.00281 0.00431 0.00581 0.00731 0.00881 0.0103 0.0118 0.0123 9.2 9.201 9.202 20)
          y=(0 0 0 0 0.0108 0.0257 0.0435 0.0652 0.0915 0.123 0.161 0.208 0.227 345 345 345 345)
      active_force_length_curve: SimmSpline: x=(-35 0 0.401 0.402 0.4035 0.52725 0.62875 0.71875 0.86125 1.045 1.2175 1.43875 1.61875 1.62 1.621 2.2 35)
          y=(0 0 0 0 0 0.226667 0.636667 0.856667 0.95 0.993333 0.77 0.246667 0 0 0 0 0)
      passive_force_length_curve: SimmSpline: x=(-35 1 1.05 1.1 1.125 1.14 1.145 1.15 1.25 1.35 1.45 1.55 1.65 1.75 1.7501 1.7502 35)
          y=(0 0 0 0 0 0 0 0 0.035 0.12 0.26 0.55 1.17 2 2 2 2)
    Schutte1993Muscle_Deprecated FDSR: max_isometric_force=171.2 optimal_fiber_length=0.0736 tendon_slack_length=0.328
        pennation_angle_at_optimal=0.06981317
      PathPoint P1: humerus_r (-0.03731 -0.2788 -0.00479)
      PathPoint P2: radius_r (0.00267 -0.18666 -0.01571)
      PathPoint P3: palm (-0.01359 -0.01344 0.00082)
      PathPoint P4: palm (4e-5 -0.05179 0.00977)
      PathPoint P5: 4proxph (-0.00496 -0.01218 0.00414)
      PathPoint P6: 4proxph (-0.00199 -0.03276 0.00467)
      PathPoint P7: 4midph (-0.00325 -0.00697 0.00228)
      PathPoint P8: 4midph (-0.00115 -0.0127 0.00306)
      PathWrap: wrap_object=FDS method=hybrid
      PathWrap: wrap_object=Elbow_PT_ECRL method=hybrid
      PathWrap: wrap_object=_4rdmcp_FDS range=(4 5)
      PathWrap: wrap_object=Fourthpm_FDS range=(6 7)
      tendon_force_length_curve: SimmSpline: x=(-10 -0.002 -0.001 0 0.00131 0.00281 0.00431 0.00581 0.00731 0.00881 0.0103 0.0118 0.0123 9.2 9.201 9.202 20)
          y=(0 0 0 0 0.0108 0.0257 0.0435 0.0652 0.0915 0.123 0.161 0.208 0.227 345 345 345 345)
      active_force_length_curve: SimmSpline: x=(-35 0 0.401 0.402 0.4035 0.52725 0.62875 0.71875 0.86125 1.045 1.2175 1.43875 1.61875 1.62 1.621 2.2 35)
          y=(0 0 0 0 0 0.226667 0.636667 0.856667 0.95 0.993333 0.77 0.246667 0 0 0 0 0)
      passive_force_length_curve: SimmSpline: x=(-35 1 1.05 1.1 1.125 1.14 1.145 1.15 1.25 1.35 1.45 1.55 1.65 1.75 1.7501 1.7502 35)
          y=(0 0 0 0 0 0 0 0 0.035 0.12 0.26 0.55 1.17 2 2 2 2)
    Schutte1993Muscle_Deprecated FDSM: max_isometric_force=258.8 optimal_fiber_length=0.0749 tendon_slack_length=0.295
        pennation_angle_at_optimal=0.1221731
      PathPoint P1: ulna_r (-0.00191 -0.02713 0.00669)
      PathPoint P2: radius_r (0.00424 -0.18706 -0.01899)
      PathPoint P3: palm (-0.01399 -0.01377 -0.0068)
      PathPoint P4: palm (-0.00132 -0.03332 -0.00471)
      PathPoint P5: palm (0.0006 -0.0566 -0.00542)
      PathPoint P6: 3proxph (-0.00101 -0.01492 -0.00138)
      PathPoint P7: 3proxph (0.00532 -0.03549 -0.0032)
      PathPoint P8: 3midph (-0.00128 -0.00758 0.00047)
      PathPoint P9: 3midph (4e-5 -0.01624 -0.00054)
      PathWrap: wrap_object=FDS method=hybrid
      PathWrap: wrap_object=_3rdmcp_FDS range=(5 6)
      PathWrap: wrap_object=Thirdpm_FDS range=(7 8)
      tendon_force_length_curve: SimmSpline: x=(-10 -0.002 -0.001 0 0.00131 0.00281 0.00431 0.00581 0.00731 0.00881 0.0103 0.0118 0.0123 9.2 9.201 9.202 20)
          y=(0 0 0 0 0.0108 0.0257 0.0435 0.0652 0.0915 0.123 0.161 0.208 0.227 345 345 345 345)
      active_force_length_curve: SimmSpline: x=(-35 0 0.401 0.402 0.4035 0.52725 0.62875 0.71875 0.86125 1.045 1.2175 1.43875 1.61875 1.62 1.621 2.2 35)
          y=(0 0 0 0 0 0.226667 0.636667 0.856667 0.95 0.993333 0.77 0.246667 0 0 0 0 0)
      passive_force_length_curve: SimmSpline: x=(-35 1 1.05 1.1 1.125 1.14 1.145 1.15 1.25 1.35 1.45 1.55 1.65 1.75 1.7501 1.7502 35)
          y=(0 0 0 0 0 0 0 0 0.035 0.12 0.26 0.55 1.17 2 2 2 2)
    Schutte1993Muscle_Deprecated FDSI: max_isometric_force=162.5 optimal_fiber_length=0.0835 tendon_slack_length=0.275
        pennation_angle_at_optimal=0.1047198
      PathPoint P1: ulna_r (-0.00137 -0.02819 0.00676)
      PathPoint P2: radius_r (0.00552 -0.18623 -0.02145)
      PathPoint P3: palm (-0.01387 -0.01366 -0.00889)
      PathPoint P4: palm (0.00024 -0.03787 -0.01061)
      PathPoint P5: palm (0.00418 -0.05108 -0.01782)
      PathPoint P6: 2proxph (-0.00018 -0.01424 0.00146)
      PathPoint P7: 2proxph (0.00484 -0.0346 -0.00439)
      PathPoint P8: 2midph (-0.0024 -0.00706 0.00269)
      PathPoint P9: 2midph (-0.00233 -0.00951 0.00228)
      PathWrap: wrap_object=FDS method=hybrid
      PathWrap: wrap_object=_2rdmcp_FDS range=(5 6)
      PathWrap: wrap_object=Secondpm_FDS range=(7 8)
      tendon_force_length_curve: SimmSpline: x=(-10 -0.002 -0.001 0 0.00131 0.00281 0.00431 0.00581 0.00731 0.00881 0.0103 0.0118 0.0123 9.2 9.201 9.202 20)
          y=(0 0 0 0 0.0108 0.0257 0.0435 0.0652 0.0915 0.123 0.161 0.208 0.227 345 345 345 345)
      active_force_length_curve: SimmSpline: x=(-35 0 0.401 0.402 0.4035 0.52725 0.62875 0.71875 0.86125 1.045 1.2175 1.43875 1.61875 1.62 1.621 2.2 35)
          y=(0 0 0 0 0 0.226667 0.636667 0.856667 0.95 0.993333 0.77 0.246667 0 0 0 0 0)
      passive_force_length_curve: SimmSpline: x=(-35 1 1.05 1.1 1.125 1.14 1.145 1.15 1.25 1.35 1.45 1.55 1.65 1.75 1.7501 1.7502 35)
          y=(0 0 0 0 0 0 0 0 0.035 0.12 0.26 0.55 1.17 2 2 2 2)
    Schutte1993Muscle_Deprecated FDPL: max_isometric_force=236.8 optimal_fiber_length=0.0749 tendon_slack_length=0.2888
        pennation_angle_at_optimal=0.1396263
      PathPoint P1: ulna_r (0.00254 -0.03214 0.00628)
      PathPoint P2: radius_r (0.00861 -0.18516 -0.01409)
      PathPoint P3: palm (-0.01188 -0.01027 0.00088)
      PathPoint P4: palm (-0.00733 -0.04646 0.01855)
      PathPoint P5: 5proxph (-0.00531 -0.01005 -0.00174)
      PathPoint P6: 5proxph (-0.00272 -0.02834 0.00127)
      PathPoint P7: 5midph (-0.00277 -0.00768 0.00018)
      PathPoint P8: 5midph (-0.00277 -0.0154 0.00131)
      PathPoint P9: 5distph (-0.00254 -0.0045 -0.00059)
      PathWrap: wrap_object=FDP method=hybrid
      PathWrap: wrap_object=_5rdmcp_FDP range=(4 5)
      PathWrap: wrap_object=Fifthpm_FDP range=(6 7)
      PathWrap: wrap_object=Fifthmd_flex range=(8 9)
      tendon_force_length_curve: SimmSpline: x=(-10 -0.002 -0.001 0 0.00131 0.00281 0.00431 0.00581 0.00731 0.00881 0.0103 0.0118 0.0123 9.2 9.201 9.202 20)
          y=(0 0 0 0 0.0108 0.0257 0.0435 0.0652 0.0915 0.123 0.161 0.208 0.227 345 345 345 345)
      active_force_length_curve: SimmSpline: x=(-35 0 0.401 0.402 0.4035 0.52725 0.62875 0.71875 0.86125 1.045 1.2175 1.43875 1.61875 1.62 1.621 2.2 35)
          y=(0 0 0 0 0 0.226667 0.636667 0.856667 0.95 0.993333 0.77 0.246667 0 0 0 0 0)
      passive_force_length_curve: SimmSpline: x=(-35 1 1.05 1.1 1.125 1.14 1.145 1.15 1.25 1.35 1.45 1.55 1.65 1.75 1.7501 1.7502 35)
          y=(0 0 0 0 0 0 0 0 0.035 0.12 0.26 0.55 1.17 2 2 2 2)
    Schutte1993Muscle_Deprecated FDPR: max_isometric_force=172.9 optimal_fiber_length=0.0798 tendon_slack_length=0.2915
        pennation_angle_at_optimal=0.1221731
      PathPoint P1: ulna_r (0.00273 -0.03374 0.00502)
      PathPoint P2: radius_r (0.00803 -0.18629 -0.0158)
      PathPoint P3: palm (-0.01184 -0.01177 -0.00106)
      PathPoint P4: palm (0.00088 -0.05542 0.00855)
      PathPoint P5: 4proxph (-0.005 -0.01089 0.00112)
      PathPoint P6: 4proxph (-3e-5 -0.03224 0.0016)
      PathPoint P7: 4midph (-0.0018 -0.00794 0.00027)
      PathPoint P8: 4midph (-0.00111 -0.01949 0.00156)
      PathPoint P9: 4distph (-0.00179 -0.00482 -0.00033)
      PathWrap: wrap_object=FDP method=hybrid
      PathWrap: wrap_object=_4rdmcp_FDP range=(4 5)
      PathWrap: wrap_object=Fourthpm_FDP range=(6 7)
      PathWrap: wrap_object=Fourthmd_flex range=(8 9)
      tendon_force_length_curve: SimmSpline: x=(-10 -0.002 -0.001 0 0.00131 0.00281 0.00431 0.00581 0.00731 0.00881 0.0103 0.0118 0.0123 9.2 9.201 9.202 20)
          y=(0 0 0 0 0.0108 0.0257 0.0435 0.0652 0.0915 0.123 0.161 0.208 0.227 345 345 345 345)
      active_force_length_curve: SimmSpline: x=(-35 0 0.401 0.402 0.4035 0.52725 0.62875 0.71875 0.86125 1.045 1.2175 1.43875 1.61875 1.62 1.621 2.2 35)
          y=(0 0 0 0 0 0.226667 0.636667 0.856667 0.95 0.993333 0.77 0.246667 0 0 0 0 0)
      passive_force_length_curve: SimmSpline: x=(-35 1 1.05 1.1 1.125 1.14 1.145 1.15 1.25 1.35 1.45 1.55 1.65 1.75 1.7501 1.7502 35)
          y=(0 0 0 0 0 0 0 0 0.035 0.12 0.26 0.55 1.17 2 2 2 2)
    Schutte1993Muscle_Deprecated FDPM: max_isometric_force=212.4 optimal_fiber_length=0.0835 tendon_slack_length=0.303
        pennation_angle_at_optimal=0.1047198
      PathPoint P1: ulna_r (0.0021 -0.03327 0.00522)
      PathPoint P2: radius_r (0.00785 -0.18644 -0.01906)
      PathPoint P3: palm (-0.01144 -0.0128 -0.00335)
      PathPoint P4: palm (-0.00611 -0.03447 -0.00302)
      PathPoint P5: palm (0.00122 -0.05863 -0.00252)
      PathPoint P6: 3proxph (-0.00183 -0.01138 0.00061)
      PathPoint P7: 3proxph (0.00449 -0.03583 6e-5)
      PathPoint P8: 3midph (-0.0024 -0.0074 0.00343)
      PathPoint P9: 3midph (-0.00041 -0.02412 0.00028)
      PathPoint P10: 3distph (-0.00192 -0.00516 0.00071)
      PathWrap: wrap_object=FDP method=hybrid
      PathWrap: wrap_object=_3rdmcp_FDP range=(5 6)
      PathWrap: wrap_object=Thirdpm_FDP range=(7 8)
      PathWrap: wrap_object=Thirdmd_flex range=(9 10)
      tendon_force_length_curve: SimmSpline: x=(-10 -0.002 -0.001 0 0.00131 0.00281 0.00431 0.00581 0.00731 0.00881 0.0103 0.0118 0.0123 9.2 9.201 9.202 20)
          y=(0 0 0 0 0.0108 0.0257 0.0435 0.0652 0.0915 0.123 0.161 0.208 0.227 345 345 345 345)
      active_force_length_curve: SimmSpline: x=(-35 0 0.401 0.402 0.4035 0.52725 0.62875 0.71875 0.86125 1.045 1.2175 1.43875 1.61875 1.62 1.621 2.2 35)
          y=(0 0 0 0 0 0.226667 0.636667 0.856667 0.95 0.993333 0.77 0.246667 0 0 0 0 0)
      passive_force_length_curve: SimmSpline: x=(-35 1 1.05 1.1 1.125 1.14 1.145 1.15 1.25 1.35 1.45 1.55 1.65 1.75 1.7501 1.7502 35)
          y=(0 0 0 0 0 0 0 0 0.035 0.12 0.26 0.55 1.17 2 2 2 2)
    Schutte1993Muscle_Deprecated FDPI: max_isometric_force=197.3 optimal_fiber_length=0.0749 tendon_slack_length=0.3015
        pennation_angle_at_optimal=0.1221731
      PathPoint P1: ulna_r (0.0028 -0.03176 0.00647)
      PathPoint P2: radius_r (0.00915 -0.1856 -0.0208)
      PathPoint P3: palm (-0.01212 -0.01168 -0.00896)
      PathPoint P4: palm (0.00438 -0.05542 -0.01922)
      PathPoint P5: 2proxph (-0.00211 -0.01237 -0.00102)
      PathPoint P6: 2proxph (0.00386 -0.03405 -0.00673)
      PathPoint P7: 2midph (-0.00258 -0.00766 -5e-5)
      PathPoint P8: 2midph (-0.00095 -0.0202 -0.00243)
      PathPoint P9: 2distph (-0.00192 -0.00477 -0.0004)
      PathWrap: wrap_object=FDP method=hybrid
      PathWrap: wrap_object=_2rdmcp_FDP range=(4 5)
      PathWrap: wrap_object=Secondpm_FDP range=(6 7)
      PathWrap: wrap_object=Secondmd_flex range=(8 9)
      tendon_force_length_curve: SimmSpline: x=(-10 -0.002 -0.001 0 0.00131 0.00281 0.00431 0.00581 0.00731 0.00881 0.0103 0.0118 0.0123 9.2 9.201 9.202 20)
          y=(0 0 0 0 0.0108 0.0257 0.0435 0.0652 0.0915 0.123 0.161 0.208 0.227 345 345 345 345)
      active_force_length_curve: SimmSpline: x=(-35 0 0.401 0.402 0.4035 0.52725 0.62875 0.71875 0.86125 1.045 1.2175 1.43875 1.61875 1.62 1.621 2.2 35)
          y=(0 0 0 0 0 0.226667 0.636667 0.856667 0.95 0.993333 0.77 0.246667 0 0 0 0 0)
      passive_force_length_curve: SimmSpline: x=(-35 1 1.05 1.1 1.125 1.14 1.145 1.15 1.25 1.35 1.45 1.55 1.65 1.75 1.7501 1.7502 35)
          y=(0 0 0 0 0 0 0 0 0.035 0.12 0.26 0.55 1.17 2 2 2 2)
    Schutte1993Muscle_Deprecated EDCL: max_isometric_force=39.4 optimal_fiber_length=0.065 tendon_slack_length=0.335
        pennation_angle_at_optimal=0.03490659
      PathPoint P1: humerus_r (0.0187 -0.28831 0.0004)
      MovingPathPoint P2: radius_r (0.01405 -0.03888 -0.0013) x_coordinate=PS_y y_coordinate=PS_y z_coordinate=PS_y
        x_location: SimmSpline: x=(-1.5708 0 1.5708) y=(0.01055 0.01405 0.01316)
        y_location: SimmSpline: x=(-1.5708 0 1.5708) y=(-0.04018 -0.03888 -0.035088)
        z_location: SimmSpline: x=(-1.5708 0 1.5708) y=(-0.0121 -0.0013 0.0095)
      PathPoint P3: radius_r (0.03618 -0.22304 -0.00993)
      PathPoint P4: palm (0.00169 -0.04402 0.02464)
      PathPoint P5: palm (0.00077 -0.04734 0.02381)
      PathPoint P6: 5proxph (0.00427 -0.00921 0.00399)
      PathPoint P7: 5proxph (0.0012 -0.03081 0.00611)
      PathPoint P8: 5midph (0.00081 -0.0055 0.00252)
      PathPoint P9: 5midph (-0.00076 -0.01868 0.00427)
      PathPoint P10: 5distph (0.00124 -0.00185 0.00163)
      PathWrap: wrap_object=EDCL range=(3 4)
      PathWrap: wrap_object=_5rdmcp_ext range=(5 6)
      PathWrap: wrap_object=Fifthpm_ext range=(7 8)
      PathWrap: wrap_object=Fifthmd_ext range=(9 10)
      tendon_force_length_curve: SimmSpline: x=(-10 -0.002 -0.001 0 0.00131 0.00281 0.00431 0.00581 0.00731 0.00881 0.0103 0.0118 0.0123 9.2 9.201 9.202 20)
          y=(0 0 0 0 0.0108 0.0257 0.0435 0.0652 0.0915 0.123 0.161 0.208 0.227 345 345 345 345)
      active_force_length_curve: SimmSpline: x=(-35 0 0.401 0.402 0.4035 0.52725 0.62875 0.71875 0.86125 1.045 1.2175 1.43875 1.61875 1.62 1.621 2.2 35)
          y=(0 0 0 0 0 0.226667 0.636667 0.856667 0.95 0.993333 0.77 0.246667 0 0 0 0 0)
      passive_force_length_curve: SimmSpline: x=(-35 1 1.05 1.1 1.125 1.14 1.145 1.15 1.25 1.35 1.45 1.55 1.65 1.75 1.7501 1.7502 35)
          y=(0 0 0 0 0 0 0 0 0.035 0.12 0.26 0.55 1.17 2 2 2 2)
    Schutte1993Muscle_Deprecated EDCR: max_isometric_force=109.2 optimal_fiber_length=0.0626 tendon_slack_length=0.365
        pennation_angle_at_optimal=0.05235988
      PathPoint P1: humerus_r (0.01782 -0.28936 0.00156)
      MovingPathPoint P2: radius_r (0.01552 -0.03991 -0.0026) x_coordinate=PS_y y_coordinate=PS_y z_coordinate=PS_y
        x_location: SimmSpline: x=(-1.5708 0 1.5708) y=(0.01202 0.01552 0.01463)
        y_location: SimmSpline: x=(-1.5708 0 1.5708) y=(-0.04121 -0.03991 -0.03611)
        z_location: SimmSpline: x=(-1.5708 0 1.5708) y=(-0.0134 -0.0026 0.0082)
      PathPoint P3: radius_r (0.04284 -0.22366 -0.00882)
      PathPoint P4: palm (0.00934 -0.0555 0.01564)
      PathPoint P5: palm (0.01161 -0.05819 0.01427)
      PathPoint P6: 4proxph (0.00313 -0.00961 0.00467)
      PathPoint P7: 4proxph (0.00529 -0.03453 0.00441)
      PathPoint P8: 4midph (0.00312 -0.00458 0.00187)
      PathPoint P9: 4midph (0.00231 -0.02251 0.00322)
      PathPoint P10: 4distph (0.00172 -0.0021 0.00086)
      PathWrap: wrap_object=EDCR
      PathWrap: wrap_object=_4rdmcp_ext range=(5 6)
      PathWrap: wrap_object=Fourthpm_ext range=(7 8)
      PathWrap: wrap_object=Fourthmd_ext range=(9 10)
      tendon_force_length_curve: SimmSpline: x=(-10 -0.002 -0.001 0 0.00131 0.00281 0.00431 0.00581 0.00731 0.00881 0.0103 0.0118 0.0123 9.2 9.201 9.202 20)
          y=(0 0 0 0 0.0108 0.0257 0.0435 0.0652 0.0915 0.123 0.161 0.208 0.227 345 345 345 345)
      active_force_length_curve: SimmSpline: x=(-35 0 0.401 0.402 0.4035 0.52725 0.62875 0.71875 0.86125 1.045 1.2175 1.43875 1.61875 1.62 1.621 2.2 35)
          y=(0 0 0 0 0 0.226667 0.636667 0.856667 0.95 0.993333 0.77 0.246667 0 0 0 0 0)
      passive_force_length_curve: SimmSpline: x=(-35 1 1.05 1.1 1.125 1.14 1.145 1.15 1.25 1.35 1.45 1.55 1.65 1.75 1.7501 1.7502 35)
          y=(0 0 0 0 0 0 0 0 0.035 0.12 0.26 0.55 1.17 2 2 2 2)
    Schutte1993Muscle_Deprecated EDCM: max_isometric_force=94.4 optimal_fiber_length=0.0724 tendon_slack_length=0.365
        pennation_angle_at_optimal=0.05235988
      PathPoint P1: humerus_r (0.01949 -0.28984 -0.00051)
      MovingPathPoint P2: radius_r (0.01528 -0.03948 -0.00316) x_coordinate=PS_y y_coordinate=PS_y z_coordinate=PS_y
        x_location: SimmSpline: x=(-1.5708 0 1.5708) y=(0.01178 0.01528 0.01439)
        y_location: SimmSpline: x=(-1.5708 0 1.5708) y=(-0.04078 -0.03948 -0.03568)
        z_location: SimmSpline: x=(-1.5708 0 1.5708) y=(-0.01396 -0.00316 0.00764)
      PathPoint P3: radius_r (0.04223 -0.22323 -0.0144)
      PathPoint P4: palm (0.01491 -0.05274 -0.00039)
      PathPoint P5: palm (0.01452 -0.05574 0.00087)
      PathPoint P6: 3proxph (0.00825 -0.00889 0.0004)
      PathPoint P7: 3proxph (0.00918 -0.03856 -0.00107)
      PathPoint P8: 3midph (0.00514 -0.00501 9e-5)
      PathPoint P9: 3midph (0.00448 -0.02556 -0.00149)
      PathPoint P10: 3distph (0.00149 -0.00424 -0.00064)
      PathPoint P11: 3distph (0.00132 -0.00877 -0.00119)
      PathWrap: wrap_object=EDCM
      PathWrap: wrap_object=Thirdmd_ext range=(9 10)
      PathWrap: wrap_object=Thirdpm_ext range=(7 8)
      PathWrap: wrap_object=_3rdmcp_ext range=(5 6)
      tendon_force_length_curve: SimmSpline: x=(-10 -0.002 -0.001 0 0.00131 0.00281 0.00431 0.00581 0.00731 0.00881 0.0103 0.0118 0.0123 9.2 9.201 9.202 20)
          y=(0 0 0 0 0.0108 0.0257 0.0435 0.0652 0.0915 0.123 0.161 0.208 0.227 345 345 345 345)
      active_force_length_curve: SimmSpline: x=(-35 0 0.401 0.402 0.4035 0.52725 0.62875 0.71875 0.86125 1.045 1.2175 1.43875 1.61875 1.62 1.621 2.2 35)
          y=(0 0 0 0 0 0.226667 0.636667 0.856667 0.95 0.993333 0.77 0.246667 0 0 0 0 0)
      passive_force_length_curve: SimmSpline: x=(-35 1 1.05 1.1 1.125 1.14 1.145 1.15 1.25 1.35 1.45 1.55 1.65 1.75 1.7501 1.7502 35)
          y=(0 0 0 0 0 0 0 0 0.035 0.12 0.26 0.55 1.17 2 2 2 2)
    Schutte1993Muscle_Deprecated EDCI: max_isometric_force=48.8 optimal_fiber_length=0.07 tendon_slack_length=0.365
        pennation_angle_at_optimal=0.05235988
      PathPoint P1: humerus_r (0.01869 -0.28898 -0.00065)
      MovingPathPoint P2: radius_r (0.01483 -0.03918 -0.00228) x_coordinate=PS_y y_coordinate=PS_y z_coordinate=PS_y
        x_location: SimmSpline: x=(-1.5708 0 1.5708) y=(0.01133 0.01483 0.01394)
        y_location: SimmSpline: x=(-1.5708 0 1.5708) y=(-0.04048 -0.03918 -0.03538)
        z_location: SimmSpline: x=(-1.5708 0 1.5708) y=(-0.01308 -0.00228 0.00852)
      PathPoint P3: radius_r (0.04196 -0.22314 -0.01533)
      PathPoint P4: palm (0.01639 -0.0468 -0.01543)
      PathPoint P5: palm (0.01438 -0.05654 -0.01897)
      PathPoint P6: 2proxph (0.008 -0.00803 -0.00077)
      PathPoint P7: 2proxph (0.01153 -0.03238 -0.00736)
      PathPoint P8: 2midph (0.00408 -0.00544 -0.00158)
      PathPoint P9: 2midph (0.00262 -0.0214 -0.00365)
      PathPoint P10: 2distph (0.00192 -0.00419 -0.00117)
      PathWrap: wrap_object=EDCI range=(3 4)
      PathWrap: wrap_object=_2rdmcp_ext range=(5 6)
      PathWrap: wrap_object=Secondpm_ext range=(7 8)
      PathWrap: wrap_object=Secondmd_ext range=(9 10)
      tendon_force_length_curve: SimmSpline: x=(-10 -0.002 -0.001 0 0.00131 0.00281 0.00431 0.00581 0.00731 0.00881 0.0103 0.0118 0.0123 9.2 9.201 9.202 20)
          y=(0 0 0 0 0.0108 0.0257 0.0435 0.0652 0.0915 0.123 0.161 0.208 0.227 345 345 345 345)
      active_force_length_curve: SimmSpline: x=(-35 0 0.401 0.402 0.4035 0.52725 0.62875 0.71875 0.86125 1.045 1.2175 1.43875 1.61875 1.62 1.621 2.2 35)
          y=(0 0 0 0 0 0.226667 0.636667 0.856667 0.95 0.993333 0.77 0.246667 0 0 0 0 0)
      passive_force_length_curve: SimmSpline: x=(-35 1 1.05 1.1 1.125 1.14 1.145 1.15 1.25 1.35 1.45 1.55 1.65 1.75 1.7501 1.7502 35)
          y=(0 0 0 0 0 0 0 0 0.035 0.12 0.26 0.55 1.17 2 2 2 2)
    Schutte1993Muscle_Deprecated EDM: max_isometric_force=72.4 optimal_fiber_length=0.0675 tendon_slack_length=0.335
        pennation_angle_at_optimal=0.05235988
      PathPoint P1: humerus_r (0.01847 -0.28919 -0.00089)
      PathPoint P2: ulna_r (0.03085 -0.03907 0.00977)
      PathPoint P3: ulna_r (0.03646 -0.08267 0.00755)
      PathPoint P4: radius_r (0.03678 -0.22641 -0.00454)
      PathPoint P5: palm (0.00372 -0.01032 0.02059)
      PathPoint P6: palm (0.00023 -0.04722 0.02563)
      PathPoint P7: 5proxph (0.0029 -0.00863 0.00545)
      PathPoint P8: 5proxph (0.00092 -0.03012 0.0073)
      PathPoint P9: 5midph (0.00075 -0.00461 0.00436)
      PathPoint P10: 5midph (-0.00149 -0.0182 0.00458)
      PathPoint P11: 5distph (-0.00028 -0.00159 0.00197)
      PathWrap: wrap_object=EDM method=hybrid range=(4 5)
      PathWrap: wrap_object=Fifthmd_ext range=(10 11)
      PathWrap: wrap_object=Fifthpm_ext range=(8 9)
      PathWrap: wrap_object=_5rdmcp_ext range=(6 7)
      tendon_force_length_curve: SimmSpline: x=(-10 -0.002 -0.001 0 0.00131 0.00281 0.00431 0.00581 0.00731 0.00881 0.0103 0.0118 0.0123 9.2 9.201 9.202 20)
          y=(0 0 0 0 0.0108 0.0257 0.0435 0.0652 0.0915 0.123 0.161 0.208 0.227 345 345 345 345)
      active_force_length_curve: SimmSpline: x=(-35 0 0.401 0.402 0.4035 0.52725 0.62875 0.71875 0.86125 1.045 1.2175 1.43875 1.61875 1.62 1.621 2.2 35)
          y=(0 0 0 0 0 0.226667 0.636667 0.856667 0.95 0.993333 0.77 0.246667 0 0 0 0 0)
      passive_force_length_curve: SimmSpline: x=(-35 1 1.05 1.1 1.125 1.14 1.145 1.15 1.25 1.35 1.45 1.55 1.65 1.75 1.7501 1.7502 35)
          y=(0 0 0 0 0 0 0 0 0.035 0.12 0.26 0.55 1.17 2 2 2 2)
    Schutte1993Muscle_Deprecated EIP: max_isometric_force=47.3 optimal_fiber_length=0.0589 tendon_slack_length=0.21
        pennation_angle_at_optimal=0.1047198
      PathPoint P1: ulna_r (0.03682 -0.16652 0.00394)
      PathPoint P2: ulna_r (0.04049 -0.17469 -0.00171)
      PathPoint P3: radius_r (0.03664 -0.22783 -0.01076)
      PathPoint P4: palm (0.01184 -0.02234 -0.00388)
      PathPoint P5: palm (0.01377 -0.0564 -0.01693)
      PathPoint P6: 2proxph (0.00806 -0.00789 0.00182)
      PathPoint P7: 2proxph (0.0115 -0.0352 -0.0052)
      PathPoint P8: 2midph (0.00447 -0.0048 0.00102)
      PathPoint P9: 2midph (0.00306 -0.02175 -0.00226)
      PathPoint P10: 2distph (0.0026 -0.01043 -0.00166)
      PathWrap: wrap_object=Extensor_ellipse method=hybrid
      PathWrap: wrap_object=_2rdmcp_ext range=(5 6)
      PathWrap: wrap_object=Secondpm_ext range=(7 8)
      PathWrap: wrap_object=Secondmd_ext range=(9 10)
      tendon_force_length_curve: SimmSpline: x=(-10 -0.002 -0.001 0 0.00131 0.00281 0.00431 0.00581 0.00731 0.00881 0.0103 0.0118 0.0123 9.2 9.201 9.202 20)
          y=(0 0 0 0 0.0108 0.0257 0.0435 0.0652 0.0915 0.123 0.161 0.208 0.227 345 345 345 345)
      active_force_length_curve: SimmSpline: x=(-35 0 0.401 0.402 0.4035 0.52725 0.62875 0.71875 0.86125 1.045 1.2175 1.43875 1.61875 1.62 1.621 2.2 35)
          y=(0 0 0 0 0 0.226667 0.636667 0.856667 0.95 0.993333 0.77 0.246667 0 0 0 0 0)
      passive_force_length_curve: SimmSpline: x=(-35 1 1.05 1.1 1.125 1.14 1.145 1.15 1.25 1.35 1.45 1.55 1.65 1.75 1.7501 1.7502 35)
          y=(0 0 0 0 0 0 0 0 0.035 0.12 0.26 0.55 1.17 2 2 2 2)
    Schutte1993Muscle_Deprecated EPL: max_isometric_force=88.3 optimal_fiber_length=0.054 tendon_slack_length=0.2305
        pennation_angle_at_optimal=0.1047198
      PathPoint P1: ulna_r (0.02952 -0.09706 0.01412)
      PathPoint P2: radius_r (0.0227 -0.13668 -0.00124)
      PathPoint P3: radius_r (0.03828 -0.21872 -0.02702)
      PathPoint P4: radius_r (0.04607 -0.22754 -0.03382)
      PathPoint P5: radius_r (0.04173 -0.23771 -0.04234)
      PathPoint P6: palm (0.00608 0.00014 -0.02428)
      PathPoint P7: palm (-0.00039 -0.00917 -0.02338)
      PathPoint P8: firstmc (0.00792 -0.0043 -0.00656)
      PathPoint P9: firstmc (-0.00533 -0.0242 -0.02165)
      PathPoint P10: proximal_thumb (0.00156 -0.00362 -0.01147)
      PathPoint P11: proximal_thumb (-0.01038 -0.0265 -0.01921)
      PathPoint P12: distal_thumb (-0.00464 -0.00714 -0.00543)
      PathWrap: wrap_object=MPthumb
      tendon_force_length_curve: SimmSpline: x=(-10 -0.002 -0.001 0 0.00131 0.00281 0.00431 0.00581 0.00731 0.00881 0.0103 0.0118 0.0123 9.2 9.201 9.202 20)
          y=(0 0 0 0 0.0108 0.0257 0.0435 0.0652 0.0915 0.123 0.161 0.208 0.227 345 345 345 345)
      active_force_length_curve: SimmSpline: x=(-35 0 0.401 0.402 0.4035 0.52725 0.62875 0.71875 0.86125 1.045 1.2175 1.43875 1.61875 1.62 1.621 2.2 35)
          y=(0 0 0 0 0 0.226667 0.636667 0.856667 0.95 0.993333 0.77 0.246667 0 0 0 0 0)
      passive_force_length_curve: SimmSpline: x=(-35 1 1.05 1.1 1.125 1.14 1.145 1.15 1.25 1.35 1.45 1.55 1.65 1.75 1.7501 1.7502 35)
          y=(0 0 0 0 0 0 0 0 0.035 0.12 0.26 0.55 1.17 2 2 2 2)
    Schutte1993Muscle_Deprecated EPB: max_isometric_force=46 optimal_fiber_length=0.0675 tendon_slack_length=0.1155
        pennation_angle_at_optimal=0.1256637
      PathPoint P1: radius_r (0.02114 -0.14695 -0.01924)
      PathPoint P2: radius_r (0.02665 -0.15857 -0.02276)
      PathPoint P3: radius_r (0.03834 -0.19722 -0.03831)
      PathPoint P4: radius_r (0.02699 -0.23611 -0.05235)
      PathPoint P5: palm (-0.00327 0.00256 -0.03123)
      PathPoint P6: firstmc1 (-0.00405 -0.00337 -0.01443)
      PathPoint P7: firstmc (-0.01141 -0.02303 -0.02173)
      PathPoint P8: proximal_thumb (-0.00557 -0.00618 -0.00927)
      PathWrap: wrap_object=MPthumb
      tendon_force_length_curve: SimmSpline: x=(-10 -0.002 -0.001 0 0.00131 0.00281 0.00431 0.00581 0.00731 0.00881 0.0103 0.0118 0.0123 9.2 9.201 9.202 20)
          y=(0 0 0 0 0.0108 0.0257 0.0435 0.0652 0.0915 0.123 0.161 0.208 0.227 345 345 345 345)
      active_force_length_curve: SimmSpline: x=(-35 0 0.401 0.402 0.4035 0.52725 0.62875 0.71875 0.86125 1.045 1.2175 1.43875 1.61875 1.62 1.621 2.2 35)
          y=(0 0 0 0 0 0.226667 0.636667 0.856667 0.95 0.993333 0.77 0.246667 0 0 0 0 0)
      passive_force_length_curve: SimmSpline: x=(-35 1 1.05 1.1 1.125 1.14 1.145 1.15 1.25 1.35 1.45 1.55 1.65 1.75 1.7501 1.7502 35)
          y=(0 0 0 0 0 0 0 0 0.035 0.12 0.26 0.55 1.17 2 2 2 2)
    Schutte1993Muscle_Deprecated FPL: max_isometric_force=201 optimal_fiber_length=0.0552 tendon_slack_length=0.197
        pennation_angle_at_optimal=0.1221731
      PathPoint P1: radius_r (0.01769 -0.09458 -0.00971)
      PathPoint P2: radius_r (0.01915 -0.13525 -0.01658)
      PathPoint P3: radius_r (0.01988 -0.17932 -0.01869)
      PathPoint P4: radius_r (0.0158 -0.23171 -0.038)
      MovingPathPoint P5: palm (-0.01547 0.00882 -0.01869) x_coordinate=flexion y_coordinate=flexion
          z_coordinate=flexion
        x_location: SimmSpline: x=(-1.22173 0 1.22173) y=(-0.01547 -0.01547 -0.02627)
        y_location: SimmSpline: x=(-1.22173 0 1.22173) y=(0.00882 0.00882 -0.01038)
        z_location: SimmSpline: x=(-1.22173 0 1.22173) y=(-0.01869 -0.01869 -0.01229)
      MovingPathPoint P6: palm (-0.02089 -0.02207 -0.01244) x_coordinate=cmc_flexion y_coordinate=cmc_flexion
          z_coordinate=cmc_flexion
        x_location: SimmSpline: x=(-0.785398 0 0.261799) y=(-0.02089 -0.02089 -0.02029)
        y_location: SimmSpline: x=(-0.785398 0 0.261799) y=(-0.02207 -0.02207 -0.02157)
        z_location: SimmSpline: x=(-0.785303 -0.376492 -0.183675 -0.0872665 0 0.261799)
            y=(-0.01244 -0.012448 -0.012472 -0.01248 -0.01244 -0.00924)
      PathPoint P7: firstmc (-0.0094 -0.01624 0.00608)
      PathPoint P8: firstmc (-0.00956 -0.02297 -0.00208)
      PathPoint P9: proximal_thumb (-0.00508 -0.01842 0.0045)
      PathPoint P10: proximal_thumb (-0.01114 -0.02602 -0.0059)
      PathPoint P11: distal_thumb (-0.00412 -0.01127 -0.00242)
      PathWrap: wrap_object=FPL method=hybrid
      PathWrap: wrap_object=IPthumb range=(10 11)
      PathWrap: wrap_object=MPthumb
      tendon_force_length_curve: SimmSpline: x=(-10 -0.002 -0.001 0 0.00131 0.00281 0.00431 0.00581 0.00731 0.00881 0.0103 0.0118 0.0123 9.2 9.201 9.202 20)
          y=(0 0 0 0 0.0108 0.0257 0.0435 0.0652 0.0915 0.123 0.161 0.208 0.227 345 345 345 345)
      active_force_length_curve: SimmSpline: x=(-35 0 0.401 0.402 0.4035 0.52725 0.62875 0.71875 0.86125 1.045 1.2175 1.43875 1.61875 1.62 1.621 2.2 35)
          y=(0 0 0 0 0 0.226667 0.636667 0.856667 0.95 0.993333 0.77 0.246667 0 0 0 0 0)
      passive_force_length_curve: SimmSpline: x=(-35 1 1.05 1.1 1.125 1.14 1.145 1.15 1.25 1.35 1.45 1.55 1.65 1.75 1.7501 1.7502 35)
          y=(0 0 0 0 0 0 0 0 0.035 0.12 0.26 0.55 1.17 2 2 2 2)
    Schutte1993Muscle_Deprecated APL: max_isometric_force=116.7 optimal_fiber_length=0.0713 tendon_slack_length=0.1295
        pennation_angle_at_optimal=0.1308997
      PathPoint P1: radius_r (0.01681 -0.09477 -0.01154)
      PathPoint P2: radius_r (0.03507 -0.1397 -0.0303)
      PathPoint P3: radius_r (0.034 -0.16072 -0.03993)
      PathPoint P4: radius_r (0.03134 -0.17845 -0.04397)
      PathPoint P5: radius_r (0.02368 -0.23084 -0.05505)
      MovingPathPoint P6: palm (-0.00745 0.00634 -0.03385) x_coordinate=flexion y_coordinate=flexion
          z_coordinate=flexion
        x_location: SimmSpline: x=(-1.22173 0 1.22173) y=(-0.00745 -0.00795 -0.01995)
        y_location: SimmSpline: x=(-1.22173 0 1.22173) y=(0.00634 0.00624 0.00384)
        z_location: SimmSpline: x=(-1.22173 0 1.22173) y=(-0.03385 -0.0336 -0.0276)
      PathPoint P7: firstmc1 (-0.00619 0.00662 -0.01058)
      PathPoint P8: firstmc (-0.00589 0.00323 -0.00629)
      PathPoint P9: firstmc (-0.00604 -0.00586 -0.00827)
      tendon_force_length_curve: SimmSpline: x=(-10 -0.002 -0.001 0 0.00131 0.00281 0.00431 0.00581 0.00731 0.00881 0.0103 0.0118 0.0123 9.2 9.201 9.202 20)
          y=(0 0 0 0 0.0108 0.0257 0.0435 0.0652 0.0915 0.123 0.161 0.208 0.227 345 345 345 345)
      active_force_length_curve: SimmSpline: x=(-35 0 0.401 0.402 0.4035 0.52725 0.62875 0.71875 0.86125 1.045 1.2175 1.43875 1.61875 1.62 1.621 2.2 35)
          y=(0 0 0 0 0 0.226667 0.636667 0.856667 0.95 0.993333 0.77 0.246667 0 0 0 0 0)
      passive_force_length_curve: SimmSpline: x=(-35 1 1.05 1.1 1.125 1.14 1.145 1.15 1.25 1.35 1.45 1.55 1.65 1.75 1.7501 1.7502 35)
          y=(0 0 0 0 0 0 0 0 0.035 0.12 0.26 0.55 1.17 2 2 2 2)
    ObjectGroup trap_scap: members=(trap_scap10 trap_scap11 trap_scap_1 trap_scap_2 trap_scap_3 trap_scap_4 trap_scap_5 trap_scap_6 trap_scap_7 trap_scap_8 trap_scap_9)
    ObjectGroup trap_clav: members=(trap_clav_1 trap_clav_2)
    ObjectGroup lev_scap: members=(lev_scap_1 lev_scap_2)
    ObjectGroup pect_min: members=(pect_min_1 pect_min_2 pect_min_3 pect_min_4)
    ObjectGroup rhomboid: members=(rhomboid_1 rhomboid_2 rhomboid_3 rhomboid_4 rhomboid_5)
    ObjectGroup serr_ant: members=(serr_ant10 serr_ant11 serr_ant12 serr_ant_1 serr_ant_2 serr_ant_3 serr_ant_4 serr_ant_5 serr_ant_6 serr_ant_7 serr_ant_8 serr_ant_9)
    ObjectGroup delt_scap: members=(delt_scap10 delt_scap11 delt_scap_1 delt_scap_2 delt_scap_3 delt_scap_4 delt_scap_5 delt_scap_6 delt_scap_7 delt_scap_8 delt_scap_9)
    ObjectGroup delt_clav: members=(delt_clav_1 delt_clav_2 delt_clav_3 delt_clav_4)
    ObjectGroup coracobr: members=(coracobr_1 coracobr_2 coracobr_3)
    ObjectGroup infra: members=(infra_1 infra_2 infra_3 infra_4 infra_5 infra_6)
    ObjectGroup ter_min: members=(ter_min_1 ter_min_2 ter_min_3)
    ObjectGroup ter_maj: members=(ter_maj_1 ter_maj_2 ter_maj_3 ter_maj_4)
    ObjectGroup supra: members=(supra_1 supra_2 supra_3 supra_4)
    ObjectGroup subscap: members=(subscap10 subscap11 subscap_1 subscap_2 subscap_3 subscap_4 subscap_5 subscap_6 subscap_7 subscap_8 subscap_9)
    ObjectGroup bic_c_l: members=bic_l
    ObjectGroup bic_c_b: members=(bic_b_1 bic_b_2)
    ObjectGroup triceps: members=(tric_long_1 tric_long_2 tric_long_3 tric_long_4)
    ObjectGroup lat_dorsi: members=(lat_dorsi_1 lat_dorsi_2 lat_dorsi_3 lat_dorsi_4 lat_dorsi_5 lat_dorsi_6)
    ObjectGroup pect_maj_t: members=(pect_maj_t_1 pect_maj_t_2 pect_maj_t_3 pect_maj_t_4 pect_maj_t_5 pect_maj_t_6)
    ObjectGroup pect_maj_c: members=(pect_maj_c_1 pect_maj_c_2)
    ObjectGroup tric_med: members=(tric_med_1 tric_med_2 tric_med_3 tric_med_4 tric_med_5)
    ObjectGroup brachialis: members=(brachialis_1 brachialis_2 brachialis_3 brachialis_4 brachialis_5 brachialis_6 brachialis_7)
    ObjectGroup brachiorad: members=(brachiorad_1 brachiorad_2 brachiorad_3)
    ObjectGroup pron_teres_hr: members=pron_teres_1
    ObjectGroup pron_teres_ur: members=pron_teres_2
    ObjectGroup supinator_ur: members=(supinator_1 supinator_2 supinator_3 supinator_4 supinator_5)
    ObjectGroup pron_quad: members=(pron_quad_1 pron_quad_2 pron_quad_3)
    ObjectGroup tric_lat: members=(tric_lat_1 tric_lat_2 tric_lat_3 tric_lat_4 tric_lat_5)
    ObjectGroup anconeus: members=(anconeus_1 anconeus_2 anconeus_3 anconeus_4 anconeus_5)
    ObjectGroup elbow: members=(ECRB ECRL ECU EDCI EDCL EDCM EDCR EDM FCR FCU FDSL FDSR PL PT)
    ObjectGroup forearm: members=(ECRB ECRL ECU EDCI EDCL EDCM EDCR EDM EIP EPL FCR FCU FDPI FDPL FDPM FDPR FDSI FDSL FDSM FDSR PL PQ PT)
    ObjectGroup wrist: members=(APL ECRB ECRL ECU EDCI EDCL EDCM EDCR EDM EIP EPB EPL FCR FCU FDPI FDPL FDPM FDPR FDSI FDSL FDSM FDSR FPL PL)
    ObjectGroup elbow_forearm: members=(ECRB ECRL ECU EDCI EDCL EDCM EDCR EDM FCR FCU FDSL FDSR PL PT)
    ObjectGroup elbow_forearm_wrist: members=(ECRB ECRL ECU EDCI EDCL EDCM EDCR EDM FCR FCU FDSL FDSR PL)
    ObjectGroup extensor: members=(ECRB ECU EDCI EDCL EDCM EDCR EDM EIP EPL)
    ObjectGroup radial: members=(APL ECRB EDCI EDCM EIP EPB EPL FCR FDPI FDSI FDSM FPL PL)
    ObjectGroup ulnar: members=(ECU EDCL EDCR EDM FCU FDPL FDPM FDPR FDSL FDSR)
    ObjectGroup flexor: members=(APL EPB FCR FCU FDPI FDPL FDPM FDPR FDSI FDSL FDSM FDSR FPL PL)
    ObjectGroup hand: members=(APL EDCI EDCL EDCM EDCR EDM EIP EPB EPL FDPI FDPL FDPM FDPR FDSI FDSL FDSM FDSR FPL PL)
    ObjectGroup pronators: members=(PQ PT)
    ObjectGroup fingers: members=(APL EDCI EDCL EDCM EDCR EDM EIP EPB EPL FDPI FDPL FDPM FDPR FDSI FDSL FDSM FDSR FPL)
    ObjectGroup elbow_forearm_wrist_fing: members=(EDCI EDCL EDCM EDCR EDM FDSL FDSR)
    ObjectGroup forearm_wrist: members=(EIP EPL FDPI FDPL FDPM FDPR FDSI FDSM)
    ObjectGroup forearm_wrist_fing: members=(EIP EPL FDPI FDPL FDPM FDPR FDSI FDSM)
    ObjectGroup thumb: members=(APL EPB EPL FPL)
    ObjectGroup wrist_fing: members=(APL EPB FPL)
  MarkerSet:
    Marker IJ: thorax (0 0 0)
    Marker C7: thorax (0 0.0541 0.1242)
    Marker T8: thorax (0.0098 -0.1715 0.1561)
    Marker PX: thorax (-0.0098 -0.1327 -0.0319)
    Marker SC: clavicle_r (0.0236 0.022 0.0033)
    Marker AC: scapula_r (-0.0078 0.0143 -0.0046)
    Marker AI: scapula_r (-0.1245 -0.126 0.0313)
    Marker TS: scapula_r (-0.1297 -0.0086 0.0313)
    Marker AA: scapula_r (-0.0093 -0.0086 0.0313)
    Marker GH: humerus_r (0 0 0)
    Marker EL: humerus_r (0.034 -0.286 0)
    Marker EM: humerus_r (-0.034 -0.291 0)
    Marker mid_elbow: humerus_r (0 -0.289 0)
  ProbeSet:
    Umberger2010MuscleMetabolicsProbe metabolics: probe_operation=value initial_conditions_for_integration=0
        activation_maintenance_rate_on=false shortening_rate_on=false basal_rate_on=false mechanical_work_rate_on=false
        aerobic_factor=1.5 report_total_metabolics_only=false
      # Aerobic scale factor (S=1.0 for primarily anaerobic conditions and S=1.5 for primarily aerobic conditions. See Umberger et al., (2003).
      Umberger2010MuscleMetabolicsProbe_MetabolicMuscleParameterSet:
        Umberger2010MuscleMetabolicsProbe_MetabolicMuscleParameter [values shared by the 138 below unless stated]: ratio_slow_twitch_fibers=0.5
            use_provided_muscle_mass=true
        Umberger2010MuscleMetabolicsProbe_MetabolicMuscleParameter trap_scap_1: provided_muscle_mass=0.01954
        Umberger2010MuscleMetabolicsProbe_MetabolicMuscleParameter trap_scap_2: provided_muscle_mass=0.02161
        Umberger2010MuscleMetabolicsProbe_MetabolicMuscleParameter trap_scap_3: provided_muscle_mass=0.02419
        Umberger2010MuscleMetabolicsProbe_MetabolicMuscleParameter trap_scap_4: provided_muscle_mass=0.01494
        Umberger2010MuscleMetabolicsProbe_MetabolicMuscleParameter trap_scap_5: provided_muscle_mass=0.0128
        Umberger2010MuscleMetabolicsProbe_MetabolicMuscleParameter trap_scap_6: provided_muscle_mass=0.01025
        Umberger2010MuscleMetabolicsProbe_MetabolicMuscleParameter trap_scap_7: provided_muscle_mass=0.00958
        Umberger2010MuscleMetabolicsProbe_MetabolicMuscleParameter trap_scap_8: provided_muscle_mass=0.01212
        Umberger2010MuscleMetabolicsProbe_MetabolicMuscleParameter trap_scap_9: provided_muscle_mass=0.01416
        Umberger2010MuscleMetabolicsProbe_MetabolicMuscleParameter trap_scap10: provided_muscle_mass=0.01158
        Umberger2010MuscleMetabolicsProbe_MetabolicMuscleParameter trap_scap11: provided_muscle_mass=0.01407
        Umberger2010MuscleMetabolicsProbe_MetabolicMuscleParameter trap_clav_1: provided_muscle_mass=0.01712
        Umberger2010MuscleMetabolicsProbe_MetabolicMuscleParameter trap_clav_2: provided_muscle_mass=0.00969
        Umberger2010MuscleMetabolicsProbe_MetabolicMuscleParameter lev_scap_1: provided_muscle_mass=0.01731
        Umberger2010MuscleMetabolicsProbe_MetabolicMuscleParameter lev_scap_2: provided_muscle_mass=0.01544
        Umberger2010MuscleMetabolicsProbe_MetabolicMuscleParameter pect_min_1: provided_muscle_mass=0.00407
        Umberger2010MuscleMetabolicsProbe_MetabolicMuscleParameter pect_min_2: provided_muscle_mass=0.01323
        Umberger2010MuscleMetabolicsProbe_MetabolicMuscleParameter pect_min_3: provided_muscle_mass=0.01303
        Umberger2010MuscleMetabolicsProbe_MetabolicMuscleParameter pect_min_4: provided_muscle_mass=0.0072
        Umberger2010MuscleMetabolicsProbe_MetabolicMuscleParameter rhomboid_1: provided_muscle_mass=0.00575
        Umberger2010MuscleMetabolicsProbe_MetabolicMuscleParameter rhomboid_2: provided_muscle_mass=0.0113
        Umberger2010MuscleMetabolicsProbe_MetabolicMuscleParameter rhomboid_3: provided_muscle_mass=0.02034
        Umberger2010MuscleMetabolicsProbe_MetabolicMuscleParameter rhomboid_4: provided_muscle_mass=0.01176
        Umberger2010MuscleMetabolicsProbe_MetabolicMuscleParameter rhomboid_5: provided_muscle_mass=0.00885
        Umberger2010MuscleMetabolicsProbe_MetabolicMuscleParameter serr_ant_1: provided_muscle_mass=0.01139
        Umberger2010MuscleMetabolicsProbe_MetabolicMuscleParameter serr_ant_2: provided_muscle_mass=0.02083
        Umberger2010MuscleMetabolicsProbe_MetabolicMuscleParameter serr_ant_3: provided_muscle_mass=0.01925
        Umberger2010MuscleMetabolicsProbe_MetabolicMuscleParameter serr_ant_4: provided_muscle_mass=0.01629
        Umberger2010MuscleMetabolicsProbe_MetabolicMuscleParameter serr_ant_5: provided_muscle_mass=0.00909
        Umberger2010MuscleMetabolicsProbe_MetabolicMuscleParameter serr_ant_6: provided_muscle_mass=0.01345
        Umberger2010MuscleMetabolicsProbe_MetabolicMuscleParameter serr_ant_7: provided_muscle_mass=0.00609
        Umberger2010MuscleMetabolicsProbe_MetabolicMuscleParameter serr_ant_8: provided_muscle_mass=0.00729
        Umberger2010MuscleMetabolicsProbe_MetabolicMuscleParameter serr_ant_9: provided_muscle_mass=0.00724
        Umberger2010MuscleMetabolicsProbe_MetabolicMuscleParameter serr_ant10: provided_muscle_mass=0.00476
        Umberger2010MuscleMetabolicsProbe_MetabolicMuscleParameter serr_ant11: provided_muscle_mass=0.00229
        Umberger2010MuscleMetabolicsProbe_MetabolicMuscleParameter serr_ant12: provided_muscle_mass=0.01212
        Umberger2010MuscleMetabolicsProbe_MetabolicMuscleParameter delt_scap_1: provided_muscle_mass=0.03703
        Umberger2010MuscleMetabolicsProbe_MetabolicMuscleParameter delt_scap_2: provided_muscle_mass=0.02269
        Umberger2010MuscleMetabolicsProbe_MetabolicMuscleParameter delt_scap_3: provided_muscle_mass=0.04214
        Umberger2010MuscleMetabolicsProbe_MetabolicMuscleParameter delt_scap_4: provided_muscle_mass=0.00888
        Umberger2010MuscleMetabolicsProbe_MetabolicMuscleParameter delt_scap_5: provided_muscle_mass=0.00891
        Umberger2010MuscleMetabolicsProbe_MetabolicMuscleParameter delt_scap_6: provided_muscle_mass=0.02485
        Umberger2010MuscleMetabolicsProbe_MetabolicMuscleParameter delt_scap_7: provided_muscle_mass=0.01275
        Umberger2010MuscleMetabolicsProbe_MetabolicMuscleParameter delt_scap_8: provided_muscle_mass=0.0173
        Umberger2010MuscleMetabolicsProbe_MetabolicMuscleParameter delt_scap_9: provided_muscle_mass=0.02378
        Umberger2010MuscleMetabolicsProbe_MetabolicMuscleParameter delt_scap10: provided_muscle_mass=0.0379
        Umberger2010MuscleMetabolicsProbe_MetabolicMuscleParameter delt_scap11: provided_muscle_mass=0.02012
        Umberger2010MuscleMetabolicsProbe_MetabolicMuscleParameter delt_clav_1: provided_muscle_mass=0.01217
        Umberger2010MuscleMetabolicsProbe_MetabolicMuscleParameter delt_clav_2: provided_muscle_mass=0.01701
        Umberger2010MuscleMetabolicsProbe_MetabolicMuscleParameter delt_clav_3: provided_muscle_mass=0.00983
        Umberger2010MuscleMetabolicsProbe_MetabolicMuscleParameter delt_clav_4: provided_muscle_mass=0.01259
        Umberger2010MuscleMetabolicsProbe_MetabolicMuscleParameter coracobr_1: provided_muscle_mass=0.01506
        Umberger2010MuscleMetabolicsProbe_MetabolicMuscleParameter coracobr_2: provided_muscle_mass=0.01151
        Umberger2010MuscleMetabolicsProbe_MetabolicMuscleParameter coracobr_3: provided_muscle_mass=0.00939
        Umberger2010MuscleMetabolicsProbe_MetabolicMuscleParameter infra_1: provided_muscle_mass=0.01961
        Umberger2010MuscleMetabolicsProbe_MetabolicMuscleParameter infra_2: provided_muscle_mass=0.02245
        Umberger2010MuscleMetabolicsProbe_MetabolicMuscleParameter infra_3: provided_muscle_mass=0.01488
        Umberger2010MuscleMetabolicsProbe_MetabolicMuscleParameter infra_4: provided_muscle_mass=0.01631
        Umberger2010MuscleMetabolicsProbe_MetabolicMuscleParameter infra_5: provided_muscle_mass=0.02414
        Umberger2010MuscleMetabolicsProbe_MetabolicMuscleParameter infra_6: provided_muscle_mass=0.01564
        Umberger2010MuscleMetabolicsProbe_MetabolicMuscleParameter ter_min_1: provided_muscle_mass=0.00714
        Umberger2010MuscleMetabolicsProbe_MetabolicMuscleParameter ter_min_2: provided_muscle_mass=0.01221
        Umberger2010MuscleMetabolicsProbe_MetabolicMuscleParameter ter_min_3: provided_muscle_mass=0.01041
        Umberger2010MuscleMetabolicsProbe_MetabolicMuscleParameter ter_maj_1: provided_muscle_mass=0.02643
        Umberger2010MuscleMetabolicsProbe_MetabolicMuscleParameter ter_maj_2: provided_muscle_mass=0.01549
        Umberger2010MuscleMetabolicsProbe_MetabolicMuscleParameter ter_maj_3: provided_muscle_mass=0.03481
        Umberger2010MuscleMetabolicsProbe_MetabolicMuscleParameter ter_maj_4: provided_muscle_mass=0.01971
        Umberger2010MuscleMetabolicsProbe_MetabolicMuscleParameter supra_1: provided_muscle_mass=0.0074
        Umberger2010MuscleMetabolicsProbe_MetabolicMuscleParameter supra_2: provided_muscle_mass=0.00756
        Umberger2010MuscleMetabolicsProbe_MetabolicMuscleParameter supra_3: provided_muscle_mass=0.01651
        Umberger2010MuscleMetabolicsProbe_MetabolicMuscleParameter supra_4: provided_muscle_mass=0.00819
        Umberger2010MuscleMetabolicsProbe_MetabolicMuscleParameter subscap_1: provided_muscle_mass=0.00281
        Umberger2010MuscleMetabolicsProbe_MetabolicMuscleParameter subscap_2: provided_muscle_mass=0.00575
        Umberger2010MuscleMetabolicsProbe_MetabolicMuscleParameter subscap_3: provided_muscle_mass=0.02021
        Umberger2010MuscleMetabolicsProbe_MetabolicMuscleParameter subscap_4: provided_muscle_mass=0.02376
        Umberger2010MuscleMetabolicsProbe_MetabolicMuscleParameter subscap_5: provided_muscle_mass=0.01033
        Umberger2010MuscleMetabolicsProbe_MetabolicMuscleParameter subscap_6: provided_muscle_mass=0.01292
        Umberger2010MuscleMetabolicsProbe_MetabolicMuscleParameter subscap_7: provided_muscle_mass=0.01513
        Umberger2010MuscleMetabolicsProbe_MetabolicMuscleParameter subscap_8: provided_muscle_mass=0.00532
        Umberger2010MuscleMetabolicsProbe_MetabolicMuscleParameter subscap_9: provided_muscle_mass=0.0182
        Umberger2010MuscleMetabolicsProbe_MetabolicMuscleParameter subscap10: provided_muscle_mass=0.00361
        Umberger2010MuscleMetabolicsProbe_MetabolicMuscleParameter subscap11: provided_muscle_mass=0.00115
        Umberger2010MuscleMetabolicsProbe_MetabolicMuscleParameter bic_l: provided_muscle_mass=0.0662
        Umberger2010MuscleMetabolicsProbe_MetabolicMuscleParameter bic_b_1: provided_muscle_mass=0.02079
        Umberger2010MuscleMetabolicsProbe_MetabolicMuscleParameter bic_b_2: provided_muscle_mass=0.03107
        Umberger2010MuscleMetabolicsProbe_MetabolicMuscleParameter tric_long_1: provided_muscle_mass=0.02697
        Umberger2010MuscleMetabolicsProbe_MetabolicMuscleParameter tric_long_2: provided_muscle_mass=0.02955
        Umberger2010MuscleMetabolicsProbe_MetabolicMuscleParameter tric_long_3: provided_muscle_mass=0.02964
        Umberger2010MuscleMetabolicsProbe_MetabolicMuscleParameter tric_long_4: provided_muscle_mass=0.03203
        Umberger2010MuscleMetabolicsProbe_MetabolicMuscleParameter lat_dorsi_1: provided_muscle_mass=0.01498
        Umberger2010MuscleMetabolicsProbe_MetabolicMuscleParameter lat_dorsi_2: provided_muscle_mass=0.02883
        Umberger2010MuscleMetabolicsProbe_MetabolicMuscleParameter lat_dorsi_3: provided_muscle_mass=0.04305
        Umberger2010MuscleMetabolicsProbe_MetabolicMuscleParameter lat_dorsi_4: provided_muscle_mass=0.03515
        Umberger2010MuscleMetabolicsProbe_MetabolicMuscleParameter lat_dorsi_5: provided_muscle_mass=0.03157
        Umberger2010MuscleMetabolicsProbe_MetabolicMuscleParameter lat_dorsi_6: provided_muscle_mass=0.04069
        Umberger2010MuscleMetabolicsProbe_MetabolicMuscleParameter pect_maj_t_1: provided_muscle_mass=0.02692
        Umberger2010MuscleMetabolicsProbe_MetabolicMuscleParameter pect_maj_t_2: provided_muscle_mass=0.02448
        Umberger2010MuscleMetabolicsProbe_MetabolicMuscleParameter pect_maj_t_3: provided_muscle_mass=0.03475
        Umberger2010MuscleMetabolicsProbe_MetabolicMuscleParameter pect_maj_t_4: provided_muscle_mass=0.03301
        Umberger2010MuscleMetabolicsProbe_MetabolicMuscleParameter pect_maj_t_5: provided_muscle_mass=0.02273
        Umberger2010MuscleMetabolicsProbe_MetabolicMuscleParameter pect_maj_t_6: provided_muscle_mass=0.03243
        Umberger2010MuscleMetabolicsProbe_MetabolicMuscleParameter pect_maj_c_1: provided_muscle_mass=0.02769
        Umberger2010MuscleMetabolicsProbe_MetabolicMuscleParameter pect_maj_c_2: provided_muscle_mass=0.01399
        Umberger2010MuscleMetabolicsProbe_MetabolicMuscleParameter tric_med_1: provided_muscle_mass=0.0184
        Umberger2010MuscleMetabolicsProbe_MetabolicMuscleParameter tric_med_2: provided_muscle_mass=0.01765
        Umberger2010MuscleMetabolicsProbe_MetabolicMuscleParameter tric_med_3: provided_muscle_mass=0.01195
        Umberger2010MuscleMetabolicsProbe_MetabolicMuscleParameter tric_med_4: provided_muscle_mass=0.01395
        Umberger2010MuscleMetabolicsProbe_MetabolicMuscleParameter tric_med_5: provided_muscle_mass=0.0077
        Umberger2010MuscleMetabolicsProbe_MetabolicMuscleParameter brachialis_1: provided_muscle_mass=0.0291
        Umberger2010MuscleMetabolicsProbe_MetabolicMuscleParameter brachialis_2: provided_muscle_mass=0.0159
        Umberger2010MuscleMetabolicsProbe_MetabolicMuscleParameter brachialis_3: provided_muscle_mass=0.01465
        Umberger2010MuscleMetabolicsProbe_MetabolicMuscleParameter brachialis_4: provided_muscle_mass=0.007
        Umberger2010MuscleMetabolicsProbe_MetabolicMuscleParameter brachialis_5: provided_muscle_mass=0.0066
        Umberger2010MuscleMetabolicsProbe_MetabolicMuscleParameter brachialis_6: provided_muscle_mass=0.0041
        Umberger2010MuscleMetabolicsProbe_MetabolicMuscleParameter brachialis_7: provided_muscle_mass=0.0065
        Umberger2010MuscleMetabolicsProbe_MetabolicMuscleParameter brachiorad_1: provided_muscle_mass=0.0047
        Umberger2010MuscleMetabolicsProbe_MetabolicMuscleParameter brachiorad_2: provided_muscle_mass=0.014
        Umberger2010MuscleMetabolicsProbe_MetabolicMuscleParameter brachiorad_3: provided_muscle_mass=0.00597
        Umberger2010MuscleMetabolicsProbe_MetabolicMuscleParameter pron_teres_1: provided_muscle_mass=0.0275
        Umberger2010MuscleMetabolicsProbe_MetabolicMuscleParameter pron_teres_2: provided_muscle_mass=0.00433
        Umberger2010MuscleMetabolicsProbe_MetabolicMuscleParameter supinator_1: provided_muscle_mass=0.00084
        Umberger2010MuscleMetabolicsProbe_MetabolicMuscleParameter supinator_2: provided_muscle_mass=0.00364
        Umberger2010MuscleMetabolicsProbe_MetabolicMuscleParameter supinator_3: provided_muscle_mass=0.00336
        Umberger2010MuscleMetabolicsProbe_MetabolicMuscleParameter supinator_4: provided_muscle_mass=0.00296
        Umberger2010MuscleMetabolicsProbe_MetabolicMuscleParameter supinator_5: provided_muscle_mass=0.00676
        Umberger2010MuscleMetabolicsProbe_MetabolicMuscleParameter pron_quad_1: provided_muscle_mass=0.00163
        Umberger2010MuscleMetabolicsProbe_MetabolicMuscleParameter pron_quad_2: provided_muscle_mass=0.00347
        Umberger2010MuscleMetabolicsProbe_MetabolicMuscleParameter pron_quad_3: provided_muscle_mass=0.00493
        Umberger2010MuscleMetabolicsProbe_MetabolicMuscleParameter tric_lat_1: provided_muscle_mass=0.0125
        Umberger2010MuscleMetabolicsProbe_MetabolicMuscleParameter tric_lat_2: provided_muscle_mass=0.0332
        Umberger2010MuscleMetabolicsProbe_MetabolicMuscleParameter tric_lat_3: provided_muscle_mass=0.0152
        Umberger2010MuscleMetabolicsProbe_MetabolicMuscleParameter tric_lat_4: provided_muscle_mass=0.0162
        Umberger2010MuscleMetabolicsProbe_MetabolicMuscleParameter tric_lat_5: provided_muscle_mass=0.00585
        Umberger2010MuscleMetabolicsProbe_MetabolicMuscleParameter anconeus_1: provided_muscle_mass=0.00083
        Umberger2010MuscleMetabolicsProbe_MetabolicMuscleParameter anconeus_2: provided_muscle_mass=0.0015
        Umberger2010MuscleMetabolicsProbe_MetabolicMuscleParameter anconeus_3: provided_muscle_mass=0.0006
        Umberger2010MuscleMetabolicsProbe_MetabolicMuscleParameter anconeus_4: provided_muscle_mass=0.0022
        Umberger2010MuscleMetabolicsProbe_MetabolicMuscleParameter anconeus_5: provided_muscle_mass=0.00333
