# OpenSim document version 40000
ScaleTool ThoracoscapularShoulderModel-scaled:
  mass: 43.19 [kg]
  height: -1
  age: -1
  GenericModelMaker:
    marker_set_file: markers.xml
  ModelScaler:
    apply: true
    scaling_order: manualScale
    time_range: 0 1.01
    preserve_mass_distribution: true
    MeasurementSet:
      Measurement Thorax_1: apply=true
        MarkerPair: markers=(ac_thorax ij)
      Measurement Thorax_2: apply=true
        MarkerPair: markers=(px ij)
      Measurement Thorax_3: apply=true
        MarkerPair: markers=(c7 ij)
      Measurement Clavicle_1: apply=false
      Measurement Clavicle_2: apply=false
      Measurement Clavicle_3: apply=true
        MarkerPair: markers=(ij_clavicle ac)
      Measurement Scapula_1: apply=true
        MarkerPair: markers=(ts aa)
      Measurement Scapula_2: apply=true
        MarkerPair: markers=(ts ai)
      Measurement Scapula_3: apply=true
        MarkerPair: markers=(ac_scapula aa)
      Measurement Humerus_1: apply=true
        MarkerPair: markers=(EpM EpL)
      Measurement Humerus_2_Y_vertical: apply=false
        MarkerPair: markers=(gu centelbow_humerus)
      Measurement Humerus_3: apply=true
        MarkerPair: markers=(EpM EpL)
      Measurement Ulna_1: apply=true
        MarkerPair: markers=(EpM centelbow_humerus)
      Measurement Ulna_2: apply=true
        MarkerPair: markers=(centelbow_humerus mid_RS_US_humerus)
      Measurement Ulna_3: apply=false
        MarkerPair: markers=(EpM centelbow_humerus)
      Measurement Radius_1: apply=false
        MarkerPair: markers=(EpM centelbow_humerus)
      Measurement Radius_2: apply=false
        MarkerPair: markers=(centelbow_humerus mid_RS_US_humerus)
      Measurement Radius_3: apply=false
        MarkerPair: markers=(EpM centelbow_humerus)
      Measurement Hand_1: apply=false
      Measurement Hand_2: apply=false
      Measurement Hand_3: apply=false
      Measurement Thorax123: apply=false
    ScaleSet:
      Scale: scales=(2 2 2) segment=thorax apply=true
      Scale: scales=(2 2 2) segment=scapula_r apply=true
      Scale: scales=(2 2 2) segment=clavicle_r apply=true
      Scale: scales=(2 2 2) segment=humerus_r apply=true
      Scale: scales=(2 2 2) segment=ulna_r apply=true
      Scale: scales=(2 2 2) segment=radius_r apply=true
  MarkerPlacer:
    apply: false
    time_range: 0 1
    max_marker_movement: -1
    IKTaskSet:
      IKMarkerTask ij: apply=false weight=60
      IKMarkerTask px: apply=false weight=60
      IKMarkerTask c7: apply=false weight=9
      IKMarkerTask t8: apply=false weight=0.2
      IKMarkerTask ac: apply=false weight=9
      IKMarkerTask EpL: apply=false weight=9
      IKMarkerTask EpM: apply=false weight=9
      IKMarkerTask centelbow_humerus: apply=false weight=1
      IKMarkerTask gu: apply=false weight=1.5
      IKMarkerTask rs: apply=false weight=9
      IKMarkerTask us: apply=false weight=9
      IKMarkerTask aa: apply=false weight=0.5
      IKMarkerTask ts: apply=false weight=1
      IKMarkerTask ai: apply=false weight=1
