# OpenSim document version 40000
Model ThoracoscapularShoulderModel-scaled:
  gravity: 0 -9.80665 0
  Ground
  BodySet:
    Body thorax: mass=35.21244 mass_center=(0 -0.1207056 0.09529589) inertia=(2.28601 0.9726558 2.28601 0 0 0)
        meshes=(das_ribs_rotated.stl das_spine_rotated.stl das_skull_rotated.stl das_jaw_rotated.stl)
      WrapEllipsoid serr_ant: translation=(0 -0.1207056 0.09529589) quadrant=all
          dimensions=(0.1450041 0.1688741 0.1522154)
    Body clavicle_1: mass=0 mass_center=(0 0 0) inertia=(0 0 0 0 0 0)
    Body clavicle_2: mass=0 mass_center=(0 0 0) inertia=(0 0 0 0 0 0)
    Body clavicle_r: mass=0.2746571 mass_center=(0.1087188 0.01847004 0.004645159)
        inertia=(1.378316e-5 5.664017e-5 5.233293e-5 -1.442924e-5 -2.045938e-5 6.245494e-6) meshes=rclavicle.vtp
    Body scapula_1: mass=0 mass_center=(0 0 0) inertia=(0 0 0 0 0 0)
    Body scapula_2: mass=0 mass_center=(0 0 0) inertia=(0 0 0 0 0 0)
    Body scapula_r: mass=1.241943 mass_center=(-0.0511246 -0.0220069 -0.02378134)
        inertia=(0.001760622 0.001760622 0.001760622 0 0 0) meshes=rscapula.vtp
    Body humerus_1: mass=0 mass_center=(0 0 0) inertia=(0 0 0 0 0 0)
    Body humerus_2: mass=0 mass_center=(0 0 0) inertia=(0 0 0 0 0 0)
    Body humerus_r: mass=3.612621 mass_center=(0.007454454 -0.07304278 -0.004997679)
        inertia=(0.02324021 0.003500117 0.02324021 0 0 0) meshes=rhumerus.vtp
      WrapSphere deltoid: xyz_body_rotation=(-0.193033 -0.238063 -0.385718)
          translation=(0.002562469 -0.0008471456 -0.002498839) quadrant=all radius=0.03168143
      WrapSphere inf_sup_sub: xyz_body_rotation=(-0.193033 -0.238063 -0.385718)
          translation=(-0.001980089 0.001694291 -0.001804717) quadrant=all radius=0.02690592
      WrapCylinder infra_cyl: xyz_body_rotation=(1.56643 0.00610865 -0.953124)
          translation=(0.006289696 -0.02164928 -0.006108274) quadrant=-x radius=0.01793191 length=0.1129551
      WrapCylinder ter_min_cyl: xyz_body_rotation=(1.56643 0.00610865 -1.47672)
          translation=(0.006289696 -0.02164928 -0.006108274) quadrant=-x radius=0.01914999 length=0.09412928
      WrapCylinder ter_lat_pec: xyz_body_rotation=(1.56643 0.00610865 -0.953124)
          translation=(0.006639123 -0.06871292 -0.005830625) quadrant=all radius=0.01280851 length=0.09412928
    Body ulna_r: mass=0.962004 mass_center=(-0.0002907229 -0.06143944 -0.003779397)
        inertia=(0.005056972 0.0007494107 0.005056972 0 0 0) meshes=rulna.vtp
      WrapCylinder elbow: xyz_body_rotation=(-2.51153 1.54654 2.79253) translation=(0 0 0) quadrant=y radius=0.01841245
          length=0.04845381
      WrapCylinder elbow_circ: xyz_body_rotation=(0.630064 -1.54654 0) translation=(0 0 0) quadrant=all
          radius=0.01453614 length=0.04845381
      WrapCylinder pron_quad: xyz_body_rotation=(-1.28805 -0.232652 0) translation=(0.03537128 -0.2000173 -0.0559157)
          quadrant=y radius=0.006783534 length=0.09690763
    Body radius_r: mass=0.962004 mass_center=(0.01027221 -0.1142541 -0.01250108)
        inertia=(0.005056972 0.0007494107 0.005056972 0 0 0) meshes=rradius.vtp
      WrapCylinder radius: xyz_body_rotation=(-1.61286 -0.202284 -1.77709)
          translation=(0.003391767 -0.03120426 -0.0002907229) quadrant=-x radius=0.008915502 length=0.1938153
      WrapCylinder supinator: xyz_body_rotation=(-1.48877 0.00174533 0)
          translation=(0.003294859 -0.1159015 -0.006686626) quadrant=-y radius=0.008721686 length=0.1938153
      WrapCylinder ulna_radius: xyz_body_rotation=(1.54095 0.256214 2.67035)
          translation=(0.01414851 -0.0863447 0.0002907229) quadrant=-x radius=0.006880442 length=0.09690763
    Body hand_r: mass=0.9243267 mass_center=(0.0006 -0.0905 -0.0365)
        inertia=(0.001124509 0.0003352225 0.001124509 0 0 0) meshes=r_hand.vtp
  JointSet:
    WeldJoint base: socket_parent_frame=ground_offset socket_child_frame=thorax_offset
      PhysicalOffsetFrame ground_offset: socket_parent=/ground translation=(0 0 0)
      PhysicalOffsetFrame thorax_offset: socket_parent=/bodyset/thorax translation=(0 0 0)
    WeldJoint rc: socket_parent_frame=radius_r_offset socket_child_frame=hand_r_offset
      PhysicalOffsetFrame radius_r_offset: socket_parent=/bodyset/radius_r
          translation=(0.01637739 -0.2181391 -0.06899823)
      PhysicalOffsetFrame hand_r_offset: socket_parent=/bodyset/hand_r translation=(0 0 0)
    CustomJoint sc1: socket_parent_frame=thorax_offset socket_child_frame=clavicle_1_offset
      Coordinate SC_y: default_value=-0.5844408 range=(-1.1345 -0.3316) clamped=false
      PhysicalOffsetFrame thorax_offset: socket_parent=/bodyset/thorax
          translation=(0.001380991 -0.01234674 0.004514864)
      PhysicalOffsetFrame clavicle_1_offset: socket_parent=/bodyset/clavicle_1 translation=(0 0 0)
      SpatialTransform: axes_held_at_zero=(rotation2 rotation3 translation1 translation2 translation3)
        TransformAxis rotation1: coordinates=SC_y axis=(0 1 0) LinearFunction(coefficients=1 0)
    CustomJoint sc2: socket_parent_frame=clavicle_1_offset socket_child_frame=clavicle_2_offset
      Coordinate SC_z: default_value=0.0873 range=(0.0873 0.5236) clamped=false
      PhysicalOffsetFrame clavicle_1_offset: socket_parent=/bodyset/clavicle_1 translation=(0 0 0)
      PhysicalOffsetFrame clavicle_2_offset: socket_parent=/bodyset/clavicle_2 translation=(0 0 0)
      SpatialTransform: axes_held_at_zero=(rotation1 rotation3 translation1 translation2 translation3)
        TransformAxis rotation2: coordinates=SC_z axis=(0 0 1) LinearFunction(coefficients=1 0)
    CustomJoint sc3: socket_parent_frame=clavicle_2_offset socket_child_frame=clavicle_r_offset
      Coordinate SC_x: default_value=0.5744638 range=(0 1.4486) clamped=false
      PhysicalOffsetFrame clavicle_2_offset: socket_parent=/bodyset/clavicle_2 translation=(0 0 0)
      PhysicalOffsetFrame clavicle_r_offset: socket_parent=/bodyset/clavicle_r translation=(0 0 0)
      SpatialTransform: axes_held_at_zero=(rotation1 rotation2 translation1 translation2 translation3)
        TransformAxis rotation3: coordinates=SC_x axis=(1 0 0) LinearFunction(coefficients=1 0)
    CustomJoint ac1: socket_parent_frame=clavicle_r_offset socket_child_frame=scapula_1_offset
      Coordinate AC_y: default_value=0.7953626 range=(0.576 1.2043) clamped=false
      PhysicalOffsetFrame clavicle_r_offset: socket_parent=/bodyset/clavicle_r
          translation=(0.2297142 -0.000110599 0.03118893)
      PhysicalOffsetFrame scapula_1_offset: socket_parent=/bodyset/scapula_1 translation=(0 0 0)
      SpatialTransform: axes_held_at_zero=(rotation2 rotation3 translation1 translation2 translation3)
        TransformAxis rotation1: coordinates=AC_y axis=(0 1 0) LinearFunction(coefficients=1 0)
    CustomJoint ac2: socket_parent_frame=scapula_1_offset socket_child_frame=scapula_2_offset
      Coordinate AC_z: default_value=0.00799797 range=(-0.3819 0.3491) clamped=false
      PhysicalOffsetFrame scapula_1_offset: socket_parent=/bodyset/scapula_1 translation=(0 0 0)
      PhysicalOffsetFrame scapula_2_offset: socket_parent=/bodyset/scapula_2 translation=(0 0 0)
      SpatialTransform: axes_held_at_zero=(rotation1 rotation3 translation1 translation2 translation3)
        TransformAxis rotation2: coordinates=AC_z axis=(0 0 1) LinearFunction(coefficients=1 0)
    CustomJoint ac3: socket_parent_frame=scapula_2_offset socket_child_frame=scapula_r_offset
      Coordinate AC_x: default_value=-0.2105165 range=(-0.2967 0.3142) clamped=false
      PhysicalOffsetFrame scapula_2_offset: socket_parent=/bodyset/scapula_2 translation=(0 0 0)
      PhysicalOffsetFrame scapula_r_offset: socket_parent=/bodyset/scapula_r translation=(0 0 0)
      SpatialTransform: axes_held_at_zero=(rotation1 rotation2 translation1 translation2 translation3)
        TransformAxis rotation3: coordinates=AC_x axis=(1 0 0) LinearFunction(coefficients=1 0)
    CustomJoint gh1: socket_parent_frame=scapula_r_offset socket_child_frame=humerus_1_offset
      Coordinate GH_y: default_value=0.7655775 range=(-2.9671 3.0543) clamped=false
      PhysicalOffsetFrame scapula_r_offset: socket_parent=/bodyset/scapula_r
          translation=(0.00192923 -0.022103 -0.04226725)
      PhysicalOffsetFrame humerus_1_offset: socket_parent=/bodyset/humerus_1 translation=(0 0 0)
      SpatialTransform: axes_held_at_zero=(rotation1 rotation3 translation1 translation2 translation3)
        TransformAxis rotation2: coordinates=GH_y axis=(0 1 0) LinearFunction(coefficients=1 0)
    CustomJoint gh2: socket_parent_frame=humerus_1_offset socket_child_frame=humerus_2_offset
      Coordinate GH_z: default_value=-0.00379958 range=(-0.5236 1.4661) clamped=false
      PhysicalOffsetFrame humerus_1_offset: socket_parent=/bodyset/humerus_1 translation=(0 0 0)
      PhysicalOffsetFrame humerus_2_offset: socket_parent=/bodyset/humerus_2 translation=(0 0 0)
      SpatialTransform: axes_held_at_zero=(rotation1 rotation2 translation1 translation2 translation3)
        TransformAxis rotation3: coordinates=GH_z axis=(0 0 1) LinearFunction(coefficients=1 0)
    CustomJoint gh3: socket_parent_frame=humerus_2_offset socket_child_frame=humerus_r_offset
      Coordinate GH_yy: default_value=-0.6049077 range=(-3.0892 3.1241) clamped=false
      PhysicalOffsetFrame humerus_2_offset: socket_parent=/bodyset/humerus_2 translation=(0 0 0)
      PhysicalOffsetFrame humerus_r_offset: socket_parent=/bodyset/humerus_r translation=(0 0 0)
      SpatialTransform: axes_held_at_zero=(rotation1 rotation3 translation1 translation2 translation3)
        TransformAxis rotation2: coordinates=GH_yy axis=(0 1 0) LinearFunction(coefficients=1 0)
    CustomJoint hu: socket_parent_frame=humerus_r_offset socket_child_frame=ulna_r_offset
      Coordinate EL_x: default_value=0.08726646 range=(0.08726646 2.443461) clamped=false
      PhysicalOffsetFrame humerus_r_offset: socket_parent=/bodyset/humerus_r
          translation=(0.006755599 -0.273628 0.006802396)
      PhysicalOffsetFrame ulna_r_offset: socket_parent=/bodyset/ulna_r translation=(0 0 0)
      SpatialTransform: axes_held_at_zero=(rotation2 rotation3 translation1 translation2 translation3)
        TransformAxis rotation1: coordinates=EL_x axis=(0.9997661 0.008446 -0.019909) LinearFunction(coefficients=1 0)
    CustomJoint ur: socket_parent_frame=ulna_r_offset socket_child_frame=radius_r_offset
      Coordinate PS_y: default_value=0.08726646 range=(0.08726646 2.792527) clamped=false
      PhysicalOffsetFrame ulna_r_offset: socket_parent=/bodyset/ulna_r translation=(0.0165712 -0.01288871 -0.01579594)
      PhysicalOffsetFrame radius_r_offset: socket_parent=/bodyset/radius_r translation=(0 0 0)
      SpatialTransform: axes_held_at_zero=(rotation2 rotation3 translation1 translation2 translation3)
        TransformAxis rotation1: coordinates=PS_y axis=(-0.113295 0.9740588 0.195892) LinearFunction(coefficients=1 0)
  ForceSet:
    Schutte1993Muscle_Deprecated [values shared by the 138 below unless stated]:
      passive_force_length_curve: SimmSpline: x=(-5 0.998 0.999 1 1.1 1.2 1.3 1.4 1.5 1.6 1.601 1.602 5)
          y=(0 0 0 0 0.035 0.12 0.26 0.55 1.17 2 2 2 2)
    Schutte1993Muscle_Deprecated trap_scap_1: max_isometric_force=24.57848 optimal_fiber_length=0.1599605
        tendon_slack_length=0.003318683 pennation_angle_at_optimal=0 activation1=50.75286 activation2=18.69159
        max_isometric_force_original=118 min_control=0 max_control=0.1487801 weakness=0.1487801
        max_isometric_force_original_scaled=165.2 muscle_has_fes_testing=false
      PathPoint P1: thorax (-0.007990022 0.04337603 0.1839807)
      PathPoint P2: scapula_r (-0.0142956 0.01665413 -0.01397996)
    Schutte1993Muscle_Deprecated trap_scap_2: max_isometric_force=34.99308 optimal_fiber_length=0.1217591
        tendon_slack_length=0.02917032 pennation_angle_at_optimal=0 activation1=50.75286 activation2=18.69159
        max_isometric_force_original=168 min_control=0 max_control=0.1487801 weakness=0.1487801
        max_isometric_force_original_scaled=235.2 muscle_has_fes_testing=false
      PathPoint P1: thorax (-0.00789138 0.0410204 0.1859157)
      PathPoint P2: scapula_r (-0.03193841 0.01513575 -0.002734373)
    Schutte1993Muscle_Deprecated trap_scap_3: max_isometric_force=41.45014 optimal_fiber_length=0.1157834
        tendon_slack_length=0.05843273 pennation_angle_at_optimal=0 activation1=50.75286 activation2=18.69159
        max_isometric_force_original=199 min_control=0 max_control=0.1487801 weakness=0.1487801
        max_isometric_force_original_scaled=278.6 muscle_has_fes_testing=false
      PathPoint P1: thorax (-0.004241617 0.03452212 0.1899468)
      PathPoint P2: scapula_r (-0.05398951 0.01236807 -0.001087972)
    Schutte1993Muscle_Deprecated trap_scap_4: max_isometric_force=28.74432 optimal_fiber_length=0.1043347
        tendon_slack_length=0.05808552 pennation_angle_at_optimal=0 activation1=50.75286 activation2=18.69159
        max_isometric_force_original=138 min_control=0 max_control=0.1487801 weakness=0.1487801
        max_isometric_force_original_scaled=193.2 muscle_has_fes_testing=false
      PathPoint P1: thorax (-0.003649763 0.03021701 0.1957516)
      PathPoint P2: scapula_r (-0.06646198 0.0114359 -0.000905039)
    Schutte1993Muscle_Deprecated trap_scap_5: max_isometric_force=25.41164 optimal_fiber_length=0.1077004
        tendon_slack_length=0.04079562 pennation_angle_at_optimal=0 activation1=50.75286 activation2=18.69159
        max_isometric_force_original=122 min_control=0 max_control=0.1487801 weakness=0.1487801
        max_isometric_force_original_scaled=170.8 muscle_has_fes_testing=false
      PathPoint P1: thorax (-0.00305791 0.02120064 0.2015564)
      PathPoint P2: scapula_r (-0.07337827 0.01311765 -0.006489322)
    Schutte1993Muscle_Deprecated trap_scap_6: max_isometric_force=21.03751 optimal_fiber_length=0.111038
        tendon_slack_length=0.04103309 pennation_angle_at_optimal=0 activation1=50.75286 activation2=18.69159
        max_isometric_force_original=101 min_control=0 max_control=0.1487801 weakness=0.1487801
        max_isometric_force_original_scaled=141.4 muscle_has_fes_testing=false
      PathPoint P1: thorax (-0.004241617 -0.000162457 0.2197771)
      PathPoint P2: scapula_r (-0.0657964 0.006948029 0.002666977)
    Schutte1993Muscle_Deprecated trap_scap_7: max_isometric_force=20.20434 optimal_fiber_length=0.1297264
        tendon_slack_length=0.05380356 pennation_angle_at_optimal=0 activation1=50.75286 activation2=18.69159
        max_isometric_force_original=97 min_control=0 max_control=0.1487801 weakness=0.1487801
        max_isometric_force_original_scaled=135.8 muscle_has_fes_testing=false
      PathPoint P1: thorax (-0.001578276 -0.02753647 0.2368691)
      PathPoint P2: scapula_r (-0.07337827 0.01311765 -0.006489322)
    Schutte1993Muscle_Deprecated trap_scap_8: max_isometric_force=28.74432 optimal_fiber_length=0.1127625
        tendon_slack_length=0.0702935 pennation_angle_at_optimal=0 activation1=50.75286 activation2=18.69159
        max_isometric_force_original=138 min_control=0 max_control=0.1487801 weakness=0.1487801
        max_isometric_force_original_scaled=193.2 muscle_has_fes_testing=false
      PathPoint P1: thorax (0.003649763 -0.05109274 0.2436414)
      PathPoint P2: scapula_r (-0.0725487 0.008418359 0.0008761548)
    Schutte1993Muscle_Deprecated trap_scap_9: max_isometric_force=25.61994 optimal_fiber_length=0.1403046
        tendon_slack_length=0.04718455 pennation_angle_at_optimal=0 activation1=50.75286 activation2=18.69159
        max_isometric_force_original=123 min_control=0 max_control=0.1487801 weakness=0.1487801
        max_isometric_force_original_scaled=172.2 muscle_has_fes_testing=false
      PathPoint P1: thorax (0.006510388 -0.09008243 0.2454151)
      PathPoint P2: scapula_r (-0.09051948 0.009869468 -0.005882754)
    Schutte1993Muscle_Deprecated trap_scap10: max_isometric_force=16.87167 optimal_fiber_length=0.1504699
        tendon_slack_length=0.04166494 pennation_angle_at_optimal=0 activation1=50.75286 activation2=18.69159
        max_isometric_force_original=81 min_control=0 max_control=0.1487801 weakness=0.1487801
        max_isometric_force_original_scaled=113.4 muscle_has_fes_testing=false
      PathPoint P1: thorax (0.01006151 -0.120137 0.2483175)
      PathPoint P2: scapula_r (-0.08590862 0.004487869 -0.001675285)
    Schutte1993Muscle_Deprecated trap_scap11: max_isometric_force=19.16288 optimal_fiber_length=0.1406377
        tendon_slack_length=0.03217542 pennation_angle_at_optimal=0 activation1=50.75286 activation2=18.69159
        max_isometric_force_original=92 min_control=0 max_control=0.1487801 weakness=0.1487801
        max_isometric_force_original_scaled=128.8 muscle_has_fes_testing=false
      PathPoint P1: thorax (0.0133167 -0.145724 0.2381591)
      PathPoint P2: scapula_r (-0.07970615 0.003353889 0.000519916)
    Schutte1993Muscle_Deprecated trap_clav_1: max_isometric_force=20.20434 optimal_fiber_length=0.1584945
        tendon_slack_length=0.04815282 pennation_angle_at_optimal=0 activation1=50.75286 activation2=18.69159
        max_isometric_force_original=97 min_control=0 max_control=0.1487801 weakness=0.1487801
        max_isometric_force_original_scaled=135.8 muscle_has_fes_testing=false
      PathPoint P1: thorax (-0.009568298 0.1051097 0.1812396)
      PathPoint P2: clavicle_r (0.1477714 0.02974008 0.01336036)
    Schutte1993Muscle_Deprecated trap_clav_2: max_isometric_force=9.789732 optimal_fiber_length=0.1832333
        tendon_slack_length=0.04580832 pennation_angle_at_optimal=0 activation1=116.1091 activation2=28.81844
        max_isometric_force_original=47 min_control=0 max_control=0.1487801 weakness=0.1487801
        max_isometric_force_original_scaled=65.8 muscle_has_fes_testing=false
      PathPoint P1: thorax (-0.01045608 0.05824085 0.1718873)
      PathPoint P2: clavicle_r (0.1770359 0.02750598 0.01342672)
    Schutte1993Muscle_Deprecated lev_scap_1: max_isometric_force=19.99605 optimal_fiber_length=0.1329943
        tendon_slack_length=0.01601325 pennation_angle_at_optimal=0 activation1=116.1091 activation2=28.81844
        max_isometric_force_original=96 min_control=0 max_control=0.1487801 weakness=0.1487801
        max_isometric_force_original_scaled=134.4 muscle_has_fes_testing=false
      PathPoint P1: thorax (0.03827319 0.120137 0.09223223)
      PathPoint P2: scapula_r (-0.1115674 0.01193562 -0.01296902)
    Schutte1993Muscle_Deprecated lev_scap_2: max_isometric_force=21.66239 optimal_fiber_length=0.1095767
        tendon_slack_length=0.01514885 pennation_angle_at_optimal=0 activation1=116.1091 activation2=28.81844
        max_isometric_force_original=104 min_control=0 max_control=0.1487801 weakness=0.1487801
        max_isometric_force_original_scaled=145.6 muscle_has_fes_testing=false
      PathPoint P1: thorax (0.02870489 0.1018606 0.09787581)
      PathPoint P2: scapula_r (-0.1050852 0.02372709 -0.01984346)
    Schutte1993Muscle_Deprecated pect_min_1: max_isometric_force=9.789732 optimal_fiber_length=0.09638784
        tendon_slack_length=0.06425856 pennation_angle_at_optimal=0 activation1=48.48485 activation2=18.18182
        max_isometric_force_original=47 min_control=0 max_control=0.1487801 weakness=0.1487801
        max_isometric_force_original_scaled=65.8 muscle_has_fes_testing=false
      PathPoint P1: thorax (0.05060347 -0.04922448 -0.02902413)
      PathPoint P2: scapula_r (-0.02763622 0.00252743 -0.07703423)
    Schutte1993Muscle_Deprecated pect_min_2: max_isometric_force=22.28726 optimal_fiber_length=0.1304824
        tendon_slack_length=0.04926132 pennation_angle_at_optimal=0 activation1=48.48485 activation2=18.18182
        max_isometric_force_original=107 min_control=0 max_control=0.1487801 weakness=0.1487801
        max_isometric_force_original_scaled=149.8 muscle_has_fes_testing=false
      PathPoint P1: thorax (0.05770572 -0.07578621 -0.04305246)
      PathPoint P2: scapula_r (-0.02763622 0.00252743 -0.07703423)
    Schutte1993Muscle_Deprecated pect_min_3: max_isometric_force=22.28726 optimal_fiber_length=0.1271607
        tendon_slack_length=0.03430381 pennation_angle_at_optimal=0 activation1=48.48485 activation2=18.18182
        max_isometric_force_original=107 min_control=0 max_control=0.1487801 weakness=0.1487801
        max_isometric_force_original_scaled=149.8 muscle_has_fes_testing=false
      PathPoint P1: thorax (0.09518977 -0.07692341 -0.03273277)
      PathPoint P2: scapula_r (-0.02356555 -0.003334669 -0.07967232)
    Schutte1993Muscle_Deprecated pect_min_4: max_isometric_force=9.58144 optimal_fiber_length=0.1591824
        tendon_slack_length=0.02996917 pennation_angle_at_optimal=0 activation1=48.48485 activation2=18.18182
        max_isometric_force_original=46 min_control=0 max_control=0.1487801 weakness=0.1487801
        max_isometric_force_original_scaled=64.4 muscle_has_fes_testing=false
      PathPoint P1: thorax (0.08739703 -0.09243806 -0.03918257)
      PathPoint P2: scapula_r (-0.01917655 -0.01117643 -0.08082769)
    Schutte1993Muscle_Deprecated rhomboid_1: max_isometric_force=10.6229 optimal_fiber_length=0.09491339
        tendon_slack_length=0.01443916 pennation_angle_at_optimal=0 activation1=93.07359 activation2=25.97403
        max_isometric_force_original=51 min_control=0 max_control=0.1487801 weakness=0.1487801
        max_isometric_force_original_scaled=71.4 muscle_has_fes_testing=false
      PathPoint P1: thorax (-0.008976445 0.05093028 0.1741448)
      PathPoint P2: scapula_r (-0.1129371 -0.004045809 -0.01138038)
    Schutte1993Muscle_Deprecated rhomboid_2: max_isometric_force=19.16288 optimal_fiber_length=0.1062927
        tendon_slack_length=0.06513761 pennation_angle_at_optimal=0 activation1=93.07359 activation2=25.97403
        max_isometric_force_original=92 min_control=0 max_control=0.1487801 weakness=0.1487801
        max_isometric_force_original_scaled=128.8 muscle_has_fes_testing=false
      PathPoint P1: thorax (-0.007496811 0.04110163 0.1855932)
      PathPoint P2: scapula_r (-0.1216958 -0.07230563 -0.005593911)
    Schutte1993Muscle_Deprecated rhomboid_3: max_isometric_force=29.57749 optimal_fiber_length=0.1289284
        tendon_slack_length=0.03276973 pennation_angle_at_optimal=0 activation1=93.07359 activation2=25.97403
        max_isometric_force_original=142 min_control=0 max_control=0.1487801 weakness=0.1487801
        max_isometric_force_original_scaled=198.8 muscle_has_fes_testing=false
      PathPoint P1: thorax (0.005326681 0.02574944 0.2018789)
      PathPoint P2: scapula_r (-0.1229209 -0.07744698 -0.005025855)
    Schutte1993Muscle_Deprecated rhomboid_4: max_isometric_force=17.07996 optimal_fiber_length=0.1378627
        tendon_slack_length=0.03373121 pennation_angle_at_optimal=0 activation1=116.1091 activation2=28.81844
        max_isometric_force_original=82 min_control=0 max_control=0.1487801 weakness=0.1487801
        max_isometric_force_original_scaled=114.8 muscle_has_fes_testing=false
      PathPoint P1: thorax (-0.002761983 0.005523539 0.2173585)
      PathPoint P2: scapula_r (-0.1225351 -0.08907507 -0.004842922)
    Schutte1993Muscle_Deprecated rhomboid_5: max_isometric_force=13.95558 optimal_fiber_length=0.1371088
        tendon_slack_length=0.04687479 pennation_angle_at_optimal=0 activation1=116.1091 activation2=28.81844
        max_isometric_force_original=67 min_control=0 max_control=0.1487801 weakness=0.1487801
        max_isometric_force_original_scaled=93.8 muscle_has_fes_testing=false
      PathPoint P1: thorax (0.0004932112 -0.0162457 0.2336442)
      PathPoint P2: scapula_r (-0.1214836 -0.100386 -0.00690333)
    Schutte1993Muscle_Deprecated serr_ant_1: max_isometric_force=12.70582 optimal_fiber_length=0.1301697
        tendon_slack_length=0.01990362 pennation_angle_at_optimal=0 activation1=116.1091 activation2=28.81844
        max_isometric_force_original=61 min_control=0 max_control=0.1487801 weakness=0.1487801
        max_isometric_force_original_scaled=85.4 muscle_has_fes_testing=false
      PathPoint P1: scapula_r (-0.1208084 -0.1059887 0.005834613)
      PathPoint P2: thorax (0.1361263 -0.1704174 0.05691954)
      PathWrap: wrap_object=serr_ant method=hybrid
    Schutte1993Muscle_Deprecated serr_ant_2: max_isometric_force=22.91214 optimal_fiber_length=0.1538498
        tendon_slack_length=0.008306229 pennation_angle_at_optimal=0 activation1=116.1091 activation2=28.81844
        max_isometric_force_original=110 min_control=0 max_control=0.1487801 weakness=0.1487801
        max_isometric_force_original_scaled=154 muscle_has_fes_testing=false
      PathPoint P1: scapula_r (-0.1188406 -0.1056619 0.004987343)
      PathPoint P2: thorax (0.1308983 -0.1530345 0.02402553)
      PathWrap: wrap_object=serr_ant method=hybrid
    Schutte1993Muscle_Deprecated serr_ant_3: max_isometric_force=21.87068 optimal_fiber_length=0.1595741
        tendon_slack_length=0.006886676 pennation_angle_at_optimal=0 activation1=116.1091 activation2=28.81844
        max_isometric_force_original=105 min_control=0 max_control=0.1487801 weakness=0.1487801
        max_isometric_force_original_scaled=147 muscle_has_fes_testing=false
      PathPoint P1: scapula_r (-0.1143262 -0.1031153 0.003581644)
      PathPoint P2: thorax (0.1225137 -0.1291534 0.003869884)
      PathWrap: wrap_object=serr_ant method=hybrid
    Schutte1993Muscle_Deprecated serr_ant_4: max_isometric_force=22.91214 optimal_fiber_length=0.1313749
        tendon_slack_length=0.01121121 pennation_angle_at_optimal=0 activation1=116.1091 activation2=28.81844
        max_isometric_force_original=110 min_control=0 max_control=0.1487801 weakness=0.1487801
        max_isometric_force_original_scaled=154 muscle_has_fes_testing=false
      PathPoint P1: scapula_r (-0.1121558 -0.09944426 0.002917307)
      PathPoint P2: thorax (0.1214286 -0.09918003 -0.0049986)
      PathWrap: wrap_object=serr_ant method=hybrid
    Schutte1993Muscle_Deprecated serr_ant_5: max_isometric_force=13.3307 optimal_fiber_length=0.1236324
        tendon_slack_length=0.01080188 pennation_angle_at_optimal=0 activation1=25.90274 activation2=11.97605
        max_isometric_force_original=64 min_control=0 max_control=0.1487801 weakness=0.1487801
        max_isometric_force_original_scaled=89.6 muscle_has_fes_testing=false
      PathPoint P1: scapula_r (-0.1131204 -0.09579246 0.003061728)
      PathPoint P2: thorax (0.1177788 -0.0697753 0.006611051)
      PathWrap: wrap_object=serr_ant method=hybrid
    Schutte1993Muscle_Deprecated serr_ant_6: max_isometric_force=20.20434 optimal_fiber_length=0.1133671
        tendon_slack_length=0.01022162 pennation_angle_at_optimal=0 activation1=25.90274 activation2=11.97605
        max_isometric_force_original=97 min_control=0 max_control=0.1487801 weakness=0.1487801
        max_isometric_force_original_scaled=135.8 muscle_has_fes_testing=false
      PathPoint P1: scapula_r (-0.1104484 -0.09067033 0.002118176)
      PathPoint P2: thorax (0.1108739 -0.03476581 0.03208779)
      PathWrap: wrap_object=serr_ant method=hybrid
    Schutte1993Muscle_Deprecated serr_ant_7: max_isometric_force=9.789732 optimal_fiber_length=0.0999139
        tendon_slack_length=0.007936674 pennation_angle_at_optimal=0 activation1=25.90274 activation2=11.97605
        max_isometric_force_original=47 min_control=0 max_control=0.1487801 weakness=0.1487801
        max_isometric_force_original_scaled=65.8 muscle_has_fes_testing=false
      PathPoint P1: scapula_r (-0.09984731 -0.04812687 -0.004428914)
      PathPoint P2: thorax (0.09874089 -0.006254596 0.05304966)
      PathWrap: wrap_object=serr_ant method=hybrid
    Schutte1993Muscle_Deprecated serr_ant_8: max_isometric_force=15.8302 optimal_fiber_length=0.06697086
        tendon_slack_length=0.0087181 pennation_angle_at_optimal=0 activation1=25.90274 activation2=11.97605
        max_isometric_force_original=76 min_control=0 max_control=0.1487801 weakness=0.1487801
        max_isometric_force_original_scaled=106.4 muscle_has_fes_testing=false
      PathPoint P1: scapula_r (-0.1137667 -0.01852808 -0.006084943)
      PathPoint P2: thorax (0.09962867 0.001868256 0.08900733)
      PathWrap: wrap_object=serr_ant method=hybrid
    Schutte1993Muscle_Deprecated serr_ant_9: max_isometric_force=16.45508 optimal_fiber_length=0.05928762
        tendon_slack_length=0.005187667 pennation_angle_at_optimal=0 activation1=25.90274 activation2=11.97605
        max_isometric_force_original=79 min_control=0 max_control=0.1487801 weakness=0.1487801
        max_isometric_force_original_scaled=110.6 muscle_has_fes_testing=false
      PathPoint P1: scapula_r (-0.1108439 0.009754148 -0.01672397)
      PathPoint P2: thorax (0.0966694 0.005036168 0.08803985)
      PathWrap: wrap_object=serr_ant method=hybrid
    Schutte1993Muscle_Deprecated serr_ant10: max_isometric_force=13.12241 optimal_fiber_length=0.04767336
        tendon_slack_length=0.003611618 pennation_angle_at_optimal=0 activation1=25.90274 activation2=11.97605
        max_isometric_force_original=63 min_control=0 max_control=0.1487801 weakness=0.1487801
        max_isometric_force_original_scaled=88.2 muscle_has_fes_testing=false
      PathPoint P1: scapula_r (-0.1028666 0.02224715 -0.02505225)
      PathPoint P2: thorax (0.09311828 0.008853909 0.09594087)
      PathWrap: wrap_object=serr_ant method=hybrid
    Schutte1993Muscle_Deprecated serr_ant11: max_isometric_force=4.79072 optimal_fiber_length=0.06395
        tendon_slack_length=0.002167797 pennation_angle_at_optimal=0 activation1=25.90274 activation2=11.97605
        max_isometric_force_original=23 min_control=0 max_control=0.1487801 weakness=0.1487801
        max_isometric_force_original_scaled=32.2 muscle_has_fes_testing=false
      PathPoint P1: scapula_r (-0.09766728 0.02897415 -0.03105054)
      PathPoint P2: thorax (0.0966694 0.005036168 0.08803985)
      PathWrap: wrap_object=serr_ant method=hybrid
    Schutte1993Muscle_Deprecated serr_ant12: max_isometric_force=23.32872 optimal_fiber_length=0.07020092
        tendon_slack_length=0.0007428668 pennation_angle_at_optimal=0 activation1=25.90274 activation2=11.97605
        max_isometric_force_original=112 min_control=0 max_control=0.1487801 weakness=0.1487801
        max_isometric_force_original_scaled=156.8 muscle_has_fes_testing=false
      PathPoint P1: scapula_r (-0.08565782 0.03382719 -0.04275828)
      PathPoint P2: thorax (0.09913546 0.0007310567 0.07578522)
      PathWrap: wrap_object=serr_ant method=hybrid
    Schutte1993Muscle_Deprecated delt_scap_1: max_isometric_force=60.19644 optimal_fiber_length=0.1082618
        tendon_slack_length=0.07678145 pennation_angle_at_optimal=0.08726646 activation1=25.90274 activation2=11.97605
        max_isometric_force_original=289 min_control=0 max_control=0.1487801 weakness=0.1487801
        max_isometric_force_original_scaled=404.6 muscle_has_fes_testing=false
      PathPoint P1: scapula_r (-0.07985084 -0.0007880199 -0.0008280144)
      PathPoint P2: humerus_r (0.0156893 -0.1047448 0.01275796)
      PathWrap: wrap_object=deltoid
    Schutte1993Muscle_Deprecated delt_scap_2: max_isometric_force=43.94965 optimal_fiber_length=0.09099791
        tendon_slack_length=0.07287504 pennation_angle_at_optimal=0.08726646 activation1=25.90274 activation2=11.97605
        max_isometric_force_original=211 min_control=0 max_control=0.1487801 weakness=0.1487801
        max_isometric_force_original_scaled=295.4 muscle_has_fes_testing=false
      PathPoint P1: scapula_r (-0.04822111 0.006025469 0.001087972)
      PathPoint P2: humerus_r (0.01811199 -0.09078577 0.007329929)
      PathWrap: wrap_object=deltoid
    Schutte1993Muscle_Deprecated delt_scap_3: max_isometric_force=92.89831 optimal_fiber_length=0.07923759
        tendon_slack_length=0.05897636 pennation_angle_at_optimal=0.08726646 activation1=25.90274 activation2=11.97605
        max_isometric_force_original=446 min_control=0 max_control=0.1487801 weakness=0.1487801
        max_isometric_force_original_scaled=624.4 muscle_has_fes_testing=false
      PathPoint P1: scapula_r (-0.01387117 0.005516139 -0.001357559)
      PathPoint P2: humerus_r (0.01811199 -0.09078577 0.007329929)
      PathWrap: wrap_object=deltoid
    Schutte1993Muscle_Deprecated delt_scap_4: max_isometric_force=24.37018 optimal_fiber_length=0.06329022
        tendon_slack_length=0.04276366 pennation_angle_at_optimal=0.08726646 activation1=25.90274 activation2=11.97605
        max_isometric_force_original=117 min_control=0 max_control=0.1487801 weakness=0.1487801
        max_isometric_force_original_scaled=163.8 muscle_has_fes_testing=false
      PathPoint P1: scapula_r (-0.002893845 -0.004343719 -0.004631104)
      PathPoint P2: humerus_r (0.01829836 -0.07969758 0.005608506)
      PathWrap: wrap_object=deltoid
    Schutte1993Muscle_Deprecated delt_scap_5: max_isometric_force=24.99506 optimal_fiber_length=0.06319327
        tendon_slack_length=0.03371592 pennation_angle_at_optimal=0.08726646 activation1=120.0992 activation2=29.15452
        max_isometric_force_original=120 min_control=0 max_control=0.1487801 weakness=0.1487801
        max_isometric_force_original_scaled=168 muscle_has_fes_testing=false
      PathPoint P1: scapula_r (0.01253035 0.0007495799 -0.01669508)
      PathPoint P2: humerus_r (0.01954465 -0.07324986 0.0009162411)
      PathWrap: wrap_object=deltoid
    Schutte1993Muscle_Deprecated delt_scap_6: max_isometric_force=59.36327 optimal_fiber_length=0.07256652
        tendon_slack_length=0.06338927 pennation_angle_at_optimal=0.08726646 activation1=120.0992 activation2=29.15452
        max_isometric_force_original=285 min_control=0 max_control=0.1487801 weakness=0.1487801
        max_isometric_force_original_scaled=399 muscle_has_fes_testing=false
      PathPoint P1: scapula_r (0.003491907 0.005112519 -0.004833294)
      PathPoint P2: humerus_r (0.01917192 -0.1025423 0.009176293)
      PathWrap: wrap_object=deltoid
    Schutte1993Muscle_Deprecated delt_scap_7: max_isometric_force=31.03553 optimal_fiber_length=0.07122579
        tendon_slack_length=0.07746041 pennation_angle_at_optimal=0.08726646 activation1=120.0992 activation2=29.15452
        max_isometric_force_original=149 min_control=0 max_control=0.1487801 weakness=0.1487801
        max_isometric_force_original_scaled=208.6 muscle_has_fes_testing=false
      PathPoint P1: scapula_r (0.008189582 0.00025947 -0.008838573)
      PathPoint P2: humerus_r (0.01839154 -0.1238715 0.007163339)
      PathWrap: wrap_object=deltoid
    Schutte1993Muscle_Deprecated delt_scap_8: max_isometric_force=44.78282 optimal_fiber_length=0.06740286
        tendon_slack_length=0.06170685 pennation_angle_at_optimal=0.08726646 activation1=120.0992 activation2=29.15452
        max_isometric_force_original=215 min_control=0 max_control=0.1487801 weakness=0.1487801
        max_isometric_force_original_scaled=301 muscle_has_fes_testing=false
      PathPoint P1: scapula_r (0.01362037 0.005929369 -0.01742682)
      PathPoint P2: humerus_r (0.01917192 -0.1025423 0.009176293)
      PathWrap: wrap_object=deltoid
    Schutte1993Muscle_Deprecated delt_scap_9: max_isometric_force=59.57156 optimal_fiber_length=0.07060701
        tendon_slack_length=0.06848494 pennation_angle_at_optimal=0.08726646 activation1=120.0992 activation2=29.15452
        max_isometric_force_original=286 min_control=0 max_control=0.1487801 weakness=0.1487801
        max_isometric_force_original_scaled=400.4 muscle_has_fes_testing=false
      PathPoint P1: scapula_r (0.01513481 0.004612799 -0.02324217)
      PathPoint P2: humerus_r (0.02151309 -0.1104866 -0.006857926)
      PathWrap: wrap_object=deltoid
    Schutte1993Muscle_Deprecated delt_scap10: max_isometric_force=92.69001 optimal_fiber_length=0.0729806
        tendon_slack_length=0.0624433 pennation_angle_at_optimal=0.08726646 activation1=120.0992 activation2=29.15452
        max_isometric_force_original=445 min_control=0 max_control=0.1487801 weakness=0.1487801
        max_isometric_force_original_scaled=623 muscle_has_fes_testing=false
      PathPoint P1: scapula_r (0.01708333 0.004881879 -0.03187856)
      PathPoint P2: humerus_r (0.02131508 -0.09969962 -0.008398877)
      PathWrap: wrap_object=deltoid
    Schutte1993Muscle_Deprecated delt_scap11: max_isometric_force=49.78183 optimal_fiber_length=0.07278073
        tendon_slack_length=0.04740129 pennation_angle_at_optimal=0.08726646 activation1=79.16934 activation2=23.92344
        max_isometric_force_original=239 min_control=0 max_control=0.1487801 weakness=0.1487801
        max_isometric_force_original_scaled=334.6 muscle_has_fes_testing=false
      PathPoint P1: scapula_r (0.01468144 0.007918639 -0.04340336)
      PathPoint P2: humerus_r (0.02103554 -0.0868889 -0.01198055)
      PathWrap: wrap_object=deltoid
    Schutte1993Muscle_Deprecated delt_clav_1: max_isometric_force=26.6614 optimal_fiber_length=0.0829919
        tendon_slack_length=0.06154902 pennation_angle_at_optimal=0.08726646 activation1=79.16934 activation2=23.92344
        max_isometric_force_original=128 min_control=0 max_control=0.1487801 weakness=0.1487801
        max_isometric_force_original_scaled=179.2 muscle_has_fes_testing=false
      PathPoint P1: clavicle_r (0.1668939 0.0228387 0.001415668)
      PathPoint P2: humerus_r (0.02103554 -0.0868889 -0.01198055)
      PathWrap: wrap_object=deltoid
    Schutte1993Muscle_Deprecated delt_clav_2: max_isometric_force=33.32675 optimal_fiber_length=0.09326916
        tendon_slack_length=0.08731581 pennation_angle_at_optimal=0.08726646 activation1=79.16934 activation2=23.92344
        max_isometric_force_original=160 min_control=0 max_control=0.1487801 weakness=0.1487801
        max_isometric_force_original_scaled=224 muscle_has_fes_testing=false
      PathPoint P1: clavicle_r (0.1428055 0.02851243 0.005507831)
      PathPoint P2: humerus_r (0.01789069 -0.1118515 -0.01608975)
      PathWrap: wrap_object=deltoid
    Schutte1993Muscle_Deprecated delt_clav_3: max_isometric_force=21.87068 optimal_fiber_length=0.08208863
        tendon_slack_length=0.06674682 pennation_angle_at_optimal=0.08726646 activation1=79.16934 activation2=23.92344
        max_isometric_force_original=105 min_control=0 max_control=0.1487801 weakness=0.1487801
        max_isometric_force_original_scaled=147 muscle_has_fes_testing=false
      PathPoint P1: clavicle_r (0.1485234 0.02465252 0.0008073729)
      PathPoint P2: humerus_r (0.01948641 -0.09359076 -0.01346597)
      PathWrap: wrap_object=deltoid
    Schutte1993Muscle_Deprecated delt_clav_4: max_isometric_force=23.32872 optimal_fiber_length=0.09771567
        tendon_slack_length=0.07198026 pennation_angle_at_optimal=0.08726646 activation1=79.16934 activation2=23.92344
        max_isometric_force_original=112 min_control=0 max_control=0.1487801 weakness=0.1487801
        max_isometric_force_original_scaled=156.8 muscle_has_fes_testing=false
      PathPoint P1: clavicle_r (0.1459465 0.0181493 0.0009511516)
      PathPoint P2: humerus_r (0.01789069 -0.1118515 -0.01608975)
      PathWrap: wrap_object=deltoid
    Schutte1993Muscle_Deprecated coracobr_1: max_isometric_force=41.86673 optimal_fiber_length=0.06206946
        tendon_slack_length=0.08652107 pennation_angle_at_optimal=0 activation1=79.16934 activation2=23.92344
        max_isometric_force_original=201 min_control=0 max_control=0.1487801 weakness=0.1487801
        max_isometric_force_original_scaled=281.4 muscle_has_fes_testing=false
      PathPoint P1: scapula_r (-0.00779409 -0.008264599 -0.07370291)
      PathPoint P2: humerus_r (-0.003109905 -0.137727 -0.01070336)
    Schutte1993Muscle_Deprecated coracobr_2: max_isometric_force=30.82724 optimal_fiber_length=0.0643458
        tendon_slack_length=0.09797896 pennation_angle_at_optimal=0 activation1=133.3534 activation2=30.58104
        max_isometric_force_original=148 min_control=0 max_control=0.1487801 weakness=0.1487801
        max_isometric_force_original_scaled=207.2 muscle_has_fes_testing=false
      PathPoint P1: scapula_r (-0.0130416 -0.01435734 -0.07564778)
      PathPoint P2: humerus_r (-0.008898755 -0.1551688 -0.00244331)
    Schutte1993Muscle_Deprecated coracobr_3: max_isometric_force=23.74531 optimal_fiber_length=0.06843466
        tendon_slack_length=0.1063702 pennation_angle_at_optimal=0 activation1=133.3534 activation2=30.58104
        max_isometric_force_original=114 min_control=0 max_control=0.1487801 weakness=0.1487801
        max_isometric_force_original_scaled=159.6 muscle_has_fes_testing=false
      PathPoint P1: scapula_r (-0.008941982 -0.007870589 -0.0795279)
      PathPoint P2: humerus_r (-0.00621981 -0.163725 -0.007718637)
    Schutte1993Muscle_Deprecated infra_1: max_isometric_force=56.65547 optimal_fiber_length=0.06367247
        tendon_slack_length=0.0382236 pennation_angle_at_optimal=0 activation1=133.3534 activation2=30.58104
        max_isometric_force_original=272 min_control=0 max_control=0.1487801 weakness=0.1487801
        max_isometric_force_original_scaled=380.8 muscle_has_fes_testing=false
      PathPoint P1: scapula_r (-0.058774 -0.04019862 -0.01829334)
      PathPoint P2: humerus_r (0.02322528 0.0092433 0.01745023)
      PathWrap: wrap_object=infra_cyl
    Schutte1993Muscle_Deprecated infra_2: max_isometric_force=57.28035 optimal_fiber_length=0.0704196
        tendon_slack_length=0.1047969 pennation_angle_at_optimal=0 activation1=133.3534 activation2=30.58104
        max_isometric_force_original=275 min_control=0 max_control=0.1487801 weakness=0.1487801
        max_isometric_force_original_scaled=385 muscle_has_fes_testing=false
      PathPoint P1: scapula_r (-0.1215994 -0.08866184 0.001107229)
      PathPoint P2: humerus_r (0.02137332 0.01506037 0.009592767)
      PathWrap: wrap_object=infra_cyl
    Schutte1993Muscle_Deprecated infra_3: max_isometric_force=40.40868 optimal_fiber_length=0.06650215
        tendon_slack_length=0.08251375 pennation_angle_at_optimal=0 activation1=133.3534 activation2=30.58104
        max_isometric_force_original=194 min_control=0 max_control=0.1487801 weakness=0.1487801
        max_isometric_force_original_scaled=271.6 muscle_has_fes_testing=false
      PathPoint P1: scapula_r (-0.103889 -0.06974937 0.0005488003)
      PathPoint P2: humerus_r (0.02137332 0.01506037 0.009592767)
      PathWrap: wrap_object=infra_cyl
    Schutte1993Muscle_Deprecated infra_4: max_isometric_force=43.11648 optimal_fiber_length=0.06805219
        tendon_slack_length=0.06972158 pennation_angle_at_optimal=0 activation1=133.3534 activation2=30.58104
        max_isometric_force_original=207 min_control=0 max_control=0.1487801 weakness=0.1487801
        max_isometric_force_original_scaled=289.8 muscle_has_fes_testing=false
      PathPoint P1: scapula_r (-0.1052492 -0.04753105 -0.001174625)
      PathPoint P2: humerus_r (0.01869437 0.01799714 0.009773238)
      PathWrap: wrap_object=infra_cyl
      passive_force_length_curve: SimmSpline: x=(-5 1.098 1.099 1.1 1.21 1.32 1.43 1.54 1.65 1.76 1.761 1.762 5)
          y=(0 0 0 0 0.035 0.12 0.26 0.55 1.17 2 2 2 2)
    Schutte1993Muscle_Deprecated infra_5: max_isometric_force=62.90423 optimal_fiber_length=0.06891898
        tendon_slack_length=0.0493689 pennation_angle_at_optimal=0 activation1=82.95686 activation2=24.57002
        max_isometric_force_original=302 min_control=0 max_control=0.1487801 weakness=0.1487801
        max_isometric_force_original_scaled=422.8 muscle_has_fes_testing=false
      PathPoint P1: scapula_r (-0.1006962 -0.01641388 -0.0103213)
      PathPoint P2: humerus_r (0.01869437 0.01799714 0.009773238)
      PathWrap: wrap_object=infra_cyl
      passive_force_length_curve: SimmSpline: x=(-5 1.198 1.199 1.2 1.32 1.44 1.56 1.68 1.8 1.92 1.921 1.922 5)
          y=(0 0 0 0 0.035 0.12 0.26 0.55 1.17 2 2 2 2)
    Schutte1993Muscle_Deprecated infra_6: max_isometric_force=37.90917 optimal_fiber_length=0.07475023
        tendon_slack_length=0.03474446 pennation_angle_at_optimal=0 activation1=82.95686 activation2=24.57002
        max_isometric_force_original=182 min_control=0 max_control=0.1487801 weakness=0.1487801
        max_isometric_force_original_scaled=254.8 muscle_has_fes_testing=false
      PathPoint P1: scapula_r (-0.07784444 -0.0003651799 0.0004236353)
      PathPoint P2: humerus_r (0.02232842 0.01199182 0.01160572)
      PathWrap: wrap_object=infra_cyl
      passive_force_length_curve: SimmSpline: x=(-5 1.098 1.099 1.1 1.21 1.32 1.43 1.54 1.65 1.76 1.761 1.762 5)
          y=(0 0 0 0 0.035 0.12 0.26 0.55 1.17 2 2 2 2)
    Schutte1993Muscle_Deprecated ter_min_1: max_isometric_force=170.8 optimal_fiber_length=0.05062961
        tendon_slack_length=0.04951799 pennation_angle_at_optimal=0 activation1=82.95686 activation2=24.57002
        max_isometric_force_original=122
      PathPoint P1: scapula_r (-0.05372906 -0.06390649 -0.01352745)
      PathPoint P2: humerus_r (0.03002747 -0.006617148 0.01221655)
      PathWrap: wrap_object=ter_min_cyl
      passive_force_length_curve: SimmSpline: x=(-5 1.297 1.299 1.3 1.43 1.56 1.69 1.82 1.95 2.08 2.081 2.083 5)
          y=(0 0 0 0 0.035 0.12 0.26 0.55 1.17 2 2 2 2)
    Schutte1993Muscle_Deprecated ter_min_2: max_isometric_force=273 optimal_fiber_length=0.05528796
        tendon_slack_length=0.05126702 pennation_angle_at_optimal=0 activation1=82.95686 activation2=24.57002
        max_isometric_force_original=195
      PathPoint P1: scapula_r (-0.06351991 -0.06638587 -0.006229364)
      PathPoint P2: humerus_r (0.03270642 -0.001167178 0.01110595)
      PathWrap: wrap_object=ter_min_cyl
      passive_force_length_curve: SimmSpline: x=(-5 1.397 1.399 1.4 1.54 1.68 1.82 1.96 2.1 2.24 2.241 2.243 5)
          y=(0 0 0 0 0.035 0.12 0.26 0.55 1.17 2 2 2 2)
    Schutte1993Muscle_Deprecated ter_min_3: max_isometric_force=252 optimal_fiber_length=0.05204159
        tendon_slack_length=0.01851282 pennation_angle_at_optimal=0 activation1=82.95686 activation2=24.57002
        max_isometric_force_original=180
      PathPoint P1: scapula_r (-0.03674219 -0.04043887 -0.01631959)
      PathPoint P2: humerus_r (0.03002747 -0.006617148 0.01221655)
      PathWrap: wrap_object=ter_min_cyl
      passive_force_length_curve: SimmSpline: x=(-5 1.397 1.399 1.4 1.54 1.68 1.82 1.96 2.1 2.24 2.241 2.243 5)
          y=(0 0 0 0 0.035 0.12 0.26 0.55 1.17 2 2 2 2)
    Schutte1993Muscle_Deprecated ter_maj_1: max_isometric_force=231 optimal_fiber_length=0.136514
        tendon_slack_length=0.005804988 pennation_angle_at_optimal=0 activation1=82.95686 activation2=24.57002
        max_isometric_force_original=165
      PathPoint P1: scapula_r (-0.0843363 -0.1008281 -0.01261278)
      PathPoint P2: humerus_r (-0.007000198 -0.06170985 -0.01306338)
      PathWrap: wrap_object=ter_lat_pec
    Schutte1993Muscle_Deprecated ter_maj_2: max_isometric_force=119 optimal_fiber_length=0.1546395
        tendon_slack_length=0.01163432 pennation_angle_at_optimal=0 activation1=98.40426 activation2=26.59574
        max_isometric_force_original=85
      PathPoint P1: scapula_r (-0.09910456 -0.1080933 -0.01006134)
      PathPoint P2: humerus_r (-0.003331209 -0.07932107 -0.01313279)
      PathWrap: wrap_object=ter_lat_pec
    Schutte1993Muscle_Deprecated ter_maj_3: max_isometric_force=280 optimal_fiber_length=0.1480279
        tendon_slack_length=0.01455058 pennation_angle_at_optimal=0 activation1=98.40426 activation2=26.59574
        max_isometric_force_original=200
      PathPoint P1: scapula_r (-0.08800184 -0.08655726 8.665267e-5)
      PathPoint P2: humerus_r (-0.004426082 -0.07377697 -0.01248031)
      PathWrap: wrap_object=ter_lat_pec
    Schutte1993Muscle_Deprecated ter_maj_4: max_isometric_force=221.2 optimal_fiber_length=0.1063041
        tendon_slack_length=0.03306807 pennation_angle_at_optimal=0 activation1=98.40426 activation2=26.59574
        max_isometric_force_original=158
      PathPoint P1: scapula_r (-0.07683159 -0.09176587 -0.01070642)
      PathPoint P2: humerus_r (-0.007594225 -0.04684715 -0.01481256)
      PathWrap: wrap_object=ter_lat_pec
    Schutte1993Muscle_Deprecated supra_1: max_isometric_force=24.99506 optimal_fiber_length=0.05565882
        tendon_slack_length=0.01748983 pennation_angle_at_optimal=0 activation1=98.40426 activation2=26.59574
        max_isometric_force_original=120 min_control=0 max_control=0.1487801 weakness=0.1487801
        max_isometric_force_original_scaled=168 muscle_has_fes_testing=false
      PathPoint P1: scapula_r (-0.05818558 0.003113639 -0.01789859)
      PathPoint P2: humerus_r (0.0270224 0.01182239 0.003706612)
      PathWrap: wrap_object=inf_sup_sub
      passive_force_length_curve: SimmSpline: x=(-5 1.098 1.099 1.1 1.21 1.32 1.43 1.54 1.65 1.76 1.761 1.762 5)
          y=(0 0 0 0 0.035 0.12 0.26 0.55 1.17 2 2 2 2)
    Schutte1993Muscle_Deprecated supra_2: max_isometric_force=23.53701 optimal_fiber_length=0.06008503
        tendon_slack_length=0.02541668 pennation_angle_at_optimal=0 activation1=98.40426 activation2=26.59574
        max_isometric_force_original=113 min_control=0 max_control=0.1487801 weakness=0.1487801
        max_isometric_force_original_scaled=158.2 muscle_has_fes_testing=false
      PathPoint P1: scapula_r (-0.05752965 0.01058061 -0.006681884)
      PathPoint P2: humerus_r (0.0270224 0.01182239 0.003706612)
      PathWrap: wrap_object=inf_sup_sub
    Schutte1993Muscle_Deprecated supra_3: max_isometric_force=53.73938 optimal_fiber_length=0.05622023
        tendon_slack_length=0.05183425 pennation_angle_at_optimal=0 activation1=98.40426 activation2=26.59574
        max_isometric_force_original=258 min_control=0 max_control=0.1487801 weakness=0.1487801
        max_isometric_force_original_scaled=361.2 muscle_has_fes_testing=false
      PathPoint P1: scapula_r (-0.09105002 0.02021944 -0.02407982)
      PathPoint P2: humerus_r (0.01431488 0.01810068 -0.01904671)
      PathWrap: wrap_object=inf_sup_sub
    Schutte1993Muscle_Deprecated supra_4: max_isometric_force=27.07798 optimal_fiber_length=0.05527433
        tendon_slack_length=0.03092968 pennation_angle_at_optimal=0 activation1=63.46917 activation2=21.2766
        max_isometric_force_original=130 min_control=0 max_control=0.1487801 weakness=0.1487801
        max_isometric_force_original_scaled=182 muscle_has_fes_testing=false
      PathPoint P1: scapula_r (-0.07123683 0.0203732 -0.0388204)
      PathPoint P2: humerus_r (0.01431488 0.01810068 -0.01904671)
      PathWrap: wrap_object=inf_sup_sub
    Schutte1993Muscle_Deprecated subscap_1: max_isometric_force=9.164855 optimal_fiber_length=0.05621768
        tendon_slack_length=0.02831106 pennation_angle_at_optimal=0 activation1=63.46917 activation2=21.2766
        max_isometric_force_original=44 min_control=0 max_control=0.1487801 weakness=0.1487801
        max_isometric_force_original_scaled=61.6 muscle_has_fes_testing=false
      PathPoint P1: scapula_r (-0.05971932 -0.01265637 -0.02200978)
      PathPoint P2: humerus_r (-0.02084918 0.01148353 -0.02068484)
      PathPoint P3: humerus_r (-0.00342439 0.01556865 -0.02669593)
      PathWrap: wrap_object=inf_sup_sub
    Schutte1993Muscle_Deprecated subscap_2: max_isometric_force=16.24679 optimal_fiber_length=0.06440799
        tendon_slack_length=0.04366643 pennation_angle_at_optimal=0 activation1=63.46917 activation2=21.2766
        max_isometric_force_original=78 min_control=0 max_control=0.1487801 weakness=0.1487801
        max_isometric_force_original_scaled=109.2 muscle_has_fes_testing=false
      PathPoint P1: scapula_r (-0.08074793 0.01151278 -0.02700675)
      PathPoint P2: humerus_r (-0.02317869 0.01280131 -0.01527068)
      PathPoint P3: humerus_r (-0.0006056744 0.01218007 -0.0300416)
      PathWrap: wrap_object=inf_sup_sub
    Schutte1993Muscle_Deprecated subscap_3: max_isometric_force=54.98913 optimal_fiber_length=0.06647559
        tendon_slack_length=0.05801864 pennation_angle_at_optimal=0.08726646 activation1=63.46917 activation2=21.2766
        max_isometric_force_original=264 min_control=0 max_control=0.1487801 weakness=0.1487801
        max_isometric_force_original_scaled=369.6 muscle_has_fes_testing=false
      PathPoint P1: scapula_r (-0.1012267 -0.01392489 -0.01368149)
      PathPoint P2: humerus_r (-0.009201592 0.01440148 -0.02665429)
      PathPoint P3: humerus_r (-0.00342439 0.01556865 -0.02669593)
      PathWrap: wrap_object=inf_sup_sub
    Schutte1993Muscle_Deprecated subscap_4: max_isometric_force=57.07205 optimal_fiber_length=0.07456327
        tendon_slack_length=0.0551207 pennation_angle_at_optimal=0.08726646 activation1=63.46917 activation2=21.2766
        max_isometric_force_original=274 min_control=0 max_control=0.1487801 weakness=0.1487801
        max_isometric_force_original_scaled=383.6 muscle_has_fes_testing=false
      PathPoint P1: scapula_r (-0.09050984 -0.0419092 -0.00770246)
      PathPoint P2: humerus_r (0.0004076655 0.006033559 -0.03453951)
      PathWrap: wrap_object=inf_sup_sub
    Schutte1993Muscle_Deprecated subscap_5: max_isometric_force=23.74531 optimal_fiber_length=0.07978522
        tendon_slack_length=0.06607057 pennation_angle_at_optimal=0 activation1=63.46917 activation2=21.2766
        max_isometric_force_original=114 min_control=0 max_control=0.1487801 weakness=0.1487801
        max_isometric_force_original_scaled=159.6 muscle_has_fes_testing=false
      PathPoint P1: scapula_r (-0.08434595 -0.05482504 -0.01178476)
      PathPoint P2: humerus_r (0.005055052 0.008066709 -0.03412304)
      PathWrap: wrap_object=inf_sup_sub
    Schutte1993Muscle_Deprecated subscap_6: max_isometric_force=31.03553 optimal_fiber_length=0.0762137
        tendon_slack_length=0.07701384 pennation_angle_at_optimal=0 activation1=78.28785 activation2=23.75297
        max_isometric_force_original=149 min_control=0 max_control=0.1487801 weakness=0.1487801
        max_isometric_force_original_scaled=208.6 muscle_has_fes_testing=false
      PathPoint P1: scapula_r (-0.1020852 -0.07598626 -0.003456479)
      PathPoint P2: humerus_r (0.002061623 0.002155515 -0.03891248)
      PathWrap: wrap_object=inf_sup_sub
    Schutte1993Muscle_Deprecated subscap_7: max_isometric_force=33.74333 optimal_fiber_length=0.0812829
        tendon_slack_length=0.07830914 pennation_angle_at_optimal=0 activation1=78.28785 activation2=23.75297
        max_isometric_force_original=162 min_control=0 max_control=0.1487801 weakness=0.1487801
        max_isometric_force_original_scaled=226.8 muscle_has_fes_testing=false
      PathPoint P1: scapula_r (-0.09632647 -0.09096824 -0.009695471)
      PathPoint P2: humerus_r (-0.002842011 0.0008189074 -0.03698282)
      PathWrap: wrap_object=inf_sup_sub
    Schutte1993Muscle_Deprecated subscap_8: max_isometric_force=12.70582 optimal_fiber_length=0.07786251
        tendon_slack_length=0.04071243 pennation_angle_at_optimal=0 activation1=112.5165 activation2=28.32861
        max_isometric_force_original=61 min_control=0 max_control=0.1487801 weakness=0.1487801
        max_isometric_force_original_scaled=85.4 muscle_has_fes_testing=false
      PathPoint P1: scapula_r (-0.0660472 -0.06289744 -0.01917913)
      PathPoint P2: humerus_r (-0.002842011 0.0008189074 -0.03698282)
      PathWrap: wrap_object=inf_sup_sub
    Schutte1993Muscle_Deprecated subscap_9: max_isometric_force=46.24086 optimal_fiber_length=0.07152775
        tendon_slack_length=0.05853172 pennation_angle_at_optimal=0 activation1=112.5165 activation2=28.32861
        max_isometric_force_original=222 min_control=0 max_control=0.1487801 weakness=0.1487801
        max_isometric_force_original_scaled=310.8 muscle_has_fes_testing=false
      PathPoint P1: scapula_r (-0.07692806 -0.08850808 -0.0118329)
      PathPoint P2: humerus_r (-0.007652463 -0.003520361 -0.03235997)
      PathWrap: wrap_object=inf_sup_sub
    Schutte1993Muscle_Deprecated subscap10: max_isometric_force=9.789732 optimal_fiber_length=0.06866605
        tendon_slack_length=0.0101577 pennation_angle_at_optimal=0 activation1=45.41056 activation2=17.48252
        max_isometric_force_original=47 min_control=0 max_control=0.1487801 weakness=0.1487801
        max_isometric_force_original_scaled=65.8 muscle_has_fes_testing=false
      PathPoint P1: scapula_r (-0.04471956 -0.05214385 -0.02030561)
      PathPoint P2: humerus_r (-0.00863086 -0.01603929 -0.02157331)
      PathWrap: wrap_object=inf_sup_sub
    Schutte1993Muscle_Deprecated subscap11: max_isometric_force=3.332675 optimal_fiber_length=0.06374604
        tendon_slack_length=0.009913847 pennation_angle_at_optimal=0 activation1=45.41056 activation2=17.48252
        max_isometric_force_original=16 min_control=0 max_control=0.1487801 weakness=0.1487801
        max_isometric_force_original_scaled=22.4 muscle_has_fes_testing=false
      PathPoint P1: scapula_r (-0.03485154 -0.04388886 -0.02773848)
      PathPoint P2: humerus_r (-0.01134475 -0.0215175 -0.0142295)
      PathWrap: wrap_object=inf_sup_sub
    Schutte1993Muscle_Deprecated bic_l: max_isometric_force=204.198 optimal_fiber_length=0.1204079
        tendon_slack_length=0.2176102 pennation_angle_at_optimal=0 activation1=45.41056 activation2=17.48252
        max_isometric_force_original=347 min_control=0 max_control=0.4203335 weakness=0.4203335
        max_isometric_force_original_scaled=485.8 muscle_has_fes_testing=true
      PathPoint P1: scapula_r (-0.01351426 -0.00239289 -0.04128518)
      PathPoint P2: humerus_r (0.02527526 9.412729e-5 -0.001527068)
      PathPoint P3: radius_r (-0.002732795 -0.03497396 -0.0103885)
      PathWrap: wrap_object=inf_sup_sub
      PathWrap pathwrap_0: wrap_object=radius
      passive_force_length_curve: SimmSpline: x=(-5 1.297 1.299 1.3 1.43 1.56 1.69 1.82 1.95 2.08 2.081 2.083 5)
          y=(0 0 0 0 0.035 0.12 0.26 0.55 1.17 2 2 2 2)
    Schutte1993Muscle_Deprecated bic_b_1: max_isometric_force=101.8048 optimal_fiber_length=0.1107306
        tendon_slack_length=0.1810493 pennation_angle_at_optimal=0 activation1=45.41056 activation2=17.48252
        max_isometric_force_original=173 min_control=0 max_control=0.4203335 weakness=0.4203335
        max_isometric_force_original_scaled=242.2 muscle_has_fes_testing=true
      PathPoint P1: scapula_r (-0.008826228 -0.008005129 -0.07937385)
      PathPoint P2: radius_r (-0.002732795 -0.03497396 -0.0103885)
      PathWrap: wrap_object=radius
      passive_force_length_curve: SimmSpline: x=(-5 1.497 1.498 1.5 1.65 1.8 1.95 2.1 2.25 2.4 2.402 2.403 5)
          y=(0 0 0 0 0.035 0.12 0.26 0.55 1.17 2 2 2 2)
    Schutte1993Muscle_Deprecated bic_b_2: max_isometric_force=189.4864 optimal_fiber_length=0.1087432
        tendon_slack_length=0.1823743 pennation_angle_at_optimal=0 activation1=45.41056 activation2=17.48252
        max_isometric_force_original=322 min_control=0 max_control=0.4203335 weakness=0.4203335
        max_isometric_force_original_scaled=450.8 muscle_has_fes_testing=true
      PathPoint P1: scapula_r (-0.008826228 -0.008005129 -0.07937385)
      PathPoint P2: radius_r (-0.002732795 -0.03497396 -0.0103885)
      PathWrap: wrap_object=radius
      passive_force_length_curve: SimmSpline: x=(-5 1.597 1.598 1.6 1.76 1.92 2.08 2.24 2.4 2.56 2.562 2.563 5)
          y=(0 0 0 0 0.035 0.12 0.26 0.55 1.17 2 2 2 2)
    Schutte1993Muscle_Deprecated tric_long_1: max_isometric_force=31.19734 optimal_fiber_length=0.09500193
        tendon_slack_length=0.1923601 pennation_angle_at_optimal=0.1745329 activation1=62.32493 activation2=21.0084
        max_isometric_force_original=223 min_control=0 max_control=0 weakness=0.09992742
        max_isometric_force_original_scaled=312.2 muscle_has_fes_testing=true
      PathPoint P1: ulna_r (-0.0176275 -0.01566027 0.01208438)
      PathPoint P2: scapula_r (-0.0310799 -0.04207257 -0.01979532)
      PathWrap: wrap_object=elbow
      passive_force_length_curve: SimmSpline: x=(-5 1.497 1.498 1.5 1.65 1.8 1.95 2.1 2.25 2.4 2.402 2.403 5)
          y=(0 0 0 0 0.035 0.12 0.26 0.55 1.17 2 2 2 2)
    Schutte1993Muscle_Deprecated tric_long_2: max_isometric_force=41.40992 optimal_fiber_length=0.08314379
        tendon_slack_length=0.2069629 pennation_angle_at_optimal=0.1745329 activation1=62.32493 activation2=21.0084
        max_isometric_force_original=296 min_control=0 max_control=0 weakness=0.09992742
        max_isometric_force_original_scaled=414.4 muscle_has_fes_testing=true
      PathPoint P1: ulna_r (-0.005029506 -0.01776317 0.005775695)
      PathPoint P2: scapula_r (-0.02339192 -0.04029472 -0.03604751)
      PathWrap: wrap_object=elbow
      passive_force_length_curve: SimmSpline: x=(-5 1.497 1.498 1.5 1.65 1.8 1.95 2.1 2.25 2.4 2.402 2.403 5)
          y=(0 0 0 0 0.035 0.12 0.26 0.55 1.17 2 2 2 2)
    Schutte1993Muscle_Deprecated tric_long_3: max_isometric_force=39.59124 optimal_fiber_length=0.1118617
        tendon_slack_length=0.2061357 pennation_angle_at_optimal=0.1745329 activation1=62.32493 activation2=21.0084
        max_isometric_force_original=283 min_control=0 max_control=0 weakness=0.09992742
        max_isometric_force_original_scaled=396.2 muscle_has_fes_testing=true
      PathPoint P1: ulna_r (-0.002529289 -0.046787 0.005746622)
      PathPoint P2: scapula_r (-0.02174242 -0.0375847 -0.02683344)
      PathWrap: wrap_object=elbow
      passive_force_length_curve: SimmSpline: x=(-5 1.397 1.399 1.4 1.54 1.68 1.82 1.96 2.1 2.24 2.241 2.243 5)
          y=(0 0 0 0 0.035 0.12 0.26 0.55 1.17 2 2 2 2)
    Schutte1993Muscle_Deprecated tric_long_4: max_isometric_force=45.74677 optimal_fiber_length=0.1159434
        tendon_slack_length=0.2077714 pennation_angle_at_optimal=0 activation1=62.32493 activation2=21.0084
        max_isometric_force_original=327 min_control=0 max_control=0 weakness=0.09992742
        max_isometric_force_original_scaled=457.8 muscle_has_fes_testing=true
      PathPoint P1: ulna_r (-0.0002810321 -0.04312389 0.0009884578)
      PathPoint P2: scapula_r (-0.02339192 -0.04029472 -0.03604751)
      PathWrap: wrap_object=elbow
      passive_force_length_curve: SimmSpline: x=(-5 1.198 1.199 1.2 1.32 1.44 1.56 1.68 1.8 1.92 1.921 1.922 5)
          y=(0 0 0 0 0.035 0.12 0.26 0.55 1.17 2 2 2 2)
    Schutte1993Muscle_Deprecated lat_dorsi_1: max_isometric_force=11.66436 optimal_fiber_length=0.2961431
        tendon_slack_length=0.1137554 pennation_angle_at_optimal=0 activation1=62.32493 activation2=21.0084
        max_isometric_force_original=56 min_control=0 max_control=0.1487801 weakness=0.1487801
        max_isometric_force_original_scaled=78.4 muscle_has_fes_testing=false
      PathPoint P1: thorax (0.00966694 -0.1023479 0.2460601)
      PathPoint P2: humerus_r (0.001607367 -0.03566483 -0.02448863)
      PathWrap: wrap_object=ter_lat_pec
    Schutte1993Muscle_Deprecated lat_dorsi_2: max_isometric_force=18.32971 optimal_fiber_length=0.3291657
        tendon_slack_length=0.09562743 pennation_angle_at_optimal=0 activation1=62.32493 activation2=21.0084
        max_isometric_force_original=88 min_control=0 max_control=0.1487801 weakness=0.1487801
        max_isometric_force_original_scaled=123.2 muscle_has_fes_testing=false
      PathPoint P1: thorax (0.01282349 -0.1597765 0.2389653)
      PathPoint P2: humerus_r (0.002480936 -0.04185841 -0.02393333)
      PathWrap: wrap_object=ter_lat_pec
    Schutte1993Muscle_Deprecated lat_dorsi_3: max_isometric_force=26.86969 optimal_fiber_length=0.3109804
        tendon_slack_length=0.1106504 pennation_angle_at_optimal=0 activation1=62.32493 activation2=21.0084
        max_isometric_force_original=129 min_control=0 max_control=0.1487801 weakness=0.1487801
        max_isometric_force_original_scaled=180.6 muscle_has_fes_testing=false
      PathPoint P1: thorax (0.0114425 -0.2042897 0.2244533)
      PathPoint P2: humerus_r (0.002480936 -0.04185841 -0.02393333)
      PathWrap: wrap_object=ter_lat_pec
    Schutte1993Muscle_Deprecated lat_dorsi_4: max_isometric_force=19.99605 optimal_fiber_length=0.3093606
        tendon_slack_length=0.1157931 pennation_angle_at_optimal=0 activation1=62.32493 activation2=21.0084
        max_isometric_force_original=96 min_control=0 max_control=0.1487801 weakness=0.1487801
        max_isometric_force_original_scaled=134.4 muscle_has_fes_testing=false
      PathPoint P1: thorax (0.02081351 -0.2525395 0.2063938)
      PathPoint P2: humerus_r (0.001607367 -0.03566483 -0.02448863)
      PathWrap: wrap_object=ter_lat_pec
    Schutte1993Muscle_Deprecated lat_dorsi_5: max_isometric_force=18.32971 optimal_fiber_length=0.2804029
        tendon_slack_length=0.06452224 pennation_angle_at_optimal=0 activation1=62.32493 activation2=21.0084
        max_isometric_force_original=88 min_control=0 max_control=0.1487801 weakness=0.1487801
        max_isometric_force_original_scaled=123.2 muscle_has_fes_testing=false
      PathPoint P1: thorax (0.07812466 -0.2505088 0.1599552)
      PathPoint P2: humerus_r (0.001607367 -0.03566483 -0.02448863)
      PathWrap: wrap_object=ter_lat_pec
    Schutte1993Muscle_Deprecated lat_dorsi_6: max_isometric_force=21.87068 optimal_fiber_length=0.2958361
        tendon_slack_length=0.06000202 pennation_angle_at_optimal=0 activation1=62.32493 activation2=21.0084
        max_isometric_force_original=105 min_control=0 max_control=0.1487801 weakness=0.1487801
        max_isometric_force_original_scaled=147 muscle_has_fes_testing=false
      PathPoint P1: thorax (0.1027852 -0.2418985 0.1372196)
      PathPoint P2: humerus_r (0.002480936 -0.04185841 -0.02393333)
      PathWrap: wrap_object=ter_lat_pec
    Schutte1993Muscle_Deprecated pect_maj_t_1: max_isometric_force=26.03652 optimal_fiber_length=0.210127
        tendon_slack_length=0.04015166 pennation_angle_at_optimal=0 activation1=63.46917 activation2=21.2766
        max_isometric_force_original=125 min_control=0 max_control=0.1487801 weakness=0.1487801
        max_isometric_force_original_scaled=175 muscle_has_fes_testing=false
      PathPoint P1: thorax (0.06036906 -0.1278537 -0.05175969)
      PathPoint P2: humerus_r (0.01205525 -0.05939432 -0.02397498)
      PathWrap: wrap_object=ter_lat_pec
    Schutte1993Muscle_Deprecated pect_maj_t_2: max_isometric_force=24.57848 optimal_fiber_length=0.2071145
        tendon_slack_length=0.04866624 pennation_angle_at_optimal=0 activation1=78.28785 activation2=23.75297
        max_isometric_force_original=118 min_control=0 max_control=0.1487801 weakness=0.1487801
        max_isometric_force_original_scaled=165.2 muscle_has_fes_testing=false
      PathPoint P1: thorax (0.02752119 -0.1139636 -0.0632081)
      PathPoint P2: humerus_r (0.01268422 -0.06471251 -0.02362791)
      PathWrap: wrap_object=ter_lat_pec
    Schutte1993Muscle_Deprecated pect_maj_t_3: max_isometric_force=34.36821 optimal_fiber_length=0.2081937
        tendon_slack_length=0.05954813 pennation_angle_at_optimal=0 activation1=78.28785 activation2=23.75297
        max_isometric_force_original=165 min_control=0 max_control=0.1487801 weakness=0.1487801
        max_isometric_force_original_scaled=231 muscle_has_fes_testing=false
      PathPoint P1: thorax (0.008285949 -0.09934248 -0.05611331)
      PathPoint P2: humerus_r (0.0125561 -0.06946594 -0.02325309)
      PathWrap: wrap_object=ter_lat_pec
    Schutte1993Muscle_Deprecated pect_maj_t_4: max_isometric_force=32.70187 optimal_fiber_length=0.2092192
        tendon_slack_length=0.03195929 pennation_angle_at_optimal=0 activation1=112.5165 activation2=28.32861
        max_isometric_force_original=157 min_control=0 max_control=0.1487801 weakness=0.1487801
        max_isometric_force_original_scaled=219.8 muscle_has_fes_testing=false
      PathPoint P1: thorax (0.01302078 -0.08171589 -0.0599832)
      PathPoint P2: humerus_r (0.01294047 -0.06050502 -0.02432204)
      PathWrap: wrap_object=ter_lat_pec
    Schutte1993Muscle_Deprecated pect_maj_t_5: max_isometric_force=27.70286 optimal_fiber_length=0.16718
        tendon_slack_length=0.02897787 pennation_angle_at_optimal=0 activation1=112.5165 activation2=28.32861
        max_isometric_force_original=133 min_control=0 max_control=0.1487801 weakness=0.1487801
        max_isometric_force_original_scaled=186.2 muscle_has_fes_testing=false
      PathPoint P1: thorax (0.0070036 -0.03395352 -0.03063658)
      PathPoint P2: humerus_r (0.01295211 -0.05099817 -0.02509945)
      PathWrap: wrap_object=ter_lat_pec
    Schutte1993Muscle_Deprecated pect_maj_t_6: max_isometric_force=41.24185 optimal_fiber_length=0.1575455
        tendon_slack_length=0.03914174 pennation_angle_at_optimal=0 activation1=45.41056 activation2=17.48252
        max_isometric_force_original=198 min_control=0 max_control=0.1487801 weakness=0.1487801
        max_isometric_force_original_scaled=277.2 muscle_has_fes_testing=false
      PathPoint P1: thorax (0.0114425 -0.01843887 -0.009835954)
      PathPoint P2: humerus_r (0.01294047 -0.06050502 -0.02432204)
      PathWrap: wrap_object=ter_lat_pec
    Schutte1993Muscle_Deprecated pect_maj_c_1: max_isometric_force=37.2843 optimal_fiber_length=0.1405213
        tendon_slack_length=0.0175265 pennation_angle_at_optimal=0 activation1=45.41056 activation2=17.48252
        max_isometric_force_original=179 min_control=0 max_control=0.1487801 weakness=0.1487801
        max_isometric_force_original_scaled=250.6 muscle_has_fes_testing=false
      PathPoint P1: clavicle_r (0.06965527 0.0118894 -0.018094)
      PathPoint P2: humerus_r (0.01379074 -0.08348149 -0.0215872)
      PathWrap: wrap_object=ter_lat_pec
    Schutte1993Muscle_Deprecated pect_maj_c_2: max_isometric_force=23.53701 optimal_fiber_length=0.1133661
        tendon_slack_length=0.01454744 pennation_angle_at_optimal=0 activation1=45.41056 activation2=17.48252
        max_isometric_force_original=113 min_control=0 max_control=0.1487801 weakness=0.1487801
        max_isometric_force_original_scaled=158.2 muscle_has_fes_testing=false
      PathPoint P1: clavicle_r (0.09153175 0.01447741 -0.01654561)
      PathPoint P2: humerus_r (0.01295211 -0.05099817 -0.02509945)
      PathWrap: wrap_object=ter_lat_pec
    Schutte1993Muscle_Deprecated tric_med_1: max_isometric_force=36.79328 optimal_fiber_length=0.07637132
        tendon_slack_length=0.08280657 pennation_angle_at_optimal=0.296706 activation1=45.41056 activation2=17.48252
        max_isometric_force_original=263 min_control=0 max_control=0 weakness=0.09992742
        max_isometric_force_original_scaled=368.2 muscle_has_fes_testing=true
      PathPoint P1: humerus_r (-0.008316376 -0.1398167 -9.717709e-5)
      PathPoint P2: ulna_r (-0.01512728 -0.007471578 0.02290896)
      PathWrap: wrap_object=elbow
      passive_force_length_curve: SimmSpline: x=(-5 1.297 1.299 1.3 1.43 1.56 1.69 1.82 1.95 2.08 2.081 2.083 5)
          y=(0 0 0 0 0.035 0.12 0.26 0.55 1.17 2 2 2 2)
    Schutte1993Muscle_Deprecated tric_med_2: max_isometric_force=35.81399 optimal_fiber_length=0.07295695
        tendon_slack_length=0.1058961 pennation_angle_at_optimal=0 activation1=62.32493 activation2=21.0084
        max_isometric_force_original=256 min_control=0 max_control=0 weakness=0.09992742
        max_isometric_force_original_scaled=358.4 muscle_has_fes_testing=true
      PathPoint P1: humerus_r (-0.007244798 -0.1167367 0.004109202)
      PathPoint P2: ulna_r (-0.01512728 -0.007471578 0.02290896)
      PathWrap: wrap_object=elbow
      passive_force_length_curve: SimmSpline: x=(-5 1.297 1.299 1.3 1.43 1.56 1.69 1.82 1.95 2.08 2.081 2.083 5)
          y=(0 0 0 0 0.035 0.12 0.26 0.55 1.17 2 2 2 2)
    Schutte1993Muscle_Deprecated tric_med_3: max_isometric_force=33.57561 optimal_fiber_length=0.05667038
        tendon_slack_length=0.01007264 pennation_angle_at_optimal=0 activation1=62.32493 activation2=21.0084
        max_isometric_force_original=240 min_control=0 max_control=0 weakness=0.09992742
        max_isometric_force_original_scaled=336 muscle_has_fes_testing=true
      PathPoint P1: humerus_r (0.01090214 -0.2276374 0.0183387)
      PathPoint P2: ulna_r (-0.01512728 -0.007471578 0.02290896)
      PathWrap: wrap_object=elbow
      passive_force_length_curve: SimmSpline: x=(-5 1.397 1.399 1.4 1.54 1.68 1.82 1.96 2.1 2.24 2.241 2.243 5)
          y=(0 0 0 0 0.035 0.12 0.26 0.55 1.17 2 2 2 2)
    Schutte1993Muscle_Deprecated tric_med_4: max_isometric_force=29.51856 optimal_fiber_length=0.07009656
        tendon_slack_length=0.03796114 pennation_angle_at_optimal=0.1396263 activation1=62.32493 activation2=21.0084
        max_isometric_force_original=211 min_control=0 max_control=0 weakness=0.09992742
        max_isometric_force_original_scaled=295.4 muscle_has_fes_testing=true
      PathPoint P1: humerus_r (0.003074962 -0.188151 0.02242014)
      PathPoint P2: ulna_r (-0.01512728 -0.007471578 0.02290896)
      PathWrap: wrap_object=elbow
      passive_force_length_curve: SimmSpline: x=(-5 1.297 1.299 1.3 1.43 1.56 1.69 1.82 1.95 2.08 2.081 2.083 5)
          y=(0 0 0 0 0.035 0.12 0.26 0.55 1.17 2 2 2 2)
    Schutte1993Muscle_Deprecated tric_med_5: max_isometric_force=14.96913 optimal_fiber_length=0.07600063
        tendon_slack_length=0.06950244 pennation_angle_at_optimal=0 activation1=62.32493 activation2=21.0084
        max_isometric_force_original=107 min_control=0 max_control=0 weakness=0.09992742
        max_isometric_force_original_scaled=149.8 muscle_has_fes_testing=true
      PathPoint P1: humerus_r (-0.006755599 -0.1472716 0.01261914)
      PathPoint P2: ulna_r (-0.01512728 -0.007471578 0.02290896)
      PathWrap: wrap_object=elbow
      passive_force_length_curve: SimmSpline: x=(-5 1.198 1.199 1.2 1.32 1.44 1.56 1.68 1.8 1.92 1.921 1.922 5)
          y=(0 0 0 0 0.035 0.12 0.26 0.55 1.17 2 2 2 2)
    Schutte1993Muscle_Deprecated brachialis_1: max_isometric_force=53.77992 optimal_fiber_length=0.08313964
        tendon_slack_length=0.07659097 pennation_angle_at_optimal=0 activation1=62.32493 activation2=21.0084
        max_isometric_force_original=314 min_control=0 max_control=0.1223383 weakness=0.1223383
        max_isometric_force_original_scaled=439.6 muscle_has_fes_testing=false
      PathPoint P1: humerus_r (0.0111118 -0.1398167 0.008676526)
      PathPoint P2: ulna_r (-0.01488501 -0.04305606 -0.005911365)
      PathWrap: wrap_object=elbow_circ
      passive_force_length_curve: SimmSpline: x=(-5 1.198 1.199 1.2 1.32 1.44 1.56 1.68 1.8 1.92 1.921 1.922 5)
          y=(0 0 0 0 0.035 0.12 0.26 0.55 1.17 2 2 2 2)
    Schutte1993Muscle_Deprecated brachialis_2: max_isometric_force=31.63011 optimal_fiber_length=0.0902476
        tendon_slack_length=0.05606147 pennation_angle_at_optimal=0 activation1=62.32493 activation2=21.0084
        max_isometric_force_original=158 min_control=0 max_control=0.1429932 weakness=0.1429932
        max_isometric_force_original_scaled=221.2 muscle_has_fes_testing=false
      PathPoint P1: humerus_r (-0.003319562 -0.144956 -0.007177222)
      PathPoint P2: ulna_r (-0.01851905 -0.04075935 -0.003188261)
      PathWrap: wrap_object=elbow_circ
      passive_force_length_curve: SimmSpline: x=(-5 1.198 1.199 1.2 1.32 1.44 1.56 1.68 1.8 1.92 1.921 1.922 5)
          y=(0 0 0 0 0.035 0.12 0.26 0.55 1.17 2 2 2 2)
    Schutte1993Muscle_Deprecated brachialis_3: max_isometric_force=34.01034 optimal_fiber_length=0.08225366
        tendon_slack_length=0.03725051 pennation_angle_at_optimal=0 activation1=62.32493 activation2=21.0084
        max_isometric_force_original=157 min_control=0 max_control=0.1547331 weakness=0.1547331
        max_isometric_force_original_scaled=219.8 muscle_has_fes_testing=false
      PathPoint P1: humerus_r (-0.0101334 -0.1697586 -0.0004581205)
      PathPoint P2: ulna_r (-0.02414938 -0.02980879 -0.0003585582)
      PathWrap: wrap_object=elbow_circ
      passive_force_length_curve: SimmSpline: x=(-5 1.098 1.099 1.1 1.21 1.32 1.43 1.54 1.65 1.76 1.761 1.762 5)
          y=(0 0 0 0 0.035 0.12 0.26 0.55 1.17 2 2 2 2)
    Schutte1993Muscle_Deprecated brachialis_4: max_isometric_force=20.08964 optimal_fiber_length=0.07184025
        tendon_slack_length=0.03004401 pennation_angle_at_optimal=0 activation1=62.32493 activation2=21.0084
        max_isometric_force_original=87 min_control=0 max_control=0.1649395 weakness=0.1649395
        max_isometric_force_original_scaled=121.8 muscle_has_fes_testing=false
      PathPoint P1: humerus_r (-0.0002096565 -0.179576 -0.001443774)
      PathPoint P2: ulna_r (-0.0153211 -0.04037172 -0.004457751)
      PathWrap: wrap_object=elbow_circ
      passive_force_length_curve: SimmSpline: x=(-5 1.397 1.399 1.4 1.54 1.68 1.82 1.96 2.1 2.24 2.241 2.243 5)
          y=(0 0 0 0 0.035 0.12 0.26 0.55 1.17 2 2 2 2)
    Schutte1993Muscle_Deprecated brachialis_5: max_isometric_force=23.57249 optimal_fiber_length=0.05889173
        tendon_slack_length=0.01988428 pennation_angle_at_optimal=0 activation1=62.32493 activation2=21.0084
        max_isometric_force_original=101 min_control=0 max_control=0.1667079 weakness=0.1667079
        max_isometric_force_original_scaled=141.4 muscle_has_fes_testing=false
      PathPoint P1: humerus_r (-0.01476914 -0.2083413 0.007135575)
      PathPoint P2: ulna_r (-0.02149411 -0.0363985 -0.001802482)
      PathWrap: wrap_object=elbow_circ
      passive_force_length_curve: SimmSpline: x=(-5 1.297 1.299 1.3 1.43 1.56 1.69 1.82 1.95 2.08 2.081 2.083 5)
          y=(0 0 0 0 0.035 0.12 0.26 0.55 1.17 2 2 2 2)
    Schutte1993Muscle_Deprecated brachialis_6: max_isometric_force=27.74534 optimal_fiber_length=0.04466891
        tendon_slack_length=0.03312313 pennation_angle_at_optimal=0 activation1=62.32493 activation2=21.0084
        max_isometric_force_original=104 min_control=0 max_control=0.1905587 weakness=0.1905587
        max_isometric_force_original_scaled=145.6 muscle_has_fes_testing=false
      PathPoint P1: humerus_r (-0.002306222 -0.2161821 0.0002915313)
      PathPoint P2: ulna_r (-0.02369391 -0.03171787 -0.002742486)
      PathWrap: wrap_object=elbow_circ
      passive_force_length_curve: SimmSpline: x=(-5 1.198 1.199 1.2 1.32 1.44 1.56 1.68 1.8 1.92 1.921 1.922 5)
          y=(0 0 0 0 0.035 0.12 0.26 0.55 1.17 2 2 2 2)
    Schutte1993Muscle_Deprecated brachialis_7: max_isometric_force=26.44459 optimal_fiber_length=0.05934631
        tendon_slack_length=0.007262995 pennation_angle_at_optimal=0 activation1=62.32493 activation2=21.0084
        max_isometric_force_original=118 min_control=0 max_control=0.1600762 weakness=0.1600762
        max_isometric_force_original_scaled=165.2 muscle_has_fes_testing=false
      PathPoint P1: humerus_r (-0.0146876 -0.2227052 0.005539094)
      PathPoint P2: ulna_r (-0.01246232 -0.03843356 -0.005552807)
      PathWrap: wrap_object=elbow_circ
      passive_force_length_curve: SimmSpline: x=(-5 1.297 1.299 1.3 1.43 1.56 1.69 1.82 1.95 2.08 2.081 2.083 5)
          y=(0 0 0 0 0.035 0.12 0.26 0.55 1.17 2 2 2 2)
    Schutte1993Muscle_Deprecated brachiorad_1: max_isometric_force=7.569571 optimal_fiber_length=0.1554516
        tendon_slack_length=0.1153599 pennation_angle_at_optimal=0 activation1=62.32493 activation2=21.0084
        max_isometric_force_original=30 min_control=0 max_control=0.1802279 weakness=0.1802279
        max_isometric_force_original_scaled=42 muscle_has_fes_testing=false
      PathPoint P1: humerus_r (0.003284619 -0.1879534 0.01214714)
      PathPoint P2: radius_r (0.007868899 -0.2181681 -0.0681939)
      passive_force_length_curve: SimmSpline: x=(-5 1.198 1.199 1.2 1.32 1.44 1.56 1.68 1.8 1.92 1.921 1.922 5)
          y=(0 0 0 0 0.035 0.12 0.26 0.55 1.17 2 2 2 2)
    Schutte1993Muscle_Deprecated brachiorad_2: max_isometric_force=16.81248 optimal_fiber_length=0.15617
        tendon_slack_length=0.115893 pennation_angle_at_optimal=0 activation1=62.32493 activation2=21.0084
        max_isometric_force_original=82 min_control=0 max_control=0.1464501 weakness=0.1464501
        max_isometric_force_original_scaled=114.8 muscle_has_fes_testing=false
      PathPoint P1: humerus_r (0.005194823 -0.2047269 0.0212679)
      PathPoint P2: radius_r (0.007868899 -0.2181681 -0.0681939)
      passive_force_length_curve: SimmSpline: x=(-5 1.198 1.199 1.2 1.32 1.44 1.56 1.68 1.8 1.92 1.921 1.922 5)
          y=(0 0 0 0 0.035 0.12 0.26 0.55 1.17 2 2 2 2)
    Schutte1993Muscle_Deprecated brachiorad_3: max_isometric_force=12.5447 optimal_fiber_length=0.1034484
        tendon_slack_length=0.1496412 pennation_angle_at_optimal=0 activation1=62.32493 activation2=21.0084
        max_isometric_force_original=52 min_control=0 max_control=0.1723173 weakness=0.1723173
        max_isometric_force_original_scaled=72.8 muscle_has_fes_testing=false
      PathPoint P1: humerus_r (0.006988551 -0.2205402 0.02289214)
      PathPoint P2: radius_r (0.007868899 -0.2181681 -0.0681939)
      passive_force_length_curve: SimmSpline: x=(-5 1.297 1.299 1.3 1.43 1.56 1.69 1.82 1.95 2.08 2.081 2.083 5)
          y=(0 0 0 0 0.035 0.12 0.26 0.55 1.17 2 2 2 2)
    Schutte1993Muscle_Deprecated pron_teres_1: max_isometric_force=714 optimal_fiber_length=0.06097962
        tendon_slack_length=0.08507157 pennation_angle_at_optimal=0 activation1=62.32493 activation2=21.0084
        max_isometric_force_original=510
      PathPoint P1: humerus_r (-0.04389975 -0.2606008 0.00881535)
      PathPoint P2: radius_r (0.02012771 -0.1020534 0.007568486)
      PathPoint P3: radius_r (0.02012771 -0.1020534 0.007578176)
      PathWrap: wrap_object=ulna_radius
      passive_force_length_curve: SimmSpline: x=(-5 1.297 1.299 1.3 1.43 1.56 1.69 1.82 1.95 2.08 2.081 2.083 5)
          y=(0 0 0 0 0.035 0.12 0.26 0.55 1.17 2 2 2 2)
    Schutte1993Muscle_Deprecated pron_teres_2: max_isometric_force=197.4 optimal_fiber_length=0.03789088
        tendon_slack_length=0.04690329 pennation_angle_at_optimal=0 activation1=62.32493 activation2=21.0084
        max_isometric_force_original=141
      PathPoint P1: ulna_r (-0.01182273 -0.02378113 -0.01514666)
      PathPoint P2: radius_r (0.02160071 -0.07904755 0.00330455)
      PathWrap: wrap_object=ulna_radius
    Schutte1993Muscle_Deprecated supinator_1: max_isometric_force=65.8 optimal_fiber_length=0.02587434
        tendon_slack_length=0.02461454 pennation_angle_at_optimal=0 activation1=62.32493 activation2=21.0084
        max_isometric_force_original=47
      PathPoint P1: ulna_r (0.02046689 -0.0808888 -0.008547253)
      PathPoint P2: radius_r (0.01754028 -0.07879559 0.005698168)
      PathWrap: wrap_object=supinator
    Schutte1993Muscle_Deprecated supinator_2: max_isometric_force=324.8 optimal_fiber_length=0.02519598
        tendon_slack_length=0.02238566 pennation_angle_at_optimal=0 activation1=62.32493 activation2=21.0084
        max_isometric_force_original=232
      PathPoint P1: ulna_r (0.02044751 -0.06473429 -0.008334056)
      PathPoint P2: radius_r (0.01792791 -0.06570337 0.006008273)
      PathWrap: wrap_object=supinator
      passive_force_length_curve: SimmSpline: x=(-5 1.198 1.199 1.2 1.32 1.44 1.56 1.68 1.8 1.92 1.921 1.922 5)
          y=(0 0 0 0 0.035 0.12 0.26 0.55 1.17 2 2 2 2)
    Schutte1993Muscle_Deprecated supinator_3: max_isometric_force=176.4 optimal_fiber_length=0.02442072
        tendon_slack_length=0.01453614 pennation_angle_at_optimal=0 activation1=62.32493 activation2=21.0084
        max_isometric_force_original=126
      PathPoint P1: ulna_r (0.01988545 -0.04865732 -0.008586016)
      PathPoint P2: radius_r (0.01729801 -0.05510168 0.004273626)
      PathWrap: wrap_object=supinator
      passive_force_length_curve: SimmSpline: x=(-5 1.297 1.299 1.3 1.43 1.56 1.69 1.82 1.95 2.08 2.081 2.083 5)
          y=(0 0 0 0 0.035 0.12 0.26 0.55 1.17 2 2 2 2)
    Schutte1993Muscle_Deprecated supinator_4: max_isometric_force=207.2 optimal_fiber_length=0.02548671
        tendon_slack_length=0.01405161 pennation_angle_at_optimal=0 activation1=62.32493 activation2=21.0084
        max_isometric_force_original=148
      PathPoint P1: ulna_r (0.01870317 -0.03932512 -0.007277763)
      PathPoint P2: radius_r (0.01564089 -0.0470002 0.001085365)
      PathWrap: wrap_object=supinator
      passive_force_length_curve: SimmSpline: x=(-5 1.198 1.199 1.2 1.32 1.44 1.56 1.68 1.8 1.92 1.921 1.922 5)
          y=(0 0 0 0 0.035 0.12 0.26 0.55 1.17 2 2 2 2)
    Schutte1993Muscle_Deprecated supinator_5: max_isometric_force=399 optimal_fiber_length=0.02655269
        tendon_slack_length=0.01347016 pennation_angle_at_optimal=0.03490659 activation1=62.32493 activation2=21.0084
        max_isometric_force_original=285
      PathPoint P1: ulna_r (0.01738523 -0.03001229 -0.005930747)
      PathPoint P2: radius_r (0.01389655 -0.03890841 -0.002044751)
      PathWrap: wrap_object=supinator
      passive_force_length_curve: SimmSpline: x=(-5 1.297 1.299 1.3 1.43 1.56 1.69 1.82 1.95 2.08 2.081 2.083 5)
          y=(0 0 0 0 0.035 0.12 0.26 0.55 1.17 2 2 2 2)
    Schutte1993Muscle_Deprecated pron_quad_1: max_isometric_force=102.2 optimal_fiber_length=0.03653419
        tendon_slack_length=0.004845384 pennation_angle_at_optimal=0 activation1=62.32493 activation2=21.0084
        max_isometric_force_original=73
      PathPoint P1: radius_r (0.01466212 -0.2005891 -0.01680378)
      PathPoint P2: ulna_r (0.02535104 -0.1932532 -0.05316352)
      PathWrap: wrap_object=pron_quad
      passive_force_length_curve: SimmSpline: x=(-5 1.098 1.099 1.1 1.21 1.32 1.43 1.54 1.65 1.76 1.761 1.762 5)
          y=(0 0 0 0 0.035 0.12 0.26 0.55 1.17 2 2 2 2)
    Schutte1993Muscle_Deprecated pron_quad_2: max_isometric_force=249.2 optimal_fiber_length=0.03740635
        tendon_slack_length=0.004845382 pennation_angle_at_optimal=0 activation1=62.32493 activation2=21.0084
        max_isometric_force_original=178
      PathPoint P1: radius_r (0.01598976 -0.2053957 -0.01694914)
      PathPoint P2: ulna_r (0.03048714 -0.2090588 -0.05919118)
      PathWrap: wrap_object=pron_quad
    Schutte1993Muscle_Deprecated pron_quad_3: max_isometric_force=306.6 optimal_fiber_length=0.03411148
        tendon_slack_length=0.004845381 pennation_angle_at_optimal=0 activation1=62.32493 activation2=21.0084
        max_isometric_force_original=219
      PathPoint P1: radius_r (0.01686193 -0.2138848 -0.02160071)
      PathPoint P2: ulna_r (0.0332587 -0.2198253 -0.06286398)
      PathWrap: wrap_object=pron_quad
    Schutte1993Muscle_Deprecated tric_lat_1: max_isometric_force=21.40445 optimal_fiber_length=0.07126279
        tendon_slack_length=0.1604823 pennation_angle_at_optimal=0 activation1=62.32493 activation2=21.0084
        max_isometric_force_original=153 min_control=0 max_control=0 weakness=0.09992742
        max_isometric_force_original_scaled=214.2 muscle_has_fes_testing=true
      PathPoint P1: humerus_r (0.007349626 -0.05172295 0.01527068)
      PathPoint P2: ulna_r (-0.01537924 0.007684775 0.02025369)
      PathWrap: wrap_object=elbow
      passive_force_length_curve: SimmSpline: x=(-5 1.198 1.199 1.2 1.32 1.44 1.56 1.68 1.8 1.92 1.921 1.922 5)
          y=(0 0 0 0 0.035 0.12 0.26 0.55 1.17 2 2 2 2)
    Schutte1993Muscle_Deprecated tric_lat_2: max_isometric_force=57.35834 optimal_fiber_length=0.07203645
        tendon_slack_length=0.166455 pennation_angle_at_optimal=0.08726646 activation1=62.32493 activation2=21.0084
        max_isometric_force_original=410 min_control=0 max_control=0 weakness=0.09992742
        max_isometric_force_original_scaled=574 muscle_has_fes_testing=true
      PathPoint P1: humerus_r (0.007349626 -0.05172295 0.01527068)
      PathPoint P2: ulna_r (-0.01451676 0.005233012 0.02141659)
      PathWrap: wrap_object=elbow
      passive_force_length_curve: SimmSpline: x=(-5 1.198 1.199 1.2 1.32 1.44 1.56 1.68 1.8 1.92 1.921 1.922 5)
          y=(0 0 0 0 0.035 0.12 0.26 0.55 1.17 2 2 2 2)
    Schutte1993Muscle_Deprecated tric_lat_3: max_isometric_force=30.63775 optimal_fiber_length=0.06173069
        tendon_slack_length=0.1798283 pennation_angle_at_optimal=0.1745329 activation1=62.32493 activation2=21.0084
        max_isometric_force_original=219 min_control=0 max_control=0 weakness=0.09992742
        max_isometric_force_original_scaled=306.6 muscle_has_fes_testing=true
      PathPoint P1: humerus_r (0.007349626 -0.05172295 0.01527068)
      PathPoint P2: ulna_r (-0.005620642 0 0.01952689)
      PathWrap: wrap_object=elbow
      passive_force_length_curve: SimmSpline: x=(-5 1.198 1.199 1.2 1.32 1.44 1.56 1.68 1.8 1.92 1.921 1.922 5)
          y=(0 0 0 0 0.035 0.12 0.26 0.55 1.17 2 2 2 2)
    Schutte1993Muscle_Deprecated tric_lat_4: max_isometric_force=38.47206 optimal_fiber_length=0.06005941
        tendon_slack_length=0.1477951 pennation_angle_at_optimal=0.1745329 activation1=62.32493 activation2=21.0084
        max_isometric_force_original=275 min_control=0 max_control=0 weakness=0.09992742
        max_isometric_force_original_scaled=385 muscle_has_fes_testing=true
      PathPoint P1: humerus_r (0.01410523 -0.08953388 0.0145488)
      PathPoint P2: ulna_r (-0.005620642 0 0.01952689)
      PathWrap: wrap_object=elbow
      passive_force_length_curve: SimmSpline: x=(-5 1.198 1.199 1.2 1.32 1.44 1.56 1.68 1.8 1.92 1.921 1.922 5)
          y=(0 0 0 0 0.035 0.12 0.26 0.55 1.17 2 2 2 2)
    Schutte1993Muscle_Deprecated tric_lat_5: max_isometric_force=12.17116 optimal_fiber_length=0.06003207
        tendon_slack_length=0.1477278 pennation_angle_at_optimal=0.296706 activation1=62.32493 activation2=21.0084
        max_isometric_force_original=87 min_control=0 max_control=0 weakness=0.09992742
        max_isometric_force_original_scaled=121.8 muscle_has_fes_testing=true
      PathPoint P1: humerus_r (0.01410523 -0.08953388 0.0145488)
      PathPoint P2: ulna_r (-0.007888281 0.00393445 0.0182574)
      PathWrap: wrap_object=elbow
    Schutte1993Muscle_Deprecated anconeus_1: max_isometric_force=4.33685 optimal_fiber_length=0.02488083
        tendon_slack_length=0.00631894 pennation_angle_at_optimal=0 activation1=62.32493 activation2=21.0084
        max_isometric_force_original=31 min_control=0 max_control=0 weakness=0.09992742
        max_isometric_force_original_scaled=43.4 muscle_has_fes_testing=false
      PathPoint P1: humerus_r (0.01557282 -0.2751058 0.01792223)
      PathPoint P2: ulna_r (0.006298996 -0.02009864 0.01014623)
    Schutte1993Muscle_Deprecated anconeus_2: max_isometric_force=9.792887 optimal_fiber_length=0.01978531
        tendon_slack_length=0.007835768 pennation_angle_at_optimal=0.2617994 activation1=62.32493 activation2=21.0084
        max_isometric_force_original=70 min_control=0 max_control=0 weakness=0.09992742
        max_isometric_force_original_scaled=98 muscle_has_fes_testing=false
      PathPoint P1: humerus_r (0.01342967 -0.2787486 0.01595092)
      PathPoint P2: ulna_r (0.007452197 -0.02319969 0.008954265)
    Schutte1993Muscle_Deprecated anconeus_3: max_isometric_force=3.49746 optimal_fiber_length=0.02235367
        tendon_slack_length=0.004215824 pennation_angle_at_optimal=0 activation1=62.32493 activation2=21.0084
        max_isometric_force_original=25 min_control=0 max_control=0 weakness=0.09992742
        max_isometric_force_original_scaled=35 muscle_has_fes_testing=false
      PathPoint P1: humerus_r (0.01398875 -0.2700418 0.02010177)
      PathPoint P2: ulna_r (0.005136104 -0.01708481 0.0113285)
    Schutte1993Muscle_Deprecated anconeus_4: max_isometric_force=16.50801 optimal_fiber_length=0.02619273
        tendon_slack_length=0.02910303 pennation_angle_at_optimal=0.3141593 activation1=62.32493 activation2=21.0084
        max_isometric_force_original=118 min_control=0 max_control=0 weakness=0.09992742
        max_isometric_force_original_scaled=165.2 muscle_has_fes_testing=false
      PathPoint P1: humerus_r (0.01854296 -0.279351 0.008773703)
      PathPoint P2: ulna_r (0.01482687 -0.0536093 0.002742486)
    Schutte1993Muscle_Deprecated anconeus_5: max_isometric_force=16.50801 optimal_fiber_length=0.02589856
        tendon_slack_length=0.0194726 pennation_angle_at_optimal=0.4014257 activation1=62.32493 activation2=21.0084
        max_isometric_force_original=118 min_control=0 max_control=0 weakness=0.09992742
        max_isometric_force_original_scaled=165.2 muscle_has_fes_testing=false
      PathPoint P1: humerus_r (0.01684241 -0.2801699 0.01135584)
      PathPoint P2: ulna_r (0.01056293 -0.03916037 0.006676936)
    ObjectGroup trap_scap: members=(trap_scap10 trap_scap11 trap_scap_1 trap_scap_2 trap_scap_3 trap_scap_4 trap_scap_5 trap_scap_6 trap_scap_7 trap_scap_8 trap_scap_9)
    ObjectGroup trap_clav: members=(trap_clav_1 trap_clav_2)
    ObjectGroup lev_scap: members=(lev_scap_1 lev_scap_2)
    ObjectGroup pect_min: members=(pect_min_1 pect_min_2 pect_min_3 pect_min_4)
    ObjectGroup rhomboid: members=(rhomboid_1 rhomboid_2 rhomboid_3 rhomboid_4 rhomboid_5)
    ObjectGroup serr_ant: members=(serr_ant10 serr_ant11 serr_ant12 serr_ant_1 serr_ant_2 serr_ant_3 serr_ant_4 serr_ant_5 serr_ant_6 serr_ant_7 serr_ant_8 serr_ant_9)
    ObjectGroup delt_scap: members=(delt_scap10 delt_scap11 delt_scap_1 delt_scap_2 delt_scap_3 delt_scap_4 delt_scap_5 delt_scap_6 delt_scap_7 delt_scap_8 delt_scap_9)
    ObjectGroup delt_clav: members=(delt_clav_1 delt_clav_2 delt_clav_3 delt_clav_4)
    ObjectGroup coracobr: members=(coracobr_1 coracobr_2 coracobr_3)
    ObjectGroup infra: members=(infra_1 infra_2 infra_3 infra_4 infra_5 infra_6)
    ObjectGroup ter_min: members=(ter_min_1 ter_min_2 ter_min_3)
    ObjectGroup ter_maj: members=(ter_maj_1 ter_maj_2 ter_maj_3 ter_maj_4)
    ObjectGroup supra: members=(supra_1 supra_2 supra_3 supra_4)
    ObjectGroup subscap: members=(subscap10 subscap11 subscap_1 subscap_2 subscap_3 subscap_4 subscap_5 subscap_6 subscap_7 subscap_8 subscap_9)
    ObjectGroup bic_c_l: members=bic_l
    ObjectGroup bic_c_b: members=(bic_b_1 bic_b_2)
    ObjectGroup triceps: members=(tric_long_1 tric_long_2 tric_long_3 tric_long_4)
    ObjectGroup lat_dorsi: members=(lat_dorsi_1 lat_dorsi_2 lat_dorsi_3 lat_dorsi_4 lat_dorsi_5 lat_dorsi_6)
    ObjectGroup pect_maj_t: members=(pect_maj_t_1 pect_maj_t_2 pect_maj_t_3 pect_maj_t_4 pect_maj_t_5 pect_maj_t_6)
    ObjectGroup pect_maj_c: members=(pect_maj_c_1 pect_maj_c_2)
    ObjectGroup tric_med: members=(tric_med_1 tric_med_2 tric_med_3 tric_med_4 tric_med_5)
    ObjectGroup brachialis: members=(brachialis_1 brachialis_2 brachialis_3 brachialis_4 brachialis_5 brachialis_6 brachialis_7)
    ObjectGroup brachiorad: members=(brachiorad_1 brachiorad_2 brachiorad_3)
    ObjectGroup pron_teres_hr: members=pron_teres_1
    ObjectGroup pron_teres_ur: members=pron_teres_2
    ObjectGroup supinator_ur: members=(supinator_1 supinator_2 supinator_3 supinator_4 supinator_5)
    ObjectGroup pron_quad: members=(pron_quad_1 pron_quad_2 pron_quad_3)
    ObjectGroup tric_lat: members=(tric_lat_1 tric_lat_2 tric_lat_3 tric_lat_4 tric_lat_5)
    ObjectGroup anconeus: members=(anconeus_1 anconeus_2 anconeus_3 anconeus_4 anconeus_5)
  MarkerSet:
    Marker mid_RS_US: radius_r (-0.001799428 -0.1962585 -0.05267682)
    Marker mid_RS_US_humerus: humerus_r (0.02277694 -0.4709425 -0.1140505)
    Marker ac_scapula: scapula_r (0.002274238 0.02971888 -0.05374883)
    Marker ij: thorax (0 0 0)
    Marker px: thorax (0 -0.1334682 -0.1124901)
    Marker c7: thorax (0 0.008122852 0.1289961)
    Marker t8: thorax (0 -0.1380885 0.1612452)
    Marker ac: clavicle_r (0.1832026 0.02045529 -0.01782574)
    Marker EpL: humerus_r (0.03055122 -0.2542137 0.007554287)
    Marker EpM: humerus_r (-0.04055712 -0.2555179 0.01374949)
    Marker centelbow_humerus: humerus_r (-0.005002929 -0.2548656 0.01065189)
    Marker gu: humerus_r (0 0 0)
    Marker rs: radius_r (-0.004082494 -0.1911957 -0.07329012)
    Marker us: ulna_r (0.01785543 -0.2145026 -0.0459415)
    Marker mid_RS-US: radius_r (-0.001799428 -0.1962585 -0.05267682)
    Marker aa: scapula_r (0.007206332 0.001367331 -0.008680593)
    Marker ts: scapula_r (-0.117774 0.003317444 -0.009723276)
    Marker ai: scapula_r (-0.1126127 -0.1261116 0.001328664)
    Marker sc: scapula_r (-0.04751085 0.01497827 -0.006738419)
    Marker ac_thorax: thorax (0.1372908 0.01903534 0.1447552)
    Marker ij_clavicle: clavicle_r (-0.001522812 0.01333921 -0.01069324)
    Marker mid_RS-US_humerus: humerus_r (0.02277694 -0.4709425 -0.1140505)
  ProbeSet:
    Umberger2010MuscleMetabolicsProbe metabolics: probe_operation=value initial_conditions_for_integration=0
        activation_maintenance_rate_on=false shortening_rate_on=false basal_rate_on=false mechanical_work_rate_on=false
        aerobic_factor=1.5 report_total_metabolics_only=false
      Umberger2010MuscleMetabolicsProbe_MetabolicMuscleParameterSet:
        Umberger2010MuscleMetabolicsProbe_MetabolicMuscleParameter [values shared by the 138 below unless stated]: ratio_slow_twitch_fibers=0.5
            use_provided_muscle_mass=true
        Umberger2010MuscleMetabolicsProbe_MetabolicMuscleParameter trap_scap_1: provided_muscle_mass=0.01954
        Umberger2010MuscleMetabolicsProbe_MetabolicMuscleParameter trap_scap_2: provided_muscle_mass=0.02161
        Umberger2010MuscleMetabolicsProbe_MetabolicMuscleParameter trap_scap_3: provided_muscle_mass=0.02419
        Umberger2010MuscleMetabolicsProbe_MetabolicMuscleParameter trap_scap_4: provided_muscle_mass=0.01494
        Umberger2010MuscleMetabolicsProbe_MetabolicMuscleParameter trap_scap_5: provided_muscle_mass=0.0128
        Umberger2010MuscleMetabolicsProbe_MetabolicMuscleParameter trap_scap_6: provided_muscle_mass=0.01025
        Umberger2010MuscleMetabolicsProbe_MetabolicMuscleParameter trap_scap_7: provided_muscle_mass=0.00958
        Umberger2010MuscleMetabolicsProbe_MetabolicMuscleParameter trap_scap_8: provided_muscle_mass=0.01212
        Umberger2010MuscleMetabolicsProbe_MetabolicMuscleParameter trap_scap_9: provided_muscle_mass=0.01416
        Umberger2010MuscleMetabolicsProbe_MetabolicMuscleParameter trap_scap10: provided_muscle_mass=0.01158
        Umberger2010MuscleMetabolicsProbe_MetabolicMuscleParameter trap_scap11: provided_muscle_mass=0.01407
        Umberger2010MuscleMetabolicsProbe_MetabolicMuscleParameter trap_clav_1: provided_muscle_mass=0.01712
        Umberger2010MuscleMetabolicsProbe_MetabolicMuscleParameter trap_clav_2: provided_muscle_mass=0.00969
        Umberger2010MuscleMetabolicsProbe_MetabolicMuscleParameter lev_scap_1: provided_muscle_mass=0.01731
        Umberger2010MuscleMetabolicsProbe_MetabolicMuscleParameter lev_scap_2: provided_muscle_mass=0.01544
        Umberger2010MuscleMetabolicsProbe_MetabolicMuscleParameter pect_min_1: provided_muscle_mass=0.00407
        Umberger2010MuscleMetabolicsProbe_MetabolicMuscleParameter pect_min_2: provided_muscle_mass=0.01323
        Umberger2010MuscleMetabolicsProbe_MetabolicMuscleParameter pect_min_3: provided_muscle_mass=0.01303
        Umberger2010MuscleMetabolicsProbe_MetabolicMuscleParameter pect_min_4: provided_muscle_mass=0.0072
        Umberger2010MuscleMetabolicsProbe_MetabolicMuscleParameter rhomboid_1: provided_muscle_mass=0.00575
        Umberger2010MuscleMetabolicsProbe_MetabolicMuscleParameter rhomboid_2: provided_muscle_mass=0.0113
        Umberger2010MuscleMetabolicsProbe_MetabolicMuscleParameter rhomboid_3: provided_muscle_mass=0.02034
        Umberger2010MuscleMetabolicsProbe_MetabolicMuscleParameter rhomboid_4: provided_muscle_mass=0.01176
        Umberger2010MuscleMetabolicsProbe_MetabolicMuscleParameter rhomboid_5: provided_muscle_mass=0.00885
        Umberger2010MuscleMetabolicsProbe_MetabolicMuscleParameter serr_ant_1: provided_muscle_mass=0.01139
        Umberger2010MuscleMetabolicsProbe_MetabolicMuscleParameter serr_ant_2: provided_muscle_mass=0.02083
        Umberger2010MuscleMetabolicsProbe_MetabolicMuscleParameter serr_ant_3: provided_muscle_mass=0.01925
        Umberger2010MuscleMetabolicsProbe_MetabolicMuscleParameter serr_ant_4: provided_muscle_mass=0.01629
        Umberger2010MuscleMetabolicsProbe_MetabolicMuscleParameter serr_ant_5: provided_muscle_mass=0.00909
        Umberger2010MuscleMetabolicsProbe_MetabolicMuscleParameter serr_ant_6: provided_muscle_mass=0.01345
        Umberger2010MuscleMetabolicsProbe_MetabolicMuscleParameter serr_ant_7: provided_muscle_mass=0.00609
        Umberger2010MuscleMetabolicsProbe_MetabolicMuscleParameter serr_ant_8: provided_muscle_mass=0.00729
        Umberger2010MuscleMetabolicsProbe_MetabolicMuscleParameter serr_ant_9: provided_muscle_mass=0.00724
        Umberger2010MuscleMetabolicsProbe_MetabolicMuscleParameter serr_ant10: provided_muscle_mass=0.00476
        Umberger2010MuscleMetabolicsProbe_MetabolicMuscleParameter serr_ant11: provided_muscle_mass=0.00229
        Umberger2010MuscleMetabolicsProbe_MetabolicMuscleParameter serr_ant12: provided_muscle_mass=0.01212
        Umberger2010MuscleMetabolicsProbe_MetabolicMuscleParameter delt_scap_1: provided_muscle_mass=0.03703
        Umberger2010MuscleMetabolicsProbe_MetabolicMuscleParameter delt_scap_2: provided_muscle_mass=0.02269
        Umberger2010MuscleMetabolicsProbe_MetabolicMuscleParameter delt_scap_3: provided_muscle_mass=0.04214
        Umberger2010MuscleMetabolicsProbe_MetabolicMuscleParameter delt_scap_4: provided_muscle_mass=0.00888
        Umberger2010MuscleMetabolicsProbe_MetabolicMuscleParameter delt_scap_5: provided_muscle_mass=0.00891
        Umberger2010MuscleMetabolicsProbe_MetabolicMuscleParameter delt_scap_6: provided_muscle_mass=0.02485
        Umberger2010MuscleMetabolicsProbe_MetabolicMuscleParameter delt_scap_7: provided_muscle_mass=0.01275
        Umberger2010MuscleMetabolicsProbe_MetabolicMuscleParameter delt_scap_8: provided_muscle_mass=0.0173
        Umberger2010MuscleMetabolicsProbe_MetabolicMuscleParameter delt_scap_9: provided_muscle_mass=0.02378
        Umberger2010MuscleMetabolicsProbe_MetabolicMuscleParameter delt_scap10: provided_muscle_mass=0.0379
        Umberger2010MuscleMetabolicsProbe_MetabolicMuscleParameter delt_scap11: provided_muscle_mass=0.02012
        Umberger2010MuscleMetabolicsProbe_MetabolicMuscleParameter delt_clav_1: provided_muscle_mass=0.01217
        Umberger2010MuscleMetabolicsProbe_MetabolicMuscleParameter delt_clav_2: provided_muscle_mass=0.01701
        Umberger2010MuscleMetabolicsProbe_MetabolicMuscleParameter delt_clav_3: provided_muscle_mass=0.00983
        Umberger2010MuscleMetabolicsProbe_MetabolicMuscleParameter delt_clav_4: provided_muscle_mass=0.01259
        Umberger2010MuscleMetabolicsProbe_MetabolicMuscleParameter coracobr_1: provided_muscle_mass=0.01506
        Umberger2010MuscleMetabolicsProbe_MetabolicMuscleParameter coracobr_2: provided_muscle_mass=0.01151
        Umberger2010MuscleMetabolicsProbe_MetabolicMuscleParameter coracobr_3: provided_muscle_mass=0.00939
        Umberger2010MuscleMetabolicsProbe_MetabolicMuscleParameter infra_1: provided_muscle_mass=0.01961
        Umberger2010MuscleMetabolicsProbe_MetabolicMuscleParameter infra_2: provided_muscle_mass=0.02245
        Umberger2010MuscleMetabolicsProbe_MetabolicMuscleParameter infra_3: provided_muscle_mass=0.01488
        Umberger2010MuscleMetabolicsProbe_MetabolicMuscleParameter infra_4: provided_muscle_mass=0.01631
        Umberger2010MuscleMetabolicsProbe_MetabolicMuscleParameter infra_5: provided_muscle_mass=0.02414
        Umberger2010MuscleMetabolicsProbe_MetabolicMuscleParameter infra_6: provided_muscle_mass=0.01564
        Umberger2010MuscleMetabolicsProbe_MetabolicMuscleParameter ter_min_1: provided_muscle_mass=0.00714
        Umberger2010MuscleMetabolicsProbe_MetabolicMuscleParameter ter_min_2: provided_muscle_mass=0.01221
        Umberger2010MuscleMetabolicsProbe_MetabolicMuscleParameter ter_min_3: provided_muscle_mass=0.01041
        Umberger2010MuscleMetabolicsProbe_MetabolicMuscleParameter ter_maj_1: provided_muscle_mass=0.02643
        Umberger2010MuscleMetabolicsProbe_MetabolicMuscleParameter ter_maj_2: provided_muscle_mass=0.01549
        Umberger2010MuscleMetabolicsProbe_MetabolicMuscleParameter ter_maj_3: provided_muscle_mass=0.03481
        Umberger2010MuscleMetabolicsProbe_MetabolicMuscleParameter ter_maj_4: provided_muscle_mass=0.01971
        Umberger2010MuscleMetabolicsProbe_MetabolicMuscleParameter supra_1: provided_muscle_mass=0.0074
        Umberger2010MuscleMetabolicsProbe_MetabolicMuscleParameter supra_2: provided_muscle_mass=0.00756
        Umberger2010MuscleMetabolicsProbe_MetabolicMuscleParameter supra_3: provided_muscle_mass=0.01651
        Umberger2010MuscleMetabolicsProbe_MetabolicMuscleParameter supra_4: provided_muscle_mass=0.00819
        Umberger2010MuscleMetabolicsProbe_MetabolicMuscleParameter subscap_1: provided_muscle_mass=0.00281
        Umberger2010MuscleMetabolicsProbe_MetabolicMuscleParameter subscap_2: provided_muscle_mass=0.00575
        Umberger2010MuscleMetabolicsProbe_MetabolicMuscleParameter subscap_3: provided_muscle_mass=0.02021
        Umberger2010MuscleMetabolicsProbe_MetabolicMuscleParameter subscap_4: provided_muscle_mass=0.02376
        Umberger2010MuscleMetabolicsProbe_MetabolicMuscleParameter subscap_5: provided_muscle_mass=0.01033
        Umberger2010MuscleMetabolicsProbe_MetabolicMuscleParameter subscap_6: provided_muscle_mass=0.01292
        Umberger2010MuscleMetabolicsProbe_MetabolicMuscleParameter subscap_7: provided_muscle_mass=0.01513
        Umberger2010MuscleMetabolicsProbe_MetabolicMuscleParameter subscap_8: provided_muscle_mass=0.00532
        Umberger2010MuscleMetabolicsProbe_MetabolicMuscleParameter subscap_9: provided_muscle_mass=0.0182
        Umberger2010MuscleMetabolicsProbe_MetabolicMuscleParameter subscap10: provided_muscle_mass=0.00361
        Umberger2010MuscleMetabolicsProbe_MetabolicMuscleParameter subscap11: provided_muscle_mass=0.00115
        Umberger2010MuscleMetabolicsProbe_MetabolicMuscleParameter bic_l: provided_muscle_mass=0.0662
        Umberger2010MuscleMetabolicsProbe_MetabolicMuscleParameter bic_b_1: provided_muscle_mass=0.02079
        Umberger2010MuscleMetabolicsProbe_MetabolicMuscleParameter bic_b_2: provided_muscle_mass=0.03107
        Umberger2010MuscleMetabolicsProbe_MetabolicMuscleParameter tric_long_1: provided_muscle_mass=0.02697
        Umberger2010MuscleMetabolicsProbe_MetabolicMuscleParameter tric_long_2: provided_muscle_mass=0.02955
        Umberger2010MuscleMetabolicsProbe_MetabolicMuscleParameter tric_long_3: provided_muscle_mass=0.02964
        Umberger2010MuscleMetabolicsProbe_MetabolicMuscleParameter tric_long_4: provided_muscle_mass=0.03203
        Umberger2010MuscleMetabolicsProbe_MetabolicMuscleParameter lat_dorsi_1: provided_muscle_mass=0.01498
        Umberger2010MuscleMetabolicsProbe_MetabolicMuscleParameter lat_dorsi_2: provided_muscle_mass=0.02883
        Umberger2010MuscleMetabolicsProbe_MetabolicMuscleParameter lat_dorsi_3: provided_muscle_mass=0.04305
        Umberger2010MuscleMetabolicsProbe_MetabolicMuscleParameter lat_dorsi_4: provided_muscle_mass=0.03515
        Umberger2010MuscleMetabolicsProbe_MetabolicMuscleParameter lat_dorsi_5: provided_muscle_mass=0.03157
        Umberger2010MuscleMetabolicsProbe_MetabolicMuscleParameter lat_dorsi_6: provided_muscle_mass=0.04069
        Umberger2010MuscleMetabolicsProbe_MetabolicMuscleParameter pect_maj_t_1: provided_muscle_mass=0.02692
        Umberger2010MuscleMetabolicsProbe_MetabolicMuscleParameter pect_maj_t_2: provided_muscle_mass=0.02448
        Umberger2010MuscleMetabolicsProbe_MetabolicMuscleParameter pect_maj_t_3: provided_muscle_mass=0.03475
        Umberger2010MuscleMetabolicsProbe_MetabolicMuscleParameter pect_maj_t_4: provided_muscle_mass=0.03301
        Umberger2010MuscleMetabolicsProbe_MetabolicMuscleParameter pect_maj_t_5: provided_muscle_mass=0.02273
        Umberger2010MuscleMetabolicsProbe_MetabolicMuscleParameter pect_maj_t_6: provided_muscle_mass=0.03243
        Umberger2010MuscleMetabolicsProbe_MetabolicMuscleParameter pect_maj_c_1: provided_muscle_mass=0.02769
        Umberger2010MuscleMetabolicsProbe_MetabolicMuscleParameter pect_maj_c_2: provided_muscle_mass=0.01399
        Umberger2010MuscleMetabolicsProbe_MetabolicMuscleParameter tric_med_1: provided_muscle_mass=0.0184
        Umberger2010MuscleMetabolicsProbe_MetabolicMuscleParameter tric_med_2: provided_muscle_mass=0.01765
        Umberger2010MuscleMetabolicsProbe_MetabolicMuscleParameter tric_med_3: provided_muscle_mass=0.01195
        Umberger2010MuscleMetabolicsProbe_MetabolicMuscleParameter tric_med_4: provided_muscle_mass=0.01395
        Umberger2010MuscleMetabolicsProbe_MetabolicMuscleParameter tric_med_5: provided_muscle_mass=0.0077
        Umberger2010MuscleMetabolicsProbe_MetabolicMuscleParameter brachialis_1: provided_muscle_mass=0.0291
        Umberger2010MuscleMetabolicsProbe_MetabolicMuscleParameter brachialis_2: provided_muscle_mass=0.0159
        Umberger2010MuscleMetabolicsProbe_MetabolicMuscleParameter brachialis_3: provided_muscle_mass=0.01465
        Umberger2010MuscleMetabolicsProbe_MetabolicMuscleParameter brachialis_4: provided_muscle_mass=0.007
        Umberger2010MuscleMetabolicsProbe_MetabolicMuscleParameter brachialis_5: provided_muscle_mass=0.0066
        Umberger2010MuscleMetabolicsProbe_MetabolicMuscleParameter brachialis_6: provided_muscle_mass=0.0041
        Umberger2010MuscleMetabolicsProbe_MetabolicMuscleParameter brachialis_7: provided_muscle_mass=0.0065
        Umberger2010MuscleMetabolicsProbe_MetabolicMuscleParameter brachiorad_1: provided_muscle_mass=0.0047
        Umberger2010MuscleMetabolicsProbe_MetabolicMuscleParameter brachiorad_2: provided_muscle_mass=0.014
        Umberger2010MuscleMetabolicsProbe_MetabolicMuscleParameter brachiorad_3: provided_muscle_mass=0.00597
        Umberger2010MuscleMetabolicsProbe_MetabolicMuscleParameter pron_teres_1: provided_muscle_mass=0.0275
        Umberger2010MuscleMetabolicsProbe_MetabolicMuscleParameter pron_teres_2: provided_muscle_mass=0.00433
        Umberger2010MuscleMetabolicsProbe_MetabolicMuscleParameter supinator_1: provided_muscle_mass=0.00084
        Umberger2010MuscleMetabolicsProbe_MetabolicMuscleParameter supinator_2: provided_muscle_mass=0.00364
        Umberger2010MuscleMetabolicsProbe_MetabolicMuscleParameter supinator_3: provided_muscle_mass=0.00336
        Umberger2010MuscleMetabolicsProbe_MetabolicMuscleParameter supinator_4: provided_muscle_mass=0.00296
        Umberger2010MuscleMetabolicsProbe_MetabolicMuscleParameter supinator_5: provided_muscle_mass=0.00676
        Umberger2010MuscleMetabolicsProbe_MetabolicMuscleParameter pron_quad_1: provided_muscle_mass=0.00163
        Umberger2010MuscleMetabolicsProbe_MetabolicMuscleParameter pron_quad_2: provided_muscle_mass=0.00347
        Umberger2010MuscleMetabolicsProbe_MetabolicMuscleParameter pron_quad_3: provided_muscle_mass=0.00493
        Umberger2010MuscleMetabolicsProbe_MetabolicMuscleParameter tric_lat_1: provided_muscle_mass=0.0125
        Umberger2010MuscleMetabolicsProbe_MetabolicMuscleParameter tric_lat_2: provided_muscle_mass=0.0332
        Umberger2010MuscleMetabolicsProbe_MetabolicMuscleParameter tric_lat_3: provided_muscle_mass=0.0152
        Umberger2010MuscleMetabolicsProbe_MetabolicMuscleParameter tric_lat_4: provided_muscle_mass=0.0162
        Umberger2010MuscleMetabolicsProbe_MetabolicMuscleParameter tric_lat_5: provided_muscle_mass=0.00585
        Umberger2010MuscleMetabolicsProbe_MetabolicMuscleParameter anconeus_1: provided_muscle_mass=0.00083
        Umberger2010MuscleMetabolicsProbe_MetabolicMuscleParameter anconeus_2: provided_muscle_mass=0.0015
        Umberger2010MuscleMetabolicsProbe_MetabolicMuscleParameter anconeus_3: provided_muscle_mass=0.0006
        Umberger2010MuscleMetabolicsProbe_MetabolicMuscleParameter anconeus_4: provided_muscle_mass=0.0022
        Umberger2010MuscleMetabolicsProbe_MetabolicMuscleParameter anconeus_5: provided_muscle_mass=0.00333
