# OpenSim document version 40000
MarkerSet:
  Marker ij: thorax (0 0 0)
  Marker px: thorax (0 -0.164312 -0.0697634)
  Marker c7: thorax (0 0.01 0.08)
  Marker t8: thorax (0 -0.17 0.1)
  Marker ac: clavicle_r (0.1656458 0.018495 -0.01611745)
  Marker EpL: humerus_r (0.02622966 -0.2700743 0.005441613)
  Marker EpM: humerus_r (-0.0348202 -0.27146 0.00990423)
  Marker centelbow_humerus: humerus_r (-0.00429525 -0.270767 0.00767292)
  Marker gu: humerus_r (0 0 0)
  Marker rs: radius_r (-0.004212769 -0.1972969 -0.07562884)
  Marker us: ulna_r (0.01842521 -0.2213475 -0.04740752)
  Marker mid_RS-US: radius_r (-0.001856849 -0.2025212 -0.05435776)
  Marker aa: scapula_r (0.007470681 0.001422821 -0.009015918)
  Marker ts: scapula_r (-0.1220943 0.003452075 -0.01009888)
  Marker ai: scapula_r (-0.1167437 -0.1312296 0.00137999)
  Marker sc: scapula_r (-0.04925368 0.01558614 -0.006998719)
  Marker ac_thorax: thorax (0.1391805 0.02343431 0.08977334)
  Marker ij_clavicle: clavicle_r (-0.001376877 0.01206088 -0.009668476)
  Marker mid_RS-US_humerus: humerus_r (0.01955508 -0.5003251 -0.08215451)
